<?xml version='1.0'?>
<Node 	name='Root' gravity='0 0 0' time='0' animate='0'   >
   <DefaultAnimationLoop/>
   <MechanicalObject position='0 1 2 3 4 5 6 7 8 9'/>
   <OglModel fileMesh='mesh/liver-smooth.obj'/>
   <STLExporter name='exporter1' printLog='true' filename='outFile' exportAtBegin='true' />
</Node>
