<?xml version="1.0" ?>
<!-- See http://wiki.sofa-framework.org/wiki/TutorialCollisionMultipleGroupsSolver.scn -->
<Node name="root" dt="0.01" gravity="0 0 -9.81">
    <!-- Basic Components to perform the collision detection -->
    <VisualStyle displayFlags="showForceFields showCollisionModels" />
    <CollisionPipeline />
    <BruteForceBroadPhase/>
    <BVHNarrowPhase/>
    <DefaultContactManager />
    <MinProximityIntersection alarmDistance="0.5" contactDistance="0.2" />
    <!-- Component Creating dynamic collision group -->
    <DefaultCollisionGroupManager />
    <Node name="CubeSphere1">
        <EulerImplicitSolver name="EulerImplicit"  rayleighStiffness="0.1" rayleighMass="0.1" />
        <CGLinearSolver iterations="25" tolerance="1e-5" threshold="1e-5" name="CG Solver"/>
        <MechanicalObject name="Particles" template="Vec3d" position="0 0 1  1 0 1  0 1 1  1 1 1  0 0 2  1 0 2  0 1 2  1 1 2" translation="-2 1 2" />
        <MeshTopology name="Topology" hexas="0 4 6 2 1 5 7 3" />
        <UniformMass name="Mass" totalMass="1" />
        <MeshSpringForceField name="Springs" stiffness="100" damping="1" />
        <!-- Collision Model -->
        <SphereCollisionModel name="Triangles Cube" radius="0.4" />
    </Node>
    <Node name="CubeSphere2">
        <EulerImplicitSolver name="EulerImplicit" />
        <CGLinearSolver iterations="25" tolerance="1e-5" threshold="1e-5" name="CG Solver"/>
        <MechanicalObject name="Particles" template="Vec3d" position="0 0 1  1 0 1  0 1 1  1 1 1  0 0 2  1 0 2  0 1 2  1 1 2" translation="0 0 6" />
        <MeshTopology name="Topology" hexas="0 4 6 2 1 5 7 3" />
        <UniformMass name="Mass" totalMass="1" />
        <MeshSpringForceField name="Springs" stiffness="100" damping="1" />
        <!-- Collision Model -->
        <SphereCollisionModel name="Spheres Cube" radius="0.4" />
    </Node>
    <Node name="CubeGeometry1">
        <EulerImplicitSolver name="EulerImplicit" />
        <CGLinearSolver iterations="25" tolerance="1e-5" threshold="1e-5" name="CG Solver"/>
        <MechanicalObject name="Particles" template="Vec3d" position="0 0 1  1 0 1  0 1 1  1 1 1  0 0 2  1 0 2  0 1 2  1 1 2" translation="0 1 2" />
        <MeshTopology name="Topology" hexas="0 4 6 2 1 5 7 3" />
        <UniformMass name="Mass" totalMass="1" />
        <MeshSpringForceField name="Springs" stiffness="100" damping="1" />
        <!-- Collision Models -->
        <TriangleCollisionModel name="Triangles CubeGeometry1" />
        <LineCollisionModel name="Lines CubeGeometry1" />
        <PointCollisionModel name="Points CubeGeometry1" />
    </Node>
    <Node name="CubeGeometry2">
        <EulerImplicitSolver name="EulerImplicit" />
        <CGLinearSolver iterations="25" tolerance="1e-5" threshold="1e-5" name="CG Solver"/>
        <MechanicalObject name="Particles" template="Vec3d" position="0 0 1  1 0 1  0 1 1  1 1 1  0 0 2  1 0 2  0 1 2  1 1 2" translation="2 1 2" />
        <MeshTopology name="Topology" hexas="0 4 6 2 1 5 7 3" />
        <UniformMass name="Mass" totalMass="1" />
        <MeshSpringForceField name="Springs" stiffness="100" damping="1" />
        <!-- Collision Models -->
        <TriangleCollisionModel name="Triangles CubeGeometry2" />
        <LineCollisionModel name="Lines CubeGeometry2" />
        <PointCollisionModel name="Points CubeGeometry2" />
    </Node>
    <Node name="SaladBowl">
        <MeshTopology name="Topology Salad Bowl" filename="mesh/SaladBowl.obj" />
        <MechanicalObject name="Particles Salad Bowl" scale="10" />
        <TriangleCollisionModel name="Triangles Salad Bowl" moving="0" simulated="0" />
        <LineCollisionModel name="Lines Salad Bowl" moving="0" simulated="0" />
        <PointCollisionModel name="Points Salad Bowl" moving="0" simulated="0" />
    </Node>
</Node>
