<?xml version="1.0"?>
<Node 	 name="root"  dt="0.02"  >
    <RequiredPlugin name="Sofa.GL.Component.Rendering3D"/> <!-- Needed to use components [OglModel] -->


	<OglModel filename="plane.obj" translation="0 0 0" texturename="ice_chess.png" />
	<OglModel filename="plane.obj" translation="2.1 0 0" texturename="ice_chess.jpg" />
	<OglModel filename="plane.obj" translation="4.2 0 0" texturename="ice_chess.tif" />
	<OglModel filename="plane.obj" translation="6.3 0 0" texturename="ice_chess_alpha.png" alphaBlend="true"/>

</Node>
