<?xml version="1.0"?>
<Node name="root" dt="0.005">
    <RequiredPlugin name="InvertibleFVM"/> <!-- Needed to use components [InvertibleFVMForceField] -->
    <RequiredPlugin name="Sofa.Component.Collision.Detection.Algorithm"/> <!-- Needed to use components [BVHNarrowPhase BruteForceBroadPhase BruteForceDetection DefaultPipeline] -->
    <RequiredPlugin name="Sofa.Component.Collision.Detection.Intersection"/> <!-- Needed to use components [NewProximityIntersection] -->
    <RequiredPlugin name="Sofa.Component.Collision.Geometry"/> <!-- Needed to use components [TriangleCollisionModel] -->
    <RequiredPlugin name="Sofa.Component.Collision.Response.Contact"/> <!-- Needed to use components [DefaultContactManager] -->
    <RequiredPlugin name="Sofa.Component.IO.Mesh"/> <!-- Needed to use components [MeshGmshLoader MeshOBJLoader] -->
    <RequiredPlugin name="Sofa.Component.Mapping.Linear"/> <!-- Needed to use components [BarycentricMapping] -->
    <RequiredPlugin name="Sofa.Component.Mass"/> <!-- Needed to use components [UniformMass] -->
    <RequiredPlugin name="Sofa.Component.MechanicalLoad"/> <!-- Needed to use components [PlaneForceField] -->
    <RequiredPlugin name="Sofa.Component.ODESolver.Forward"/> <!-- Needed to use components [EulerExplicitSolver] -->
    <RequiredPlugin name="Sofa.Component.SolidMechanics.FEM.Elastic"/> <!-- Needed to use components [TetrahedronFEMForceField] -->
    <RequiredPlugin name="Sofa.Component.StateContainer"/> <!-- Needed to use components [MechanicalObject] -->
    <RequiredPlugin name="Sofa.Component.Topology.Container.Constant"/> <!-- Needed to use components [MeshTopology] -->
    <RequiredPlugin name="Sofa.Component.Visual"/> <!-- Needed to use components [VisualStyle] -->
    <RequiredPlugin name="Sofa.GL.Component.Rendering3D"/> <!-- Needed to use components [OglModel] -->
    <VisualStyle displayFlags="showBehaviorModels showForceFields" />

    <DefaultPipeline depth="6" verbose="0" draw="0" />
    <BruteForceDetection name="N2" />
    <NewProximityIntersection name="Proximity" alarmDistance="0.3" contactDistance="0.2" />
    <DefaultContactManager name="Response" response="PenalityContactForceField" />


     <!--EulerImplicit name="cg_odesolver" printLog="false" dt="0.01"/>
	    <CGLinearSolver iterations="25" name="linear solver" tolerance="1.0e-9" threshold="1.0e-9" /-->

        <Node name="FVM">
            <EulerExplicitSolver name="odeExplicitSolver" />
            <MeshGmshLoader name="loader" filename="mesh/torus_low_res.msh" />
            <MeshTopology src="@loader" />
            <MechanicalObject src="@loader"  />
            <UniformMass totalMass="5" />
            <InvertibleFVMForceField name="FEM" youngModulus="100" poissonRatio="0"  />
	    <PlaneForceField normal="0 1 0" d="-0.5" stiffness="100" drawSize="100" />
            <Node name="Visu">
                <MeshOBJLoader  name="meshLoader_0" filename="mesh/torus.obj" handleSeams="1" />
                <OglModel name="Visual" src="@meshLoader_0" color="red"  />
                <BarycentricMapping input="@.." output="@Visual" />
            </Node>
            <Node name="Surf2">
                <MeshOBJLoader  name="loader" filename="mesh/torus_for_collision.obj" />
                <MeshTopology src="@loader" />
                <MechanicalObject src="@loader"  />
                <TriangleCollisionModel />
                <BarycentricMapping />
            </Node>
        </Node>


        <Node name="FEM">
            <EulerExplicitSolver name="odeExplicitSolver" />
            <MeshGmshLoader name="loader" filename="mesh/torus_low_res.msh" />
            <MeshTopology src="@loader" />
            <MechanicalObject src="@loader" dx="7" />
            <UniformMass totalMass="5" />
            <TetrahedronFEMForceField name="FEM" youngModulus="100" poissonRatio="0" computeGlobalMatrix="false" method="svd" />
	    <PlaneForceField normal="0 1 0" d="-0.5" stiffness="100" drawSize="100" />
            <Node name="Visu">
                <MeshOBJLoader  name="meshLoader_1" filename="mesh/torus.obj" handleSeams="1" />
                <OglModel name="Visual" src="@meshLoader_1" color="blue" dx="7" />
                <BarycentricMapping input="@.." output="@Visual" />
            </Node>
            <Node name="Surf2">
                <MeshOBJLoader  name="loader" filename="mesh/torus_for_collision.obj" />
                <MeshTopology src="@loader" />
                <MechanicalObject src="@loader" dx="7" />
                <TriangleCollisionModel />
                <BarycentricMapping />
            </Node>
        </Node>

</Node>
