# -*- coding: utf-8 -*-
import imp

#	STLIB IMPORT
from stlib3.scene.wrapper import Wrapper

import sys
import os
import ntpath
import importlib

originalScene = '/home/olivier/sofa/plugins/ModelOrderReduction/doc/examples/liver/liverFine.pyscn'
originalScene = imp.load_source(originalScene.split('/')[-1], originalScene)

paramWrapper = [('/liver', {'paramForcefield': {'periodSaveGIE': 3, 'prepareECSW': True, 'modesPath': '/home/olivier/sofa/plugins/ModelOrderReduction/doc/examples/liver/mor/data/modes.txt', 'nbTrainingSet': 64.0}, 'paramMORMapping': {'input': '@../MechanicalObject', 'modesPath': '/home/olivier/sofa/plugins/ModelOrderReduction/doc/examples/liver/mor/data/modes.txt'}, 'paramMappedMatrixMapping': {'object1': '@./MechanicalObject', 'object2': '@./MechanicalObject', 'performECSW': False, 'template': 'Vec1d,Vec1d', 'nodeToParse': '@./liver'}})]

solverToDelete = {}
nodeToKeep = []
def findSolver(node,type,newParam,initialParam):
    global solverToDelete , nodeToKeep

    currentPath = node.getPathName()

    for item in newParam :
        index = newParam.index(item)
        path , param = item
        # print(path)
        if currentPath == path :
            if node.name in solverToDelete:
                pass
            else:
                solverToDelete[node.name] = []
            #   Find the differents solver to move them in order to have them before the MechanicalMatrixMapperMOR
            # print(type)
            if str(type).find('Solver') != -1 or type == 'EulerImplicitSolver' or type == 'GenericConstraintCorrection':
                if 'name' in initialParam:
                    solverToDelete[node.name].append(initialParam['name'])
                else:
                    solverToDelete[node.name].append(str(type))

            if node.name not in nodeToKeep :
                nodeToKeep.append(node.name)

    return None


tmpFind = 0
def searchObjectAndDestroy(node):
    global tmpFind,nodeToKeep

    for child in node.getChildren():
        for item in paramWrapper:
            # print(item[0]+' in '+child.getPathName()+' ?')
            if child.getPathName().find(item[0]) != -1 or item[0].find(child.getPathName()) != -1 and child.getPathName() != '':
                # print('keep : '+child.name)
                if child.getPathName() ==  item[0]:

                    objects = child.getObjects()
                    for obj in objects:
                        if obj.name in solverToDelete[child.name]:
                            child.removeObject(obj)

                    if solverToDelete[child.name]:
                        child.addObject('ReadState', filename="../../diplayNormalModes.state")

                    childs = child.getChildren()
                    for node in childs:
                        # print(node.name)
                        subTopo = False
                        for item in paramWrapper:
                            if item[0] == child.getPathName():
                                if 'subTopo' in item[1] :
                                    if node.name == item[1]['subTopo']:
                                        subTopo = True
                        if subTopo:
                            pass
                        else:
                            child.removeChild(node)
                    tmpFind+=1

                else:
                    searchObjectAndDestroy(child)
            elif child.getPathName() != '':
                # print('remove : '+child.name)
                myParent = child.getParents()[0]
                myParent.removeChild(child)

    if tmpFind == len(nodeToKeep):
        print 'find all'
    # else:
    #     print 'not yet'

    return None

def createScene(rootNode):

    originalScene.createScene(Wrapper(rootNode, findSolver, paramWrapper))

    for obj in rootNode.getObjects():
        rootNode.removeObject(obj)

    # print('nodeToKeep ',nodeToKeep)
    # print('solverToDelete :',solverToDelete)
    searchObjectAndDestroy(rootNode)
    rootNode.addObject('VisualStyle', displayFlags='showVisualModels showForceFields')
