# -*- coding: utf-8 -*-
import os
import Sofa

meshPath = os.path.dirname(os.path.abspath(__file__))+'/mesh/'


def createScene(rootNode):
    rootNode.findData('dt').value=0.02
    rootNode.findData('gravity').value='0 -981.0 0'
    rootNode.addObject('VisualStyle', displayFlags='showBehaviorModels showForceFields')
    rootNode.addObject('RequiredPlugin', pluginName='ModelOrderReduction')
    rootNode.addObject('RequiredPlugin', pluginName='SoftRobots')
    rootNode.addObject('RequiredPlugin', pluginName="SofaOpenglVisual")
    rootNode.addObject('RequiredPlugin', pluginName="CImgPlugin")

    rootNode.addObject('FreeMotionAnimationLoop')
    rootNode.addObject('GenericConstraintSolver', printLog='0', tolerance="1e-6", maxIterations="500")
    rootNode.addObject('CollisionPipeline', verbose="0")
    rootNode.addObject('BruteForceBroadPhase', name="N2")
    rootNode.addObject('BVHNarrowPhase')
    rootNode.addObject('CollisionResponse', response="FrictionContact", responseParams="mu=0.7")
    rootNode.addObject('LocalMinDistance', name="Proximity", alarmDistance="2.5", contactDistance="0.1", angleCone="0.05")


    rootNode.addObject('Camera', position="0 30 90", lookAt="0 30 0")
    rootNode.addObject('LightManager')
    rootNode.addObject('SpotLight', name="light1", color="1 1 1", position="0 80 25", direction="0 -1 -0.8", cutoff="30", exponent="1" )
    rootNode.addObject('SpotLight', name="light2", color="1 1 1", position="0 40 100", direction="0 0 -1", cutoff="30", exponent="1" )

    rootNode.addObject('MeshOBJLoader', name="visual_snake_body", filename="mesh/snake_body.obj", handleSeams="1" )
    rootNode.addObject('MeshOBJLoader', name="visual_snake_cornea", filename="mesh/snake_cornea.obj", handleSeams="1" )
    rootNode.addObject('MeshOBJLoader', name="visual_snake_eye", filename="mesh/snake_yellowEye.obj", handleSeams="1" )
    rootNode.addObject('MeshOBJLoader', name="SOFA_pod", filename="mesh/SOFA_pod.obj", handleSeams="1" )

    actuatorDummy = rootNode.addChild('actuatorDummy')
    actuatorDummy.addObject('MechanicalObject', name = 'actuatorState', template = 'Vec3d')

    Snake = rootNode.addChild("Snake")
    Snake.addObject('EulerImplicitSolver',rayleighStiffness="0.1", rayleighMass="0.1")
    Snake.addObject('SparseLDLSolver',name='preconditioner')
    Snake.addObject('MeshVTKLoader', name='loader', filename=meshPath+'snake0.vtu', rotation=[-90, 0, 0], translation=[0,5,0])
    Snake.addObject('TetrahedronSetTopologyContainer',src = '@loader')
    Snake.addObject('MechanicalObject')
    Snake.addObject('UniformMass', totalMass="1.0")
    Snake.addObject('TetrahedronFEMForceField', name="FEM", youngModulus="10000.0", poissonRatio="0.4", method="large")
    Snake.addObject('GenericConstraintCorrection', solverName='preconditioner')


    collis = Snake.addChild('collis')
    collis.addObject('MeshOBJLoader', name='loader', filename=meshPath+"meca_snake_900tri.obj",translation=[0,5,0])
    collis.addObject('Mesh', src='@loader', name='topo')
    collis.addObject('MechanicalObject', name='CollisModel')
    collis.addObject('TriangleCollisionModel', selfCollision=False)
    collis.addObject('LineCollisionModel', selfCollision=False)
    collis.addObject('PointCollisionModel', selfCollision=False)
    collis.addObject('BarycentricMapping')

    VisuBody = Snake.addChild('VisuBody')
    VisuBody.addObject('MeshOBJLoader', name='loader', filename=meshPath+"snake_body.obj")
    VisuBody.addObject("OglModel", name="VisualBody",src='@loader', texturename="textures/snakeColorMap.png", color=[1,1,1,0.6], translation=[0, 5, 0])
    VisuBody.addObject("BarycentricMapping")

    VisuCornea = Snake.addChild('VisuCornea')
    VisuCornea.addObject('MeshOBJLoader', name='loader', filename=meshPath+"snake_cornea.obj")
    VisuCornea.addObject("OglModel", name="VisuCornea",src='@loader', translation=[0, 5, 0])
    VisuCornea.addObject("BarycentricMapping")

    VisualEye = Snake.addChild('VisualEye')
    VisualEye.addObject('MeshOBJLoader', name='loader', filename=meshPath+"snake_yellowEye.obj")
    VisualEye.addObject("OglModel", name="VisualEye",src='@loader', translation=[0, 5, 0])
    VisualEye.addObject("BarycentricMapping")

    base = rootNode.addChild("base")

    stick = base.addChild("stick")
    stick.addObject('MeshOBJLoader',name="loader", filename="mesh/collision_batons.obj")
    stick.addObject('Mesh', src='@loader', name='topo')
    stick.addObject('MechanicalObject', name='stickCollisModel')
    stick.addObject('LineCollisionModel',simulated="false", moving="false")
    stick.addObject('PointCollisionModel',simulated="false", moving="false")
    stick.addObject('UncoupledConstraintCorrection')

    blobs = base.addChild("blobs")
    blobs.addObject('MeshOBJLoader',name="loader", filename="mesh/collision_boules_V3.obj")
    blobs.addObject('Mesh', src='@loader', name='topo')
    blobs.addObject('MechanicalObject', name='blobsCollisModel')
    blobs.addObject('TriangleCollisionModel',simulated="false", moving="false")
    blobs.addObject('LineCollisionModel',simulated="false", moving="false")
    blobs.addObject('PointCollisionModel',simulated="false", moving="false")
    blobs.addObject('UncoupledConstraintCorrection')

    foot = base.addChild("foot")
    foot.addObject('MeshOBJLoader',name="loader", filename="mesh/collision_pied.obj")
    foot.addObject('Mesh', src='@loader', name='topo')
    foot.addObject('MechanicalObject', name='footCollisModel')
    foot.addObject('TriangleCollisionModel',simulated="false", moving="false")
    foot.addObject('LineCollisionModel',simulated="false", moving="false")
    foot.addObject('PointCollisionModel',simulated="false", moving="false")
    foot.addObject('UncoupledConstraintCorrection')

    visu = base.addChild("visu")
    visu.addObject('MeshOBJLoader', name="SOFA_pod", filename="mesh/SOFA_pod.obj", handleSeams="1" )
    visu.addObject('OglModel' , src = '@SOFA_pod', name = 'VisuPOD',color=[1,69.0/255.0,0])


#<?xml version="1.0" ?>
#<!-- NEW DEFAULT SOFA SCENE (Thanks to Jeremy Ringard for the caduceus model) -->
#<Node name="root" gravity="0 -981.0 0" dt="0.04">
    #<RequiredPlugin name="SofaOpenglVisual"/>
    #<RequiredPlugin pluginName="CImgPlugin"/>
    #<VisualStyle displayFlags="showVisual  " /> <!--showBehaviorModels showCollisionModels-->
    #<LCPConstraintSolver tolerance="1e-3" maxIt="1000" initial_guess="false" build_lcp="false"  printLog="0" mu="0.2"/>
    #<FreeMotionAnimationLoop />
    #<DefaultPipeline depth="15" verbose="0" draw="0" />
    #<BruteForceBroadPhase name="N2" />
    #<BVHNarrowPhase />
    #<MinProximityIntersection name="Proximity" alarmDistance="1.5" contactDistance="1" />

    #<DefaultContactManager name="Response" response="FrictionContact" />

    #<Camera position="0 30 90" lookAt="0 30 0"/>
    #<LightManager />
    #<SpotLight name="light1" color="1 1 1" position="0 80 25" direction="0 -1 -0.8" cutoff="30" exponent="1" />
    #<SpotLight name="light2" color="1 1 1" position="0 40 100" direction="0 0 -1" cutoff="30" exponent="1" />

    #<MeshOBJLoader name="visual_snake_body" filename="mesh/snake_body.obj" handleSeams="1" />
    #<MeshOBJLoader name="visual_snake_cornea" filename="mesh/snake_cornea.obj" handleSeams="1" />
    #<MeshOBJLoader name="visual_snake_eye" filename="mesh/snake_yellowEye.obj" handleSeams="1" />
    #<MeshOBJLoader name="SOFA_pod" filename="mesh/SOFA_pod.obj" handleSeams="1" />

    #<Node name="Snake" >

        #<EulerImplicitSolver name="cg_odesolver" rayleighMass="0.03" rayleighStiffness="0.03" />
        #<CGLinearSolver name="linear_solver" iterations="200" tolerance="1e-12" threshold="1e-18" />
        #<MeshVTKLoader name="loader" filename='mesh/snake0.vtu' rotation="-90 0 0"/>
        #<Mesh src="@loader"/>
        #<MechanicalObject name="dofs"  scale="1" tags="NoPicking" />
        #<UniformMass totalMass="0.05" />
        #<TetrahedronFEMForceField name="FEM" youngModulus="3000000.0" poissonRatio="0.4" method="large" printLog="0" />
        #<UncoupledConstraintCorrection />

        #<Node name="Collis">
            #<MeshOBJLoader name="loader" filename="mesh/meca_snake_900tri.obj" />
            #<MeshTopology src="@loader" />
            #<MechanicalObject src="@loader" name="CollisModel" />
            #<TriangleCollisionModel  selfCollision="0" />
            #<LineCollisionModel    selfCollision="0" />
            #<PointCollisionModel  selfCollision="0" />
            #<BarycentricMapping input="@.." output="@." />
        #</Node>

        #<Node name="VisuBody" tags="Visual" >
            #<OglModel  name="VisualBody" src="@../../visual_snake_body" texturename="textures/snakeColorMap.png"  />
            #<BarycentricMapping input="@.." output="@VisualBody" />
        #</Node>

        #<Node name="VisuCornea" tags="Visual" >
            #<OglModel  name="VisualCornea" src="@../../visual_snake_cornea"   />
            #<BarycentricMapping input="@.." output="@VisualCornea" />
        #</Node>

        #<Node name="VisuEye" tags="Visual" >
            #<OglModel  name="VisualEye" src="@../../visual_snake_eye"   />
            #<BarycentricMapping input="@.." output="@VisualEye" />
        #</Node>
    #</Node>

    #<Node name="Base" >
        #<Node name="Stick">
                 #<MeshOBJLoader name="loader" filename="mesh/collision_batons.obj" />
                 #<MeshTopology src="@loader" />
                 #<MechanicalObject src="@loader" name="CollisModel" />
                 #<LineCollisionModel simulated="false" moving="false" />
                 #<PointCollisionModel simulated="false"  moving="false"/>
        #</Node>
        #<Node name="Blobs">
                 #<MeshOBJLoader name="loader" filename="mesh/collision_boules_V3.obj" />
                 #<MeshTopology src="@loader" />
                 #<MechanicalObject src="@loader" name="CollisModel" />
                 #<TriangleCollisionModel simulated="false" moving="false"/>
                 #<LineCollisionModel simulated="false" moving="false"/>
                 #<PointCollisionModel simulated="false" moving="false"/>
        #</Node>

            #<Node name="Foot">
            #<MeshOBJLoader name="loader" filename="mesh/collision_pied.obj" />
            #<MeshTopology src="@loader" />
            #<MechanicalObject src="@loader" name="CollisModel" />
            #<TriangleCollisionModel simulated="false" moving="false"/>
            #<LineCollisionModel simulated="false" moving="false"/>
            #<PointCollisionModel simulated="false" moving="false"/>
        #</Node>

        #<Node name="Visu" tags="Visual" >
            #<OglModel  name="OglModel" src="@../../SOFA_pod"  />
        #</Node>
    #</Node>
#</Node>
