# -*- coding: utf-8 -*-
import os
import Sofa

meshPath = os.path.dirname(os.path.abspath(__file__))+'/mesh/'

def createScene(rootNode):

    rootNode.findData('dt').value=0.02
    rootNode.findData('gravity').value=[0, -9810, 0]
    rootNode.addObject('VisualStyle', displayFlags='showBehaviorModels showForceFields')
    rootNode.addObject('RequiredPlugin', pluginName='ModelOrderReduction')
    rootNode.addObject('RequiredPlugin', pluginName='SoftRobots')
    rootNode.addObject('FreeMotionAnimationLoop')
    rootNode.addObject('GenericConstraintSolver', tolerance="1e-12", maxIterations="10000")


    M1 = rootNode.addChild("M1")
    M1.addObject('EulerImplicitSolver',rayleighStiffness="0.1", rayleighMass="0.1")
    M1.addObject('SparseLDLSolver',name='preconditioner')
    M1.addObject('MechanicalObject')
    M1.addObject('UniformMass', totalMass="0.1")
    M1.addObject('RegularGrid', nx="4", ny="4", nz="20", xmin="-9", xmax="-6", ymin="0", ymax="3", zmin="0", zmax="19")
    M1.addObject('FixedConstraint', indices="0 1 2 3 4 5 6 7 8 9 10 11 12 13 14 15")
    M1.addObject('HexahedronFEMForceField', name="FEM", youngModulus="4000", poissonRatio="0.3", method="large")
    M1.addObject('GenericConstraintCorrection', solverName='preconditioner')

    cableNodeTip = M1.addChild('cableNodeTip')
    cableNodeTip.addObject('MechanicalObject', name="actuatedTip", template="Vec3d", position="-7.5 1.5 18.5")
    cableNodeTip.addObject('CableConstraint', name="tipCable", indices="0", pullPoint="-7.5 10 18.5", valueType="displacement")
    cableNodeTip.addObject('BarycentricMapping', mapForces="false", mapMasses="false")

    cableNodeSide = M1.addChild('cableNodeSide')
    cableNodeSide.addObject('MechanicalObject', name="actuatedSide", template="Vec3d", position="-7.5 1.5 18.5")
    cableNodeSide.addObject('CableConstraint', name="sideCable", indices="0", pullPoint="1 10 18.5", valueType="displacement")
    cableNodeSide.addObject('BarycentricMapping', mapForces="false", mapMasses="false")
