<!-- BeamFEMForceField example -->
<Node name="root" dt="0.01">
    <RequiredPlugin name="Sofa.Component.Collision.Detection.Algorithm"/> <!-- Needed to use components [BVHNarrowPhase BruteForceBroadPhase CollisionPipeline] -->
    <RequiredPlugin name="Sofa.Component.Collision.Detection.Intersection"/> <!-- Needed to use components [MinProximityIntersection] -->
    <RequiredPlugin name="Sofa.Component.Collision.Geometry"/> <!-- Needed to use components [TriangleCollisionModel] -->
    <RequiredPlugin name="Sofa.Component.Collision.Response.Contact"/> <!-- Needed to use components [DefaultContactManager] -->
    <RequiredPlugin name="Sofa.Component.Constraint.Projective"/> <!-- Needed to use components [FixedConstraint] -->
    <RequiredPlugin name="Sofa.Component.LinearSolver.Direct"/> <!-- Needed to use components [BTDLinearSolver] -->
    <RequiredPlugin name="Sofa.Component.Mass"/> <!-- Needed to use components [UniformMass] -->
    <RequiredPlugin name="Sofa.Component.ODESolver.Backward"/> <!-- Needed to use components [EulerImplicitSolver] -->
    <RequiredPlugin name="Sofa.Component.SolidMechanics.FEM.Elastic"/> <!-- Needed to use components [BeamFEMForceField] -->
    <RequiredPlugin name="Sofa.Component.StateContainer"/> <!-- Needed to use components [MechanicalObject] -->
    <RequiredPlugin name="Sofa.Component.Topology.Container.Constant"/> <!-- Needed to use components [CubeTopology MeshTopology] -->
    <RequiredPlugin name="Sofa.Component.Visual"/> <!-- Needed to use components [VisualStyle] -->
    <VisualStyle displayFlags="showBehaviorModels showForceFields showCollisionModels" />
    <CollisionPipeline depth="6" verbose="0" draw="0" />
    <BruteForceBroadPhase/>
    <BVHNarrowPhase/>
    <MinProximityIntersection name="Proximity" alarmDistance="0.03" contactDistance="0.02" />
    <DefaultContactManager name="Response" response="PenalityContactForceField" />
    <Node name="beam">
        <EulerImplicitSolver rayleighStiffness="0" printLog="false"  rayleighMass="0.1" />
        <BTDLinearSolver bandWidth="11" printLog="false" verbose="false" />
        <MechanicalObject template="Rigid3d" name="DOFs" position="0 0 0 0 0 0 1  1 0 0 0 0 0 1  2 0 0 0 0 0 1  3 0 0 0 0 0 1  4 0 0 0 0 0 1  5 0 0 0 0 0 1  6 0 0 0 0 0 1  7 0 0 0 0 0 1
                          8 0 0 0 0 0 1  9 0 0 0 0 0 1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" />
        <MeshTopology name="lines" lines="0 1 1 2 2 3 3 4 4 5 5 6 6 7 7 8 8 9 9 10 10 11 11 12 12 13 13 14 14 15 15 16 16 17 17 18 18
              19 19 20 20 21 21 22 22 23 23 24 24 25 25 26 26 27 27 28 28 29 29 30 30 31" />
        <!--
      <MechanicalObject template="Rigid3d" name="DOFs" position="0 0 0 0 0 0 1  1 0 0 0 0 0 1  2 0 0 0 0 0 1  3 0 0 0 0 0 1" />
      <MeshTopology name="lines" lines="0 1 1 2 2 3" />
      -->
        <!--
      <MechanicalObject template="Rigid3d" name="DOFs" position="0 0 0 0 0 -0.7071067811865475244 0.7071067811865475244  0 -1 0 0 0 -0.7071067811865475244 0.7071067811865475244" />
      <MeshTopology name="lines" lines="0 1" />
      -->
        <FixedConstraint name="FixedConstraint" indices="0" />
        <UniformMass vertexMass="1 1 0.01 0 0 0 0.1 0 0 0 0.1" printLog="false" />
        <BeamFEMForceField name="FEM" radius="0.1" poissonRatio="0.49" youngModulus="20000000" />
        <!--
      <Gravity value="0 0 0 0 0 0" />
      <ExternalForceField forces="10 0 0 0 0 0" indices="1" />
-->
        <!--
      <Node name="Collision">
        <MechanicalObject/>
        <SphereCollisionModel radius=".2" position="0 0 0 0 0 0" />
        <RigidMapping index="7" />
      </Node>
-->
        <Node name="Collision">
            <!--        <CubeTopology nx="115" ny="4" nz="4" xmin="0" xmax="7" ymin="-0.1" ymax="0.1" zmin="-0.1" zmax="0.1" /> -->
            <CubeTopology nx="256" ny="8" nz="8" min="0 -0.1 -0.1" max="31 0.1 0.1" />
            <MechanicalObject />
            <BeamLinearMapping_mt granularity="512" isMechanical="true" />
            <TriangleCollisionModel />
            <!--        <OglModel /> -->
        </Node>
    </Node>

</Node>
