<?xml version="1.0"?>
<Node name="root" gravity="0 -9.81 0">
    <RequiredPlugin name="MultiThreading"/> <!-- Needed to use components [ParallelBVHNarrowPhase ParallelBruteForceBroadPhase] -->
    <RequiredPlugin name="Sofa.Component.Collision.Detection.Algorithm"/> <!-- Needed to use components [CollisionPipeline] -->
    <RequiredPlugin name="Sofa.Component.Collision.Detection.Intersection"/> <!-- Needed to use components [MinProximityIntersection] -->
    <RequiredPlugin name="Sofa.Component.Collision.Geometry"/> <!-- Needed to use components [LineCollisionModel PointCollisionModel TriangleCollisionModel] -->
    <RequiredPlugin name="Sofa.Component.Collision.Response.Contact"/> <!-- Needed to use components [DefaultContactManager] -->
    <RequiredPlugin name="Sofa.Component.IO.Mesh"/> <!-- Needed to use components [MeshOBJLoader] -->
    <RequiredPlugin name="Sofa.Component.LinearSolver.Iterative"/> <!-- Needed to use components [CGLinearSolver] -->
    <RequiredPlugin name="Sofa.Component.Mass"/> <!-- Needed to use components [UniformMass] -->
    <RequiredPlugin name="Sofa.Component.ODESolver.Backward"/> <!-- Needed to use components [EulerImplicitSolver] -->
    <RequiredPlugin name="Sofa.Component.SolidMechanics.Spring"/> <!-- Needed to use components [RegularGridSpringForceField] -->
    <RequiredPlugin name="Sofa.Component.StateContainer"/> <!-- Needed to use components [MechanicalObject] -->
    <RequiredPlugin name="Sofa.Component.Topology.Container.Constant"/> <!-- Needed to use components [MeshTopology] -->
    <RequiredPlugin name="Sofa.Component.Topology.Container.Dynamic"/> <!-- Needed to use components [QuadSetGeometryAlgorithms QuadSetTopologyContainer QuadSetTopologyModifier TriangleSetGeometryAlgorithms TriangleSetTopologyContainer TriangleSetTopologyModifier] -->
    <RequiredPlugin name="Sofa.Component.Topology.Container.Grid"/> <!-- Needed to use components [RegularGridTopology] -->
    <RequiredPlugin name="Sofa.Component.Topology.Mapping"/> <!-- Needed to use components [Hexa2QuadTopologicalMapping Quad2TriangleTopologicalMapping] -->
    <RequiredPlugin name="Sofa.Component.Visual"/> <!-- Needed to use components [InteractiveCamera VisualStyle] -->

    <VisualStyle displayFlags="showCollisionModels"/>

    <CollisionPipeline/>

    <!--
    Parallel collision detection.
    To compare to the single thread collision detection, replace the two following components with:
    <BruteForceBroadPhase/>
    <BVHNarrowPhase/>
    -->
    <ParallelBruteForceBroadPhase/>
    <ParallelBVHNarrowPhase/>

    <MinProximityIntersection name="Proximity" alarmDistance="2" contactDistance="0.7"/>
    <DefaultContactManager name="Response" response="PenalityContactForceField"/>
    <InteractiveCamera name="cam" position="0 0 -50" lookAt="0 0 0"/>

    <Node name="Cube1">
        <EulerImplicitSolver name="cg_odesolver" rayleighStiffness="0.1" rayleighMass="0.1"/>
        <CGLinearSolver iterations="25" name="linear solver" tolerance="1.0e-9" threshold="1.0e-9"/>
        <MechanicalObject name="mechanicalObject"/>
        <UniformMass totalMass="30"/>
        <RegularGridTopology name="grid" nx="10" ny="10" nz="10" computeHexaList="true" computeQuadList="false" xmin="-5" xmax="5" ymin="-5" ymax="5" zmin="-5" zmax="5"/>
        <RegularGridSpringForceField name="Springs" stiffness="100" damping="0"/>

        <Node name="Collision">
            <QuadSetTopologyContainer name="Quad_topology"/>
            <QuadSetTopologyModifier name="Modifier"/>
            <QuadSetGeometryAlgorithms name="GeomAlgo" template="Vec3d"/>
            <Hexa2QuadTopologicalMapping input="@../grid" output="@Quad_topology"/>

            <Node name="CollisionTriangles">
                <TriangleSetTopologyContainer  name="Container"/>
                <TriangleSetTopologyModifier   name="Modifier"/>
                <TriangleSetGeometryAlgorithms name="GeomAlgo"/>

                <Quad2TriangleTopologicalMapping input="@../Quad_topology" output="@Container" name="mapping_topo"/>

                <TriangleCollisionModel/>
                <LineCollisionModel/>
                <PointCollisionModel/>
            </Node>
        </Node>

    </Node>

    <Node name="Cube2">
        <EulerImplicitSolver name="cg_odesolver" rayleighStiffness="0.1" rayleighMass="0.1"/>
        <CGLinearSolver iterations="25" name="linear solver" tolerance="1.0e-9" threshold="1.0e-9"/>
        <MechanicalObject name="mechanicalObject"/>
        <UniformMass totalMass="30"/>
        <RegularGridTopology name="grid" nx="10" ny="10" nz="10" computeHexaList="true" computeQuadList="false" xmin="-4" xmax="6" ymin="10" ymax="20" zmin="-5" zmax="5"/>
        <RegularGridSpringForceField name="Springs" stiffness="100" damping="0"/>

        <Node name="Collision">
            <QuadSetTopologyContainer name="Quad_topology"/>
            <QuadSetTopologyModifier name="Modifier"/>
            <QuadSetGeometryAlgorithms name="GeomAlgo" template="Vec3d"/>
            <Hexa2QuadTopologicalMapping input="@../grid" output="@Quad_topology"/>

            <Node name="CollisionTriangles">
                <TriangleSetTopologyContainer  name="Container"/>
                <TriangleSetTopologyModifier   name="Modifier"/>
                <TriangleSetGeometryAlgorithms name="GeomAlgo"/>

                <Quad2TriangleTopologicalMapping input="@../Quad_topology" output="@Container" name="mapping_topo"/>

                <TriangleCollisionModel/>
                <LineCollisionModel/>
                <PointCollisionModel/>
            </Node>
        </Node>

    </Node>


    <Node name="Floor">
        <MeshOBJLoader name="loader" filename="mesh/SaladBowl.obj"/>
        <MeshTopology src="@loader"/>
        <MechanicalObject src="@loader" dy="-20" scale="50" rx="-90"/>
        <TriangleCollisionModel simulated="false" moving="false"/>
        <LineCollisionModel simulated="false" moving="false"/>
        <PointCollisionModel simulated="false" moving="false"/>
    </Node>

</Node>
