<Node name="root" gravity="0 -9.81 0" dt="0.04">

    <Node name="plugins">
        <RequiredPlugin name="MultiThreading"/> <!-- Needed to use components [ParallelMeshSpringForceField] -->
        <RequiredPlugin name="Sofa.Component.Constraint.Projective"/> <!-- Needed to use components [FixedConstraint] -->
        <RequiredPlugin name="Sofa.Component.Engine.Select"/> <!-- Needed to use components [BoxROI] -->
        <RequiredPlugin name="Sofa.Component.IO.Mesh"/> <!-- Needed to use components [MeshOBJLoader] -->
        <RequiredPlugin name="Sofa.Component.Mapping.Linear"/> <!-- Needed to use components [IdentityMapping] -->
        <RequiredPlugin name="Sofa.Component.SolidMechanics.Spring"/> <!-- Needed to use components [MeshSpringForceField] -->
        <RequiredPlugin name="Sofa.Component.StateContainer"/> <!-- Needed to use components [MechanicalObject] -->
        <RequiredPlugin name="Sofa.Component.Topology.Container.Dynamic"/> <!-- Needed to use components [HexahedronSetGeometryAlgorithms, QuadSetTopologyContainer, QuadSetTopologyModifier] -->
        <RequiredPlugin name="Sofa.Component.Topology.Container.Grid"/> <!-- Needed to use components [RegularGridTopology] -->
        <RequiredPlugin name="Sofa.Component.Topology.Mapping"/> <!-- Needed to use components [Hexa2QuadTopologicalMapping] -->
        <RequiredPlugin name="Sofa.Component.Visual"/> <!-- Needed to use components [VisualStyle] -->
        <RequiredPlugin name="Sofa.GL.Component.Rendering3D"/> <!-- Needed to use components [OglModel] -->
        <RequiredPlugin name="Sofa.Component.Mass"/> <!-- Needed to use components [UniformMass] -->
        <RequiredPlugin name="Sofa.Component.LinearSolver.Iterative"/> <!-- Needed to use components [CGLinearSolver] -->
        <RequiredPlugin name="Sofa.Component.ODESolver.Backward"/> <!-- Needed to use components [EulerImplicitSolver] -->
    </Node>


    <VisualStyle displayFlags="showBehaviorModels hideForceFields" />
    <DefaultAnimationLoop computeBoundingBox="false"/>

    <Node name="DeformableObject">

        <EulerImplicitSolver name="odeSolver"/>
        <CGLinearSolver iterations="25" name="linearSolver" tolerance="1.0e-9" threshold="1.0e-9" />

        <MechanicalObject name="dofs"/>

        <RegularGridTopology name="topology" nx="16" ny="16" nz="44" xmin="-1.5" xmax="1.5" ymin="-1.5" ymax="1.5" zmin="0" zmax="10" />
        <HexahedronSetGeometryAlgorithms/>
        <UniformMass totalMass="150"/>

        <BoxROI box="-1.5 -1.5 0 1.5 1.5 0.0001" name="box"/>
        <FixedConstraint indices="@box.indices" />
        <ParallelMeshSpringForceField stiffness="3E2" drawSpringSize="1"/>

        <Node name="visual">
            <QuadSetTopologyContainer  name="Container" />
            <QuadSetTopologyModifier/>
            <Hexa2QuadTopologicalMapping input="@../topology" output="@Container" />
            <OglModel name="Visual" color="yellow" quads="@Container.quads" />
            <IdentityMapping input="@../dofs" output="@Visual" />
        </Node>

    </Node>

    <Node name="floor-visual">
        <MeshOBJLoader name="meshLoader" filename="mesh/floorFlat.obj" scale3d="0.5 0.5 0.5"/>
        <OglModel src="@meshLoader" dy="-8" dz="10"/>
        <OglModel src="@meshLoader" rx="90" dy="2"/>
    </Node>
</Node>
