# -*- coding: utf-8 -*-
"""
Templates for rendering.
"""
import Sofa
from splib.objectmodel import SofaPrefab, SofaObject
from stlib.scene import Node

__all__ = []


def ShowGrid(node):
    node.createObject("OglGrid", nbSubdiv=10, size=1000)


@SofaPrefab
class VisualModel(SofaObject):
    """VisualModel Prefab

       This prefab is creating a VisualModel.

       Arguments:
            parent
            surfaceMeshFileName
            name
            color
            rotation
            translation
            scale

       Content:
           Node
           {
                name : 'Visual'
                MeshLoader : 'loader'
                OglModel : "model'
           }
    """

    def __init__(self, parent, surfaceMeshFileName, name="VisualModel", color=[1., 1., 1.], rotation=[0., 0., 0.], translation=[0., 0., 0.], scale=[1., 1., 1.]):
        self.node = Node(parent, name)

        if not self.getRoot().getObject("SofaOpenglVisual", warning=False):
            if not self.getRoot().getObject("/Config/SofaOpenglVisual", warning=False):
                    Sofa.msg_info("Missing RequiredPlugin SofaOpenglVisual in the scene, add it from Prefab VisualModel.")
                    self.getRoot().createObject("RequiredPlugin", name="SofaOpenglVisual")

        if surfaceMeshFileName.endswith(".stl"):
            self.loader = self.node.createObject('MeshSTLLoader',
                                                 name="loader",
                                                 filename=surfaceMeshFileName)
        elif surfaceMeshFileName.endswith(".obj"):
            self.loader = self.node.createObject('MeshObjLoader',
                                                 name="loader",
                                                 filename=surfaceMeshFileName)
        else:
            print("Extension not handled in STLIB/python/stlib/visuals for file: "+str(surfaceMeshFileName))

        self.model = self.node.createObject('OglModel',
                                            name="model",
                                            src="@loader",
                                            rotation=rotation,
                                            translation=translation,
                                            scale3d=scale,
                                            color=color, updateNormals=False)
