<Node dt="0.001" showBehaviorModels="1" showCollisionModels="0" showMappings="0" showForceFields="0" gravity="0 -5 0" >
    <RequiredPlugin name="SofaOpenglVisual"/>
    <RequiredPlugin name="CUDA computing" pluginName="SofaCUDA" />
<!--  <MultiStepAnimationLoop integrationSteps="2" /> -->
	<Node name="fluid">
		<CentralDifferenceSolver/>
<!--
		<RungeKutta4Solver/>
		<EulerImplicitSolver rayleighMass="0" rayleighStiffness="0" />
		<CGLinearSolver tolerance="1.0e-20" threshold="1.0e-12"/>
-->
		<MechanicalObject name="MModel" template="CudaVec3f" reserve="32000" />
		<ParticleSource name="Source01"
		        center="0.28287 -0.209161 0
 0.554265 0.481018 0
 -0.852869 0.337623 0
 -0.0922326 0.736642 0
 -0.647894 -0.64072 0
 -0.0326723 -0.299477 0
 -0.892666 -0.173034 0
 -0.640321 0.656432 0
 0.651302 -0.396124 0
 -0.407254 0.598976 0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"		        translation="3 9 0" radius="0 0 0" velocity="0 0 -15" delay="0.013333" start="-0.04" stop="4" />

		<UniformMass name="M1" mass="1" />
        <!--<WashingMachineForceField size="16 16 16" center="3 8 -8" speed="0" damping="0" />-->
		<PlaneForceField damping="0" normal="1 0 0" d="-5" />
		<PlaneForceField damping="0" normal="-1 0 0" d="-11" />
		<PlaneForceField damping="0" normal="0 1 0" d="0" />
		<PlaneForceField damping="0" normal="0 -1 0" d="-16" />
		<PlaneForceField damping="0" normal="0 0 1" d="-16" />
		<PlaneForceField damping="0" normal="0 0 -1" d="0" />
		<SpatialGridContainer cellWidth="0.4" />
		<SPHFluidForceField radius="0.4" density="175" viscosity="10" pressure="1000" surfaceTension="0" />
<!--
		<Node id="Visual">
			<OglModel name="VModel" color="blue" />
			<SPHFluidSurfaceMapping name="MarchingCube" input="@../MModel" output="@VModel" isoValue="0.5" radius="0.4" step="0.2"/>
		</Node>
-->
	</Node>
</Node>
