<Node name="root" dt="0.01">
    <RequiredPlugin name="Sofa.Component.Collision.Detection.Algorithm"/> <!-- Needed to use components [BVHNarrowPhase BruteForceBroadPhase CollisionPipeline] -->
    <RequiredPlugin name="Sofa.Component.Collision.Detection.Intersection"/> <!-- Needed to use components [NewProximityIntersection] -->
    <RequiredPlugin name="Sofa.Component.Collision.Geometry"/> <!-- Needed to use components [TriangleCollisionModel] -->
    <RequiredPlugin name="Sofa.Component.Collision.Response.Contact"/> <!-- Needed to use components [DefaultContactManager] -->
    <RequiredPlugin name="Sofa.Component.IO.Mesh"/> <!-- Needed to use components [MeshGmshLoader MeshOBJLoader] -->
    <RequiredPlugin name="Sofa.Component.LinearSolver.Iterative"/> <!-- Needed to use components [CGLinearSolver] -->
    <RequiredPlugin name="Sofa.Component.Mapping.Linear"/> <!-- Needed to use components [BarycentricMapping] -->
    <RequiredPlugin name="Sofa.Component.Mass"/> <!-- Needed to use components [UniformMass] -->
    <RequiredPlugin name="Sofa.Component.ODESolver.Backward"/> <!-- Needed to use components [EulerImplicitSolver] -->
    <RequiredPlugin name="Sofa.Component.SolidMechanics.FEM.Elastic"/> <!-- Needed to use components [TetrahedronFEMForceField] -->
    <RequiredPlugin name="Sofa.Component.SolidMechanics.TensorMass"/> <!-- Needed to use components [TetrahedralTensorMassForceField] -->
    <RequiredPlugin name="Sofa.Component.StateContainer"/> <!-- Needed to use components [MechanicalObject] -->
    <RequiredPlugin name="Sofa.Component.Topology.Container.Constant"/> <!-- Needed to use components [MeshTopology] -->
    <RequiredPlugin name="Sofa.GL.Component.Rendering3D"/> <!-- Needed to use components [OglModel] -->
    <CollisionPipeline depth="6" verbose="0" draw="0" />
    <BruteForceBroadPhase/>
    <BVHNarrowPhase/>
    <NewProximityIntersection name="Proximity" alarmDistance="0.3" contactDistance="0.2" />
    <DefaultContactManager name="Response" response="PenalityContactForceField" />
    <Node name="ChainFEM">
        <Node name="TorusFixed">
            <MeshOBJLoader name="loader" filename="mesh/torus2_for_collision.obj" />
            <MeshTopology src="@loader" />
            <MechanicalObject src="@loader" />
            <TriangleCollisionModel simulated="0" moving="0" />
            <MeshOBJLoader name="meshLoader_3" filename="mesh/torus2.obj" handleSeams="1" />
            <OglModel name="Visual" src="@meshLoader_3" color="gray" />
        </Node>
        <Node name="TorusTensorMass">
            <EulerImplicitSolver name="cg_odesolver" printLog="false"  rayleighStiffness="0.1" rayleighMass="0.1" />
            <CGLinearSolver iterations="25" name="linear solver" tolerance="1.0e-9" threshold="1.0e-9" />
            <MeshGmshLoader name="loader" filename="mesh/torus_low_res.msh" createSubelements="true"/>
            <MeshTopology src="@loader" />
            <MechanicalObject src="@loader" dx="2.5" template="Vec3d" />
            <UniformMass totalMass="5" />
            <TetrahedralTensorMassForceField name="FEM" youngModulus="1000" poissonRatio="0.4" />
            <Node name="Visu">
                <MeshOBJLoader name="meshLoader_0" filename="mesh/torus.obj" handleSeams="1" />
                <OglModel name="Visual" src="@meshLoader_0" color="red" dx="2.5" />
                <BarycentricMapping input="@.." output="@Visual" />
            </Node>
            <Node name="Surf2">
                <MeshOBJLoader name="loader" filename="mesh/torus_for_collision.obj" />
                <MeshTopology src="@loader" />
                <MechanicalObject src="@loader" dx="2.5" />
                <TriangleCollisionModel />
                <BarycentricMapping />
            </Node>
        </Node>
        <Node name="TorusFEM_POLAR">
            <EulerImplicitSolver name="cg_odesolver" printLog="false" />
            <CGLinearSolver iterations="25" name="linear solver" tolerance="1.0e-9" threshold="1.0e-9" />
            <MeshGmshLoader name="loader" filename="mesh/torus2_low_res.msh" createSubelements="true"/>
            <MeshTopology src="@loader" />
            <MechanicalObject src="@loader" dx="5" />
            <UniformMass totalMass="5" />
            <TetrahedronFEMForceField name="FEM" youngModulus="1000" poissonRatio="0.4" computeGlobalMatrix="false" method="polar" />
            <Node name="Visu">
                <MeshOBJLoader name="meshLoader_2" filename="mesh/torus2.obj" handleSeams="1" />
                <OglModel name="Visual" src="@meshLoader_2" color="blue" dx="5" />
                <BarycentricMapping input="@.." output="@Visual" />
            </Node>
            <Node name="Surf2">
                <MeshOBJLoader name="loader" filename="mesh/torus2_for_collision.obj" />
                <MeshTopology src="@loader" />
                <MechanicalObject src="@loader" dx="5" />
                <TriangleCollisionModel />
                <BarycentricMapping />
            </Node>
        </Node>
        <Node name="TorusFEM_SVD">
            <EulerImplicitSolver name="cg_odesolver" printLog="false" />
            <CGLinearSolver iterations="25" name="linear solver" tolerance="1.0e-9" threshold="1.0e-9" />
            <MeshGmshLoader name="loader" filename="mesh/torus_low_res.msh" createSubelements="true" />
            <MeshTopology src="@loader" />
            <MechanicalObject src="@loader" dx="7.5" />
            <UniformMass totalMass="5" />
            <TetrahedronFEMForceField name="FEM" youngModulus="1000" poissonRatio="0.4" computeGlobalMatrix="false" method="svd" />
            <Node name="Visu">
                <MeshOBJLoader name="meshLoader_1" filename="mesh/torus.obj" handleSeams="1" />
                <OglModel name="Visual" src="@meshLoader_1" color="yellow" dx="7.5" />
                <BarycentricMapping input="@.." output="@Visual" />
            </Node>
            <Node name="Surf2">
                <MeshOBJLoader name="loader" filename="mesh/torus_for_collision.obj" />
                <MeshTopology src="@loader" />
                <MechanicalObject src="@loader" dx="7.5" />
                <TriangleCollisionModel />
                <BarycentricMapping />
            </Node>
        </Node>
    </Node>
</Node>
