<?xml version="1.0"?>
<Node name="root" dt="0.01" gravity="0 -9 0">
    <RequiredPlugin name="Sofa.Component.Collision.Detection.Algorithm"/> <!-- Needed to use components [BVHNarrowPhase BruteForceBroadPhase CollisionPipeline] -->
    <RequiredPlugin name="Sofa.Component.Collision.Detection.Intersection"/> <!-- Needed to use components [MinProximityIntersection] -->
    <RequiredPlugin name="Sofa.Component.Collision.Response.Contact"/> <!-- Needed to use components [DefaultContactManager] -->
    <RequiredPlugin name="Sofa.Component.Constraint.Projective"/> <!-- Needed to use components [FixedConstraint] -->
    <RequiredPlugin name="Sofa.Component.Engine.Select"/> <!-- Needed to use components [BoxROI] -->
    <RequiredPlugin name="Sofa.Component.LinearSolver.Iterative"/> <!-- Needed to use components [CGLinearSolver] -->
    <RequiredPlugin name="Sofa.Component.Mapping.Linear"/> <!-- Needed to use components [IdentityMapping] -->
    <RequiredPlugin name="Sofa.Component.Mass"/> <!-- Needed to use components [UniformMass] -->
    <RequiredPlugin name="Sofa.Component.ODESolver.Backward"/> <!-- Needed to use components [EulerImplicitSolver] -->
    <RequiredPlugin name="Sofa.Component.SolidMechanics.Spring"/> <!-- Needed to use components [MeshSpringForceField] -->
    <RequiredPlugin name="Sofa.Component.StateContainer"/> <!-- Needed to use components [MechanicalObject] -->
    <RequiredPlugin name="Sofa.Component.Topology.Container.Dynamic"/> <!-- Needed to use components [TetrahedronSetTopologyContainer TetrahedronSetTopologyModifier] -->
    <RequiredPlugin name="Sofa.Component.Topology.Container.Grid"/> <!-- Needed to use components [RegularGridTopology] -->
    <RequiredPlugin name="Sofa.Component.Topology.Mapping"/> <!-- Needed to use components [Hexa2TetraTopologicalMapping] -->
    <RequiredPlugin name="Sofa.Component.Visual"/> <!-- Needed to use components [VisualStyle] -->
    <RequiredPlugin name="Sofa.GL.Component.Rendering3D"/> <!-- Needed to use components [OglModel] -->
    <RequiredPlugin name="SofaCUDA"/> <!-- Needed to use components [BoxROI FixedConstraint IdentityMapping MechanicalObject MeshSpringForceField UniformMass] -->

    <VisualStyle displayFlags="showBehaviorModels" />

    <DefaultAnimationLoop/>
	<DefaultVisualManagerLoop/>
	<CollisionPipeline depth="6" verbose="0" draw="0"/>
	<BruteForceBroadPhase/>
    <BVHNarrowPhase/>
	<MinProximityIntersection name="Proximity" alarmDistance="0.5" contactDistance="0.3" />
	<DefaultContactManager name="Response" response="PenalityContactForceField" />

    <Node name="Beam">
        <RegularGridTopology name="grid" n="40 10 10" min="0 6 -2" max="16 10 2" />
        <TetrahedronSetTopologyContainer name="BeamTopo" />
        <TetrahedronSetTopologyModifier name="Modifier" />

        <Hexa2TetraTopologicalMapping input="@grid" output="@BeamTopo" />
    </Node>

    <Node name="MeshSpringForceField-GPU-Green">
        <EulerImplicitSolver name="cg_odesolver"  printLog="0" />
        <CGLinearSolver name="linear solver"  iterations="20"  tolerance="1e-06"  threshold="1e-06" />

        <MechanicalObject position="@../Beam/grid.position" name="Volume" template="CudaVec3f"/>
        <TetrahedronSetTopologyContainer name="Container" src="@../Beam/BeamTopo"/>
        <TetrahedronSetTopologyModifier name="Modifier" />

        <BoxROI name="ROI1" box="-0.1 5 -3 0.1 11 3" drawBoxes="1" />
        <FixedConstraint indices="@ROI1.indices" />

        <UniformMass totalMass="100" />
        <MeshSpringForceField name="Springs" tetrasStiffness="1200" tetrasDamping="0" template="CudaVec3f"/>

        <Node name="MeshVisu">
			<OglModel name="Visual" topology="@../Container" position="@../Volume.position" color="green"/>
			<IdentityMapping input="@../Volume" output="@Visual" />
		</Node>
    </Node>

    <Node name="MeshSpringCPU">
        <EulerImplicitSolver name="cg_odesolver"  printLog="0" />
        <CGLinearSolver name="linear solver"  iterations="20"  tolerance="1e-06"  threshold="1e-06" />

        <MechanicalObject position="@../Beam/grid.position" name="Volume" template="Vec3"/>
        <TetrahedronSetTopologyContainer name="Container" src="@../Beam/BeamTopo"/>
        <TetrahedronSetTopologyModifier name="Modifier" />

        <BoxROI name="ROI1" box="-0.1 5 -3 0.1 11 3" drawBoxes="1" />
        <FixedConstraint indices="@ROI1.indices" />

        <UniformMass totalMass="100" />

        <MeshSpringForceField name="Springs" tetrasStiffness="1200" tetrasDamping="0" template="Vec3"/>

        <Node name="MeshVisu">
			<OglModel name="Visual" topology="@../Container" position="@../Volume.position" color="red"/>
			<IdentityMapping input="@../Volume" output="@Visual" />
		</Node>
    </Node>
</Node>
