<?xml version="1.0" ?>
<Node name="root" gravity="0 -9 -1" dt="0.01">
    <RequiredPlugin name="Sofa.Component.Collision.Detection.Algorithm"/> <!-- Needed to use components [BVHNarrowPhase BruteForceBroadPhase CollisionPipeline] -->
    <RequiredPlugin name="Sofa.Component.Collision.Detection.Intersection"/> <!-- Needed to use components [DiscreteIntersection] -->
    <RequiredPlugin name="Sofa.Component.Collision.Response.Contact"/> <!-- Needed to use components [DefaultContactManager] -->
    <RequiredPlugin name="Sofa.Component.Constraint.Projective"/> <!-- Needed to use components [FixedConstraint] -->
    <RequiredPlugin name="Sofa.Component.LinearSolver.Iterative"/> <!-- Needed to use components [CGLinearSolver] -->
    <RequiredPlugin name="Sofa.Component.Mapping.Linear"/> <!-- Needed to use components [IdentityMapping] -->
    <RequiredPlugin name="Sofa.Component.Mass"/> <!-- Needed to use components [DiagonalMass] -->
    <RequiredPlugin name="Sofa.Component.ODESolver.Backward"/> <!-- Needed to use components [EulerImplicitSolver] -->
    <RequiredPlugin name="Sofa.Component.SolidMechanics.FEM.Elastic"/> <!-- Needed to use components [TriangularFEMForceFieldOptim] -->
    <RequiredPlugin name="Sofa.Component.StateContainer"/> <!-- Needed to use components [MechanicalObject] -->
    <RequiredPlugin name="Sofa.Component.Topology.Container.Dynamic"/> <!-- Needed to use components [TriangleSetGeometryAlgorithms TriangleSetTopologyContainer TriangleSetTopologyModifier] -->
    <RequiredPlugin name="Sofa.Component.Topology.Container.Grid"/> <!-- Needed to use components [RegularGridTopology] -->
    <RequiredPlugin name="Sofa.Component.Visual"/> <!-- Needed to use components [VisualStyle] -->
    <RequiredPlugin name="Sofa.GL.Component.Rendering3D"/> <!-- Needed to use components [OglModel] -->
    <RequiredPlugin name="SofaCUDA"/> <!-- Needed to use components [DiagonalMass FixedConstraint IdentityMapping MechanicalObject TriangleSetGeometryAlgorithms TriangularFEMForceFieldOptim] -->

    <VisualStyle displayFlags="showBehaviorModels showVisual" />

    <DefaultAnimationLoop />
    <DefaultVisualManagerLoop />
    <CollisionPipeline verbose="0" />
    <BruteForceBroadPhase/>
    <BVHNarrowPhase/>
    <DefaultContactManager response="PenalityContactForceField" />
    <DiscreteIntersection/>

    <RegularGridTopology name="tissue" n="100 100 1" min="0 0 0" max="10 10 0" />

    <Node name="TriangularFEMForceFieldOptim-GPU-Green">
        <EulerImplicitSolver name="cg_odesolver" rayleighStiffness="0.1" rayleighMass="0.1" />
        <CGLinearSolver iterations="20" name="linear solver" tolerance="1.0e-6" threshold="1.0e-6" />

        <MechanicalObject position="@../tissue.position" name="dofs" template="CudaVec3f"/>

        <TriangleSetTopologyContainer name="Container" src="@../tissue"/>
        <TriangleSetTopologyModifier name="Modifier" />
        <TriangleSetGeometryAlgorithms name="GeomAlgo" template="CudaVec3f" />

        <DiagonalMass massDensity="0.15" template="CudaVec3f,CudaVec3f"/>
        <FixedConstraint indices="9900 9901 9902 9903 9996 9997 9998 9999" />

        <TriangularFEMForceFieldOptim name="FEM" youngModulus="600" poissonRatio="0.3" method="large" template="CudaVec3f"/>

        <Node name="Visu">
            <OglModel name="Visual" color="green" />
            <IdentityMapping input="@../dofs" output="@Visual" />
        </Node>
    </Node>


    <Node name="TriangularFEMForceFieldOptim-CPU-red">
        <EulerImplicitSolver name="cg_odesolver" rayleighStiffness="0.1" rayleighMass="0.1" />
        <CGLinearSolver iterations="20" name="linear solver" tolerance="1.0e-6" threshold="1.0e-6" />

        <MechanicalObject position="@../tissue.position" name="dofs" template="Vec3"/>

        <TriangleSetTopologyContainer name="Container" src="@../tissue"/>
        <TriangleSetTopologyModifier name="Modifier" />
        <TriangleSetGeometryAlgorithms name="GeomAlgo" template="Vec3" />

        <DiagonalMass massDensity="0.15" template="Vec3,Vec3"/>
        <FixedConstraint indices="9900 9901 9902 9903 9996 9997 9998 9999" />

        <TriangularFEMForceFieldOptim name="FEM" youngModulus="600" poissonRatio="0.3" method="large" template="Vec3"/>

        <Node name="Visu">
            <OglModel name="Visual" color="red" />
            <IdentityMapping input="@../dofs" output="@Visual" />
        </Node>
    </Node>
</Node>
