<Node dt="0.04" gravity="0 -10 0">
    <VisualStyle displayFlags="showForceFields showCollisionModels showMappings" />
    <RequiredPlugin name="Sofa.Component.Visual"/> <!-- Needed to use components [VisualStyle] -->
    <RequiredPlugin name="SofaEulerianFluid"/> <!-- Needed to use components [Fluid2D] -->

    <Fluid2D nx="32" ny="32" tstart="30" tstop="60" height="15.5" dir="1 0" />
</Node>
