<Node   name="Root" gravity="0 -10 0" time="0" animate="0"  dt="0.01" >
    <RequiredPlugin name="Sofa.Component.AnimationLoop"/> <!-- Needed to use components [FreeMotionAnimationLoop] -->
    <RequiredPlugin name="Sofa.Component.Constraint.Lagrangian.Correction"/> <!-- Needed to use components [GenericConstraintCorrection] -->
    <RequiredPlugin name="Sofa.Component.Constraint.Lagrangian.Model"/> <!-- Needed to use components [UniformConstraint] -->
    <RequiredPlugin name="Sofa.Component.Constraint.Lagrangian.Solver"/> <!-- Needed to use components [GenericConstraintSolver] -->
    <RequiredPlugin name="Sofa.Component.Constraint.Projective"/> <!-- Needed to use components [FixedConstraint] -->
    <RequiredPlugin name="Sofa.Component.Engine.Transform"/> <!-- Needed to use components [TransformEngine] -->
    <RequiredPlugin name="Sofa.Component.IO.Mesh"/> <!-- Needed to use components [StringMeshCreator] -->
    <RequiredPlugin name="Sofa.Component.LinearSolver.Direct"/> <!-- Needed to use components [SparseCholeskySolver] -->
    <RequiredPlugin name="Sofa.Component.Mapping.MappedMatrix"/> <!-- Needed to use components [MappingGeometricStiffnessForceField] -->
    <RequiredPlugin name="Sofa.Component.Mapping.NonLinear"/> <!-- Needed to use components [DistanceMapping] -->
    <RequiredPlugin name="Sofa.Component.Mass"/> <!-- Needed to use components [DiagonalMass] -->
    <RequiredPlugin name="Sofa.Component.ODESolver.Backward"/> <!-- Needed to use components [EulerImplicitSolver] -->
    <RequiredPlugin name="Sofa.Component.StateContainer"/> <!-- Needed to use components [MechanicalObject] -->
    <RequiredPlugin name="Sofa.Component.Topology.Container.Dynamic"/> <!-- Needed to use components [EdgeSetGeometryAlgorithms EdgeSetTopologyContainer] -->
    <RequiredPlugin name="Sofa.Component.Visual"/> <!-- Needed to use components [VisualStyle] -->
    <RequiredPlugin name="SofaMatrix"/> <!-- Needed to use components [ComplianceMatrixExporter] -->

    <VisualStyle displayFlags="hideVisualModels showBehaviorModels showMappings showForceFields" />
    <FreeMotionAnimationLoop solveVelocityConstraintFirst="true" />
    <GenericConstraintSolver tolerance="1e-9" maxIterations="1000"/>
    <ComplianceMatrixExporter exportEveryNumberOfSteps="1" filename="compliance" printLog="true" format="csv" precision="12"/>

    <StringMeshCreator name="loader" resolution="20" scale3d="1 1 1" />

    <TransformEngine name="translate" input_position="@loader.position" translation="0 0 0" />
    <EulerImplicitSolver />
    <SparseCholeskySolver />
    <GenericConstraintCorrection />

    <EdgeSetTopologyContainer position="@translate.output_position" edges="@loader.edges" />
    <MechanicalObject name="defoDOF" template="Vec3d" showObject="1" />
    <EdgeSetGeometryAlgorithms drawEdges="true" />
    <FixedConstraint indices="0" />
    <DiagonalMass  name="mass" totalMass="1e-3"/>
    <Node name="extensionsNode" >
        <MechanicalObject template="Vec1d"  name="extensionsDOF" />
        <DistanceMapping  name="distanceMapping" />
        <UniformConstraint template="Vec1d" iterative="false" />
    </Node>

</Node>
