<?xml version="1.0" ?>
<Node name="root" gravity="0 -9.81 0" dt="0.001">

<!--	<FreeMotionAnimationLoop/>
	<GenericConstraintSolver printLog="1"/>-->

	<VisualStyle displayFlags="showCollision showVisualModels showForceFields showInteractionForceFields showBehaviorModels" />
    <DefaultPipeline name="CollisionPipeline" verbose="0" />
    <BruteForceBroadPhase />
    <BVHNarrowPhase/>
    <DefaultContactManager name="collision response" response="default" />

    <Node name="object">
        <EulerImplicitSolver name="cg_odesolver" firstOrder="true" rayleighStiffness="0" rayleighMass="0" />
<!--         <EulerSolver name="cg_odesolver"  /> -->
<!--        <CGLinearSolver iterations="150" threshold="1e-20" tolerance="1e-20"/> -->
 		<PCGLinearSolver preconditioners="slu" tolerance="1e-15"/>
        <SparseLDLSolver name="slu"/>


		<MechanicalObject template="Rigid3" name="DOFs"
		position="
		-40 0 0 0 0 0 1
		-30 0 0 0 0 0 1
		-20 0 0 0 0 0 1
		-10 0 0 0 0 0 1
		0 0 0 0 0 0 1
		10 0 0 0 0 0 1
		20 0 0 0 0 0 1
		30 0 0 0 0 0 1
		40 0 0 0 0 0 1
		50 0 0 0 0 0 1
		60 0 0 0 0 0 1
		70 0 0 0 0 0 1
		80 0 0 0 0 0 1
		90 0 0 0 0 0 1
		100 0 0 0 0 0 1
		110 0 0 0 0 0 1
		120 0 0 0 0 0 1
		130 0 0 0 0 0 1
		140 0 0 0 0 0 1
		150 0 0 0 0 0 1
		160 0 0 0 0 0 1
		 "/>

        <UniformMass  totalMass="1" showAxisSizeFactor="10"/>
<!-- 		<ConstantForceField force="0 -9.81 0 0 0 0" points="1"/> -->
		<PREquivalentStiffnessForceField complianceFile="./cIntervertebra.txt" />
        <FixedConstraint  name="FixedConstraint" indices="0" />

<!-- 		<PartialRigidificationConstraint /> -->

<!-- 		<LinearSolverConstraintCorrection solverName="slu"/> -->

<!--		<Node name='collision'>
			<PointSetTopologyContainer position="1 1 0" />
			<MechanicalObject template="Vec3" />
			<Point/>
			<RigidMapping index="2" />
		</Node>	-->


    </Node>

</Node>
