import Sofa


def createScene(rootNode):
    rootNode.addObject('VisualStyle', displayFlags='showForceFields')
    rootNode.addObject('RequiredPlugin', pluginName='SoftRobots SofaPython3')
    rootNode.findData('gravity').value = [-9810, 0, 0];

    finger = rootNode.addChild('finger')
    finger.addObject('MeshVTKLoader', name='loader', filename='data/mesh/pneunetCutCoarse.vtk')
    finger.addObject('MeshTopology', src='@loader', name='container')
    finger.addObject('MechanicalObject', name='tetras', template='Vec3', showObject=True, showObjectScale=1)
    finger.addObject('TetrahedronFEMForceField', template='Vec3', name='FEM', method='large', poissonRatio=0.3,
                     youngModulus=500)
    finger.addObject('UniformMass', totalMass=0.0008)
    finger.addObject('BoxROI', name='boxROISubTopo', box=[-100, 22.5, -8, -19, 28, 8], drawBoxes=True, strict=False)

    modelSubTopo = finger.addChild('modelSubTopo')
    modelSubTopo.addObject('MeshTopology', position='@loader.position', tetrahedra='@boxROISubTopo.tetrahedraInROI',
                           name='container')
    modelSubTopo.addObject('TetrahedronFEMForceField', template='Vec3', name='FEM', method='large', poissonRatio=0.3,
                           youngModulus=1500)
