<?xml version="1.0"?>
<Node name="root" gravity="0 0 0" dt=".1"  >
  <Node name="plugins">
      <RequiredPlugin name="Sofa.Component.IO.Mesh"/> <!-- Needed to use components [MeshOBJLoader] -->
      <RequiredPlugin name="Sofa.Component.Visual"/> <!-- Needed to use components [VisualStyle] -->
      <RequiredPlugin name="Sofa.GL.Component.Rendering3D"/> <!-- Needed to use components [OglModel] -->
      <RequiredPlugin name="image"/> <!-- Needed to use components [ImageContainer ImageFilter ImageViewer MeshToImageEngine] -->
  </Node>
  <VisualStyle displayFlags="showVisual showBehaviorModels" />
  <MeshOBJLoader name="mesh1" filename="mesh/bubille_in1.obj" triangulate="1"/>
  <MeshOBJLoader name="mesh2" filename="mesh/bubille_in2.obj" triangulate="1"/>
  <MeshOBJLoader name="mesh3" filename="mesh/bubille_out.obj" triangulate="1"/>


  <Node name="Voxelizing several meshes in one image (the prefered solution in most cases)" >


    <!-- First, rasterize outside and 1 ball with multiple values -->
    <MeshToImageEngine template="ImageD" name="rasterizer"  nbMeshes="3"
    value="0.6785495351 0.72176664 0.2358868495 0.7430070741 0.3192342278 0.7154783425 0.2718139729 0.6173636876 0.2299708673 0.672005909 0.3633306473 0.7020061249 0.5216139178 0.6472131857 0.3975833338 0.4226887743 0.5727392146 0.9566237102 0.8555261833 0.4275386017 0.7198202829 0.4009340731 0.9797545508 0.6385396258 0.4768794323 0.0640451512 0.978210899 0.837158605 0.551828166 0.5539513445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" position="@../mesh3.position" triangles="@../mesh3.triangles" insideValue="0"
    value2="0.5" position2="@../mesh2.position" triangles2="@../mesh2.triangles" insideValue2="0"
    value3="1" position3="@../mesh1.position" triangles3="@../mesh1.triangles" insideValue3="0"
    voxelSize="0.2 0.2 0.2" padSize="2" rotateImage="false" printLog="true" />


    <!-- Then diffuse weights inside the meshes -->
    <ImageFilter template="ImageD,ImageD" name="diffusion" inputImage="@rasterizer.image" inputTransform="@rasterizer.transform" filter="23"  param="10000 1 1 1e-7" printLog="true"/>

    <ImageContainer template="ImageD" name="image" inputImage="@diffusion.outputImage" inputTransform="@diffusion.outputTransform" drawBB="false"/>

    <ImageViewer template="ImageD" name="viewer" src="@image" />


    <Node name="Visu">
        <MeshOBJLoader name="meshLoader_0" filename="mesh/bubille_8x8x16.obj" handleSeams="1" />
        <OglModel name="Gelatin" src="@meshLoader_0" color="0.1 .8 .3 .05" />
<MeshOBJLoader name="meshLoader_1" filename="mesh/bubille_in1.obj" handleSeams="1" />
<!--         <OglModel name="Ball1" src="@meshLoader_1" color="1 0 0 .2" /> -->
<MeshOBJLoader name="meshLoader_2" filename="mesh/bubille_in2.obj" handleSeams="1" />
<!--         <OglModel name="Ball2" src="@meshLoader_2" color="0 0 1 .2" /> -->
    </Node>

  </Node>

</Node>
