<?xml version="1.0"?>
<Node 	name="root" gravity="0 0 0" dt="1"  >
  <Node name="plugins">
      <RequiredPlugin name="Sofa.Component.IO.Mesh"/> <!-- Needed to use components [MeshOBJLoader] -->
      <RequiredPlugin name="Sofa.Component.LinearSolver.Iterative"/> <!-- Needed to use components [CGLinearSolver] -->
      <RequiredPlugin name="Sofa.Component.Mapping.Linear"/> <!-- Needed to use components [BarycentricMapping] -->
      <RequiredPlugin name="Sofa.Component.Mass"/> <!-- Needed to use components [UniformMass] -->
      <RequiredPlugin name="Sofa.Component.ODESolver.Backward"/> <!-- Needed to use components [EulerImplicitSolver] -->
      <RequiredPlugin name="Sofa.Component.SolidMechanics.FEM.Elastic"/> <!-- Needed to use components [HexahedronFEMForceField] -->
      <RequiredPlugin name="Sofa.Component.StateContainer"/> <!-- Needed to use components [MechanicalObject] -->
      <RequiredPlugin name="Sofa.Component.Topology.Container.Constant"/> <!-- Needed to use components [MeshTopology] -->
      <RequiredPlugin name="Sofa.Component.Visual"/> <!-- Needed to use components [VisualStyle] -->
      <RequiredPlugin name="Sofa.GL.Component.Rendering3D"/> <!-- Needed to use components [OglModel] -->
      <RequiredPlugin name="image"/> <!-- Needed to use components [ImageContainer ImageSampler ImageViewer MeshToImageEngine] -->
  </Node>
  <VisualStyle displayFlags="showVisual" />

  <MeshOBJLoader name="mesh" filename="mesh/Armadillo_simplified.obj" triangulate="1"/>
  <MeshToImageEngine  name="rasterizer" src="@mesh" voxelSize="1.5" padSize="1" rotateImage="true" />
  <ImageContainer template="ImageB" name="image" src="@rasterizer" />
  <ImageViewer template="ImageB" name="viewer" src="@image"  />
  <ImageSampler template="ImageB" name="sampler" src="@image" param="1" showEdges="true" printLog="true"/>

  <Node name="simu"  >
	  <EulerImplicitSolver rayleighMass="1" rayleighStiffness="0.03" />
	  <CGLinearSolver iterations="25" tolerance="1e-5" threshold="1e-5"/>
	  <MeshTopology  src="@../sampler" />
	  <MechanicalObject  />
          <UniformMass totalMass="1000.0" />

          <HexahedronFEMForceField youngModulus="30.0" poissonRatio="0.3" method="large" updateStiffnessMatrix="false" />

	  <Node name="Visual"  >
	     <MeshOBJLoader name="meshLoader_0" filename="mesh/Armadillo_simplified.obj" handleSeams="1" />
	     <OglModel src="@meshLoader_0"   />
	     <BarycentricMapping input="@.." output="@." />
	  </Node>
  </Node>

</Node>
