<?xml version="1.0" ?>
<Node name="root" dt="0.01" gravity="0 10 0">
    <RequiredPlugin name="Sofa.Component.Collision.Detection.Algorithm"/> <!-- Needed to use components [CollisionPipeline] -->
    <RequiredPlugin name="Sofa.Component.Constraint.Projective"/> <!-- Needed to use components [FixedConstraint] -->
    <RequiredPlugin name="Sofa.Component.LinearSolver.Iterative"/> <!-- Needed to use components [CGLinearSolver] -->
    <RequiredPlugin name="Sofa.Component.Mapping.Linear"/> <!-- Needed to use components [IdentityMapping] -->
    <RequiredPlugin name="Sofa.Component.Mass"/> <!-- Needed to use components [DiagonalMass] -->
    <RequiredPlugin name="Sofa.Component.ODESolver.Backward"/> <!-- Needed to use components [EulerImplicitSolver] -->
    <RequiredPlugin name="Sofa.Component.SolidMechanics.FEM.Elastic"/> <!-- Needed to use components [TriangleFEMForceField TriangularFEMForceField TriangularFEMForceFieldOptim] -->
    <RequiredPlugin name="Sofa.Component.StateContainer"/> <!-- Needed to use components [MechanicalObject] -->
    <RequiredPlugin name="Sofa.Component.Topology.Container.Dynamic"/> <!-- Needed to use components [QuadSetGeometryAlgorithms QuadSetTopologyContainer QuadSetTopologyModifier TriangleSetGeometryAlgorithms TriangleSetTopologyContainer TriangleSetTopologyModifier] -->
    <RequiredPlugin name="Sofa.Component.Topology.Container.Grid"/> <!-- Needed to use components [RegularGridTopology] -->
    <RequiredPlugin name="Sofa.Component.Topology.Mapping"/> <!-- Needed to use components [Quad2TriangleTopologicalMapping] -->
    <RequiredPlugin name="Sofa.Component.Visual"/> <!-- Needed to use components [VisualStyle] -->
    <RequiredPlugin name="Sofa.GL.Component.Rendering3D"/> <!-- Needed to use components [OglModel] -->
    <DefaultAnimationLoop/>


    <VisualStyle displayFlags="showBehaviorModels showVisual" />

    <RegularGridTopology name="grid" n="40 1 40" min="0 0 0" max="10 0 10" />

    <Node name="TriangularFEMForceField">
        <EulerImplicitSolver name="cg_odesolver" printLog="false"  rayleighStiffness="0.1" rayleighMass="0.1" />
        <CGLinearSolver iterations="25" name="linear solver" tolerance="1.0e-9" threshold="1.0e-9" />

        <QuadSetTopologyContainer name="Quad_topo" src="@../grid" />
        <QuadSetTopologyModifier name="Modifier" />
        <QuadSetGeometryAlgorithms name="GeomAlgo" template="Vec3" />

        <MechanicalObject name="TriangularFEMForceField_dof" />
        <DiagonalMass totalMass="1.0" />
        <FixedConstraint indices="0 39" />

        <Node name="T">
            <TriangleSetTopologyContainer name="Triangle_topo" />
            <TriangleSetTopologyModifier name="Modifier" />
            <TriangleSetGeometryAlgorithms name="GeomAlgo" template="Vec3" />

            <Quad2TriangleTopologicalMapping name="TriangularFEMForceField_mapTopo" input="@../Quad_topo" output="@Triangle_topo" />
            <TriangularFEMForceField name="FEM" youngModulus="1000" poissonRatio="0.3" method="large" />

            <Node name="Visu">
                <OglModel name="TriangularFEMForceField_visu" color="red" />
                <IdentityMapping name="TriangularFEMForceField_mapping" input="@../.." output="@." />
            </Node>
        </Node>

    </Node>


    <Node name="TriangularFEMForceFieldOptim">
        <EulerImplicitSolver name="cg_odesolver" printLog="false"  rayleighStiffness="0.1" rayleighMass="0.1" />
        <CGLinearSolver iterations="25" name="linear solver" tolerance="1.0e-9" threshold="1.0e-9" />

        <QuadSetTopologyContainer name="Quad_topo" src="@../grid" />
        <QuadSetTopologyModifier name="Modifier" />
        <QuadSetGeometryAlgorithms name="GeomAlgo" template="Vec3" />

        <MechanicalObject name="TriangularFEMForceFieldOptim_dof" />
        <DiagonalMass totalMass="1.0" />
        <FixedConstraint indices="0 39" />

        <Node name="T">
            <TriangleSetTopologyContainer name="Triangle_topo" />
            <TriangleSetTopologyModifier name="Modifier" />
            <TriangleSetGeometryAlgorithms name="GeomAlgo" template="Vec3" />

            <Quad2TriangleTopologicalMapping name="TriangularFEMForceFieldOptim_mapTopo" input="@../Quad_topo" output="@Triangle_topo" />
            <TriangularFEMForceFieldOptim name="FEM" youngModulus="1000" poissonRatio="0.3" method="large" />

            <Node name="Visu">
                <OglModel name="TriangularFEMForceFieldOptim_visu" color="blue" />
                <IdentityMapping name="TriangularFEMForceFieldOptim_mapping" input="@../.." output="@." />
            </Node>
        </Node>

    </Node>


    <Node name="TriangleFEMForceField">
        <EulerImplicitSolver name="cg_odesolver" printLog="false"  rayleighStiffness="0.1" rayleighMass="0.1" />
        <CGLinearSolver iterations="25" name="linear solver" tolerance="1.0e-9" threshold="1.0e-9" />

        <QuadSetTopologyContainer name="Quad_topo" src="@../grid" />
        <QuadSetTopologyModifier name="Modifier" />
        <QuadSetGeometryAlgorithms name="GeomAlgo" template="Vec3" />

        <MechanicalObject name="TriangleFEMForceField_dof" />
        <DiagonalMass totalMass="1.0" />
        <FixedConstraint indices="0 39" />

        <Node name="T">
            <TriangleSetTopologyContainer name="Triangle_topo" />
            <TriangleSetTopologyModifier name="Modifier" />
            <TriangleSetGeometryAlgorithms name="GeomAlgo" template="Vec3" />

            <Quad2TriangleTopologicalMapping name="TriangleFEMForceField_mapTopo" input="@../Quad_topo" output="@Triangle_topo" />
            <TriangleFEMForceField name="FEM" youngModulus="1000" poissonRatio="0.3" method="large" />

            <Node name="Visu">
                <OglModel name="TriangleFEMForceField_visu" color="green" />
                <IdentityMapping name="TriangleFEMForceField_mapping" input="@../.." output="@." />
            </Node>
        </Node>

    </Node>

</Node>
