<?xml version="1.0" ?>
<!-- Automatic Triangle removal on a simple Triangle topology with FEM: Element removed are define in: ./RemovingTrianglesProcess.txt -->
<Node name="root" gravity="0 -9 0" dt="0.01">
    <RequiredPlugin name="Sofa.Component.Collision.Detection.Algorithm"/> <!-- Needed to use components [BVHNarrowPhase BruteForceBroadPhase CollisionPipeline] -->
    <RequiredPlugin name="Sofa.Component.Collision.Detection.Intersection"/> <!-- Needed to use components [MinProximityIntersection] -->
    <RequiredPlugin name="Sofa.Component.Collision.Response.Contact"/> <!-- Needed to use components [DefaultContactManager] -->
    <RequiredPlugin name="Sofa.Component.Constraint.Projective"/> <!-- Needed to use components [LinearMovementConstraint] -->
    <RequiredPlugin name="Sofa.Component.IO.Mesh"/> <!-- Needed to use components [MeshGmshLoader] -->
    <RequiredPlugin name="Sofa.Component.LinearSolver.Iterative"/> <!-- Needed to use components [CGLinearSolver] -->
    <RequiredPlugin name="Sofa.Component.Mass"/> <!-- Needed to use components [DiagonalMass] -->
    <RequiredPlugin name="Sofa.Component.ODESolver.Backward"/> <!-- Needed to use components [EulerImplicitSolver] -->
    <RequiredPlugin name="Sofa.Component.StateContainer"/> <!-- Needed to use components [MechanicalObject] -->
    <RequiredPlugin name="Sofa.Component.Topology.Container.Dynamic"/> <!-- Needed to use components [TriangleSetGeometryAlgorithms TriangleSetTopologyContainer TriangleSetTopologyModifier] -->
    <RequiredPlugin name="Sofa.Component.Topology.Utility"/> <!-- Needed to use components [TopologicalChangeProcessor] -->
    <RequiredPlugin name="Sofa.Component.Visual"/> <!-- Needed to use components [VisualStyle] -->

    <VisualStyle displayFlags="showVisual showBehaviorModels" />
    <DefaultAnimationLoop/>
    <CollisionPipeline verbose="0" />
    <BruteForceBroadPhase name="N2" />
    <BVHNarrowPhase />
    <DefaultContactManager response="PenalityContactForceField" />
    <MinProximityIntersection name="Proximity" alarmDistance="0.8" contactDistance="0.5" />
    <Node name="SquareGravity">
        <EulerImplicitSolver name="cg_odesolver" rayleighStiffness="0.1" rayleighMass="0.1" />
        <CGLinearSolver iterations="25" tolerance="1e-5" threshold="1e-5" name="linear solver"/>
        <MeshGmshLoader name="loader" filename="mesh/square3.msh" createSubelements="true" />
        <MechanicalObject name="dofs" src="@loader" template="Vec3" />
        <TriangleSetTopologyContainer name="Triangle_topo" src="@loader"/>
        <TriangleSetTopologyModifier name="Modifier" />
        <TriangleSetGeometryAlgorithms template="Vec3" name="GeomAlgo" drawTriangles="1"/>
        <DiagonalMass template="Vec3,Vec3" name="mass" massDensity="1.0" />
        <LinearMovementConstraint indices="0 1 2 3 4 25 26 27 28 29" keyTimes="0 0.3 0.6 1 1.5" movements="0 0 0   0 0 0
										      0 1 0   0 0 0
										      0 0 -1  0 0 0
										      0 0 -1  0 0 6.3
										      0 0 -1   0 0 0" />


        <TopologicalChangeProcessor listening="1" filename="RemovingTrianglesProcess_constraint.txt" />
    </Node>
</Node>
