<?xml version="1.0"?>
<!-- BilateralInteractionConstraint example using rigid-->
<Node name="root" dt="0.1" gravity="0 -0.981 0">
    <RequiredPlugin name="Sofa.Component.AnimationLoop"/> <!-- Needed to use components [FreeMotionAnimationLoop] -->
    <RequiredPlugin name="Sofa.Component.Collision.Geometry"/> <!-- Needed to use components [SphereCollisionModel] -->
    <RequiredPlugin name="Sofa.Component.Constraint.Lagrangian.Correction"/> <!-- Needed to use components [LinearSolverConstraintCorrection] -->
    <RequiredPlugin name="Sofa.Component.Constraint.Lagrangian.Model"/> <!-- Needed to use components [BilateralInteractionConstraint] -->
    <RequiredPlugin name="Sofa.Component.Constraint.Lagrangian.Solver"/> <!-- Needed to use components [GenericConstraintSolver] -->
    <RequiredPlugin name="Sofa.Component.Constraint.Projective"/> <!-- Needed to use components [FixedConstraint] -->
    <RequiredPlugin name="Sofa.Component.LinearSolver.Direct"/> <!-- Needed to use components [BTDLinearSolver] -->
    <RequiredPlugin name="Sofa.Component.Mapping.NonLinear"/> <!-- Needed to use components [RigidRigidMapping] -->
    <RequiredPlugin name="Sofa.Component.Mass"/> <!-- Needed to use components [UniformMass] -->
    <RequiredPlugin name="Sofa.Component.ODESolver.Backward"/> <!-- Needed to use components [EulerImplicitSolver] -->
    <RequiredPlugin name="Sofa.Component.SolidMechanics.FEM.Elastic"/> <!-- Needed to use components [BeamFEMForceField] -->
    <RequiredPlugin name="Sofa.Component.StateContainer"/> <!-- Needed to use components [MechanicalObject] -->
    <RequiredPlugin name="Sofa.Component.Topology.Container.Constant"/> <!-- Needed to use components [MeshTopology] -->
    <RequiredPlugin name="Sofa.Component.Visual"/> <!-- Needed to use components [VisualStyle] -->

    <VisualStyle displayFlags="showBehaviorModels showForceFields" />
    <FreeMotionAnimationLoop />
    <GenericConstraintSolver tolerance="0.001" maxIterations="1000"/>
    <Node name="Beam1">
        <EulerImplicitSolver name="odesolver" printLog="false"  rayleighStiffness="0.1" rayleighMass="0.1" />
        <BTDLinearSolver printLog="false" verbose="false" />
        <MechanicalObject template="Rigid3" name="DOFs1" position="0 0 0 0 0 0 1  1 0 0 0 0 0 1  2 0 0 0 0 0 1  3 0 0 0 0 0 1  4 0 0 0 0 0 1  5 0 0 0 0 0 1  6 0 0 0 0 0 1  7 0 0 0 0 0 1" />
        <MeshTopology name="lines" lines="0 1 1 2 2 3 3 4 4 5 5 6 6 7" />
        <UniformMass vertexMass="1 1 0.01 0 0 0 0.1 0 0 0 0.1 0" printLog="false" />
        <BeamFEMForceField name="FEM" poissonRatio="0.49" radius="0.1" youngModulus="2000000" />
        <FixedConstraint name="FixedConstraint" indices="7" />
        <LinearSolverConstraintCorrection />
         <SphereCollisionModel radius=0.1 group="1"/>
        <Node name="ConstraintPoint">
            <MechanicalObject template="Rigid3" name="dof1" position="0 0 0 0 0 -0.707107 0.707107 " />
            <RigidRigidMapping index="0" />
        </Node>
    </Node>
    <Node name="Beam2">
        <EulerImplicitSolver name="odesolver" printLog="false" />
        <BTDLinearSolver printLog="false" verbose="false" />
        <MechanicalObject template="Rigid3" name="DOFs2" position="0 0 0 0 0 -0.707107 0.707107 0 -1 0 0 0-0.707107 0.707107  0 -2 0 0 0 -0.707107 0.707107  0 -3 0 0 0 -0.707107 0.707107  0 -4 0 0 0 -0.707107 0.707107  0 -5 0 0 0 -0.707107 0.707107  0 -6 0 0 0 -0.707107 0.707107  0 -7 0 0 0 -0.707107 0.707107" />
        <MeshTopology name="lines" lines="0 1 1 2 2 3 3 4 4 5 5 6 6 7" />
        <UniformMass vertexMass="1 1 0.01 0 0 0 0.1 0 0 0 0.1 0" printLog="false" />
        <BeamFEMForceField name="FEM" poissonRatio="0.49" radius="0.1" youngModulus="20000000" />
        <LinearSolverConstraintCorrection />
        <SphereCollisionModel radius=0.1 group="1"/>
    </Node>
    <BilateralInteractionConstraint template="Rigid3" object1="@Beam1/ConstraintPoint/dof1" object2="@Beam2/DOFs2" first_point="0" second_point="0" />
</Node>
