<Node      name="Root"  dt="0.04" bbox="-1 -1 -1 1 1 1" >
    <RequiredPlugin name="Sofa.Component.Constraint.Projective"/> <!-- Needed to use components [OscillatorConstraint] -->
    <RequiredPlugin name="Sofa.Component.Mass"/> <!-- Needed to use components [UniformMass] -->
    <RequiredPlugin name="Sofa.Component.ODESolver.Forward"/> <!-- Needed to use components [EulerExplicitSolver] -->
    <RequiredPlugin name="Sofa.Component.StateContainer"/> <!-- Needed to use components [MechanicalObject] -->
    <RequiredPlugin name="Sofa.Component.Visual"/> <!-- Needed to use components [VisualStyle] -->
    <VisualStyle displayFlags="showBehaviorModels" />
    <DefaultAnimationLoop/>
    <EulerExplicitSolver name="solver" />

    <Node name="Point Oscillator"  >
        <MechanicalObject template="Vec3" name="mech" position="0 0 0"  velocity="1 0 0"  force="1 0 0" externalForce="1 0 0" derivX="1 0 0"  restScale="1" />
        <UniformMass name="m" />
        <OscillatorConstraint template="Vec3" name="osc"  oscillators="0  1 1 1  1 0 0  1 5" />
    </Node>

    <Node name="Rigid Oscillator" >
        <MechanicalObject template="Rigid3" name="mech2" position="0 0 0 0 0 0 1"  velocity="0 0 0 0 0 0" />
        <UniformMass name="m2" />
        <OscillatorConstraint template="Rigid3" name="osc2" oscillators="0  1 1 0 0 0 0 1   0 1 1 0 0.707 0.707  1 5" />
    </Node>

</Node>
