<?xml version="1.0"?>
<Node 	name="root" gravity="0 0 0" dt="0.05"  >
    <RequiredPlugin name="Sofa.Component.Constraint.Projective"/> <!-- Needed to use components [FixedConstraint ProjectDirectionConstraint] -->
    <RequiredPlugin name="Sofa.Component.Engine.Select"/> <!-- Needed to use components [BoxROI] -->
    <RequiredPlugin name="Sofa.Component.IO.Mesh"/> <!-- Needed to use components [GridMeshCreator] -->
    <RequiredPlugin name="Sofa.Component.LinearSolver.Iterative"/> <!-- Needed to use components [CGLinearSolver] -->
    <RequiredPlugin name="Sofa.Component.Mass"/> <!-- Needed to use components [UniformMass] -->
    <RequiredPlugin name="Sofa.Component.MechanicalLoad"/> <!-- Needed to use components [EdgePressureForceField] -->
    <RequiredPlugin name="Sofa.Component.ODESolver.Backward"/> <!-- Needed to use components [EulerImplicitSolver] -->
    <RequiredPlugin name="Sofa.Component.SolidMechanics.FEM.Elastic"/> <!-- Needed to use components [TriangularFEMForceField] -->
    <RequiredPlugin name="Sofa.Component.StateContainer"/> <!-- Needed to use components [MechanicalObject] -->
    <RequiredPlugin name="Sofa.Component.Topology.Container.Dynamic"/> <!-- Needed to use components [EdgeSetGeometryAlgorithms EdgeSetTopologyContainer EdgeSetTopologyModifier TriangleSetGeometryAlgorithms TriangleSetTopologyContainer TriangleSetTopologyModifier] -->
    <RequiredPlugin name="Sofa.Component.Topology.Mapping"/> <!-- Needed to use components [Triangle2EdgeTopologicalMapping] -->
    <RequiredPlugin name="Sofa.Component.Visual"/> <!-- Needed to use components [VisualStyle] -->
    <VisualStyle displayFlags="hideVisualModels showBehavior" />
    <DefaultAnimationLoop />
    <DefaultVisualManagerLoop />

    <Node 	name="Square"  >
        <EulerImplicitSolver name="Euler Implicit"  printLog="0"  rayleighStiffness="0.5"  rayleighMass="0.5"  vdamping="0"  />
        <CGLinearSolver template="GraphScattered" name="CG Solver"  printLog="0"  iterations="40"  tolerance="1e-06"  threshold="1e-10" />
        <GridMeshCreator name="loader" resolution="5 5" trianglePattern="1" rotation="0 0 0 " scale="1 1 0" />
        <MechanicalObject template="Vec3" name="mObject1" position="@loader.position"    showIndices="false" showIndicesScale="0.001" />
        <TriangleSetTopologyContainer name="Container"  position="@loader.position"  edges="@loader.edges"  triangles="@loader.triangles" />
        <TriangleSetTopologyModifier name="Modifier" />
        <TriangleSetGeometryAlgorithms template="Vec3" name="GeomAlgo" />
        <UniformMass totalMass="1"/>
        <TriangularFEMForceField template="Vec3" name="FEM"  method="large"  poissonRatio="0.3"  youngModulus="20" />
        <BoxConstraint box="-0.05 -0.05 -0.05    0.05 1.05 0.05" drawBoxes="1"  />
        <BoxROI box="-0.05 -0.05 -0.05    0.05 1.05 0.05" drawBoxes="1" name="ProjectDirection"/>
        <ProjectDirectionConstraint direction="0.5 0.5 0" indices="@[-1].indices" drawSize="0.03" />
        <Node 	name="Boundary Edges"  >
            <EdgeSetTopologyContainer name="Container" />
            <EdgeSetTopologyModifier name="Modifier" />
            <EdgeSetGeometryAlgorithms template="Vec3" name="GeomAlgo"  drawEdges="1" />
            <Triangle2EdgeTopologicalMapping name="Mapping"  input="@../Container"  output="@Container" />
            <BoxROI box="0.95 -0.05 -0.05    1.05 1.05 0.05" drawBoxes="1" position="@../mObject1.rest_position" drawEdges="1" edges="@Container.edges" name="pressureBox" />
            <EdgePressureForceField template="Vec3" name="edgePressureFF0"  edgeIndices="@pressureBox.edgeIndices" binormal="0 0 1"  p_intensity="-10" showForces="1" arrowSizeCoef="1"/>
        </Node>
	</Node>
</Node>
