<?xml version="1.0"?>
<Node 	name="root" gravity="0 0 0" dt="0.05"  >
    <RequiredPlugin name="Sofa.Component.Constraint.Projective"/> <!-- Needed to use components [FixedConstraint ProjectToPlaneConstraint] -->
    <RequiredPlugin name="Sofa.Component.Engine.Select"/> <!-- Needed to use components [BoxROI] -->
    <RequiredPlugin name="Sofa.Component.LinearSolver.Iterative"/> <!-- Needed to use components [CGLinearSolver] -->
    <RequiredPlugin name="Sofa.Component.Mass"/> <!-- Needed to use components [UniformMass] -->
    <RequiredPlugin name="Sofa.Component.MechanicalLoad"/> <!-- Needed to use components [TrianglePressureForceField] -->
    <RequiredPlugin name="Sofa.Component.ODESolver.Backward"/> <!-- Needed to use components [EulerImplicitSolver] -->
    <RequiredPlugin name="Sofa.Component.StateContainer"/> <!-- Needed to use components [MechanicalObject] -->
    <RequiredPlugin name="Sofa.Component.Topology.Container.Dynamic"/> <!-- Needed to use components [TriangleSetGeometryAlgorithms TriangleSetTopologyContainer TriangleSetTopologyModifier] -->
    <RequiredPlugin name="Sofa.Component.Topology.Container.Grid"/> <!-- Needed to use components [RegularGridTopology] -->
    <RequiredPlugin name="Sofa.Component.Topology.Mapping"/> <!-- Needed to use components [Tetra2TriangleTopologicalMapping] -->
    <RequiredPlugin name="Sofa.Component.Visual"/> <!-- Needed to use components [VisualStyle] -->
    <RequiredPlugin name="Sofa.Component.SolidMechanics.FEM.Elastic"/> <!-- Needed to use components [TetrahedronFEMForceField] -->
    <VisualStyle displayFlags="hideVisualModels showBehavior" />

    <DefaultAnimationLoop />

    <RegularGridTopology name="grid" nx="3" ny="3" nz="3" xmin="0" xmax="1" ymin="0" ymax="1" zmin="0" zmax="1" />

    <Node 	name="Square"  >
        <EulerImplicitSolver name="Euler Implicit" rayleighStiffness="0.5"  rayleighMass="0.5"  />
        <CGLinearSolver template="GraphScattered" name="CG Solver" iterations="40" tolerance="1e-06" threshold="1e-10" />

        <MechanicalObject template="Vec3" name="mObject1"  position="@../grid.position" />

        <TetrahedronSetTopologyContainer name="Container" />
        <TetrahedronSetTopologyModifier name="Modifier" />
        <TetrahedronSetGeometryAlgorithms template="Vec3" name="GeomAlgo" />

        <Hexa2TetraTopologicalMapping name="Mapping"  input="@../grid"  output="@Container" />

        <TetrahedronFEMForceField template="Vec3" name="FEM" method="large" poissonRatio="0.3" youngModulus="500" />
        <UniformMass totalMass="1" />
        <BoxConstraint box="-0.05 -0.05 -0.05    0.05 0.05 0.05" drawBoxes="0"  />
        <BoxROI box="-0.05 -0.05 -0.05    0.05 1.05 1.05" drawBoxes="1" name="ProjectToPlane"/>
        <ProjectToPlaneConstraint normal="1 0 0" indices="@[-1].indices" drawSize="0.03" />
        <Node 	name="Boundary Edges"  >
            <TriangleSetTopologyContainer name="Container" />
            <TriangleSetTopologyModifier name="Modifier" />
            <TriangleSetGeometryAlgorithms template="Vec3" name="GeomAlgo"  drawTriangles="1" />
            <Tetra2TriangleTopologicalMapping name="Mapping"  input="@../Container"  output="@Container" />
            <BoxROI box="0.95 -0.05 -0.05    1.05 1.05 1.05" drawBoxes="1" position="@../mObject1.rest_position" drawTriangles="0" triangles="@Container.triangles" name="pressureBox" />
            <TrianglePressureForceField template="Vec3" showForces="1" pressure="10 10 0" triangleList="@pressureBox.triangleIndices"/>
        </Node>
    </Node>
</Node>
