<Node name="root" gravity="0 -9 1" dt="0.05">
    <RequiredPlugin name="Sofa.Component.Collision.Detection.Algorithm"/> <!-- Needed to use components [BVHNarrowPhase BruteForceBroadPhase CollisionPipeline] -->
    <RequiredPlugin name="Sofa.Component.Collision.Detection.Intersection"/> <!-- Needed to use components [MinProximityIntersection] -->
    <RequiredPlugin name="Sofa.Component.Collision.Response.Contact"/> <!-- Needed to use components [DefaultContactManager] -->
    <RequiredPlugin name="Sofa.Component.Engine.Select"/> <!-- Needed to use components [MeshROI] -->
    <RequiredPlugin name="Sofa.Component.IO.Mesh"/> <!-- Needed to use components [MeshOBJLoader MeshVTKLoader] -->
    <RequiredPlugin name="Sofa.Component.LinearSolver.Iterative"/> <!-- Needed to use components [CGLinearSolver] -->
    <RequiredPlugin name="Sofa.Component.Mass"/> <!-- Needed to use components [DiagonalMass] -->
    <RequiredPlugin name="Sofa.Component.ODESolver.Backward"/> <!-- Needed to use components [EulerImplicitSolver] -->
    <RequiredPlugin name="Sofa.Component.SolidMechanics.FEM.Elastic"/> <!-- Needed to use components [TetrahedralCorotationalFEMForceField] -->
    <RequiredPlugin name="Sofa.Component.StateContainer"/> <!-- Needed to use components [MechanicalObject] -->
    <RequiredPlugin name="Sofa.Component.Topology.Container.Dynamic"/> <!-- Needed to use components [TetrahedronSetGeometryAlgorithms TetrahedronSetTopologyContainer TetrahedronSetTopologyModifier TriangleSetTopologyModifier] -->
    <RequiredPlugin name="Sofa.Component.Visual"/> <!-- Needed to use components [VisualStyle] -->
    <RequiredPlugin name="Sofa.GL.Component.Rendering3D"/> <!-- Needed to use components [OglModel] -->

    <DefaultAnimationLoop/>
    <VisualStyle displayFlags="showBehaviorModels showWireframe" />
    <CollisionPipeline />
    <BruteForceBroadPhase/>
    <BVHNarrowPhase/>
    <DefaultContactManager response="PenalityContactForceField" />
    <MinProximityIntersection  alarmDistance="0.8" contactDistance="0.5" />
    <Node >
        <EulerImplicitSolver   rayleighStiffness="0.1" rayleighMass="0.1" />
        <CGLinearSolver iterations="25" tolerance="1e-05" threshold="1e-05" />
        <MeshVTKLoader name="loader" filename="mesh/Ossicles.vtu" />
        <MechanicalObject src="@loader"  name="mecaObj" scale3d="1 1 1" restScale="1" />


        <TetrahedronSetTopologyContainer name="Container"  src="@loader"/>
        <TriangleSetTopologyModifier name="ModifierTri" />
        <TetrahedronSetTopologyModifier name="ModifierTetra"/>
        <TetrahedronSetGeometryAlgorithms  name="GeomAlgo"/>
        <DiagonalMass  massDensity="0.15" />

        <TetrahedralCorotationalFEMForceField name="FEM" youngModulus="1e10" poissonRatio="0.3" method="large" />

        <Node name="MeshROI"  >
            <MeshOBJLoader name="ROIloader" filename="mesh/malleus.obj" scale3d="1 1 1" translation="0 0 0" rotation="0 0 0"/>
            <OglModel />
            <MeshROI name="ROIm"  drawMesh="0" drawBox="0" drawEdges="0" drawTriangles="1" drawTetrahedra="1" drawOut="0" computeMeshROI="1"  doUpdate="0"
               position="@../mecaObj.position" tetrahedra="@../loader.tetrahedra" ROIposition="@ROIloader.position" ROItriangles="@ROIloader.triangles" />
        </Node>
    </Node>
</Node>
