<Node name="root" gravity="0 -9.81 0" dt="0.05">
    <RequiredPlugin name="Sofa.Component.Collision.Detection.Algorithm"/> <!-- Needed to use components [BVHNarrowPhase BruteForceBroadPhase CollisionPipeline] -->
    <RequiredPlugin name="Sofa.Component.Collision.Detection.Intersection"/> <!-- Needed to use components [MinProximityIntersection] -->
    <RequiredPlugin name="Sofa.Component.Collision.Geometry"/> <!-- Needed to use components [TriangleCollisionModel] -->
    <RequiredPlugin name="Sofa.Component.Collision.Response.Contact"/> <!-- Needed to use components [DefaultContactManager] -->
    <RequiredPlugin name="Sofa.Component.Constraint.Projective"/> <!-- Needed to use components [FixedConstraint] -->
    <RequiredPlugin name="Sofa.Component.Engine.Select"/> <!-- Needed to use components [SubsetTopology] -->
    <RequiredPlugin name="Sofa.Component.IO.Mesh"/> <!-- Needed to use components [MeshGmshLoader] -->
    <RequiredPlugin name="Sofa.Component.LinearSolver.Iterative"/> <!-- Needed to use components [CGLinearSolver] -->
    <RequiredPlugin name="Sofa.Component.Mapping.Linear"/> <!-- Needed to use components [IdentityMapping] -->
    <RequiredPlugin name="Sofa.Component.Mass"/> <!-- Needed to use components [DiagonalMass] -->
    <RequiredPlugin name="Sofa.Component.ODESolver.Backward"/> <!-- Needed to use components [EulerImplicitSolver] -->
    <RequiredPlugin name="Sofa.Component.SolidMechanics.FEM.Elastic"/> <!-- Needed to use components [TriangularFEMForceField] -->
    <RequiredPlugin name="Sofa.Component.SolidMechanics.Spring"/> <!-- Needed to use components [TriangularBendingSprings] -->
    <RequiredPlugin name="Sofa.Component.StateContainer"/> <!-- Needed to use components [MechanicalObject] -->
    <RequiredPlugin name="Sofa.Component.Topology.Container.Dynamic"/> <!-- Needed to use components [TriangleSetGeometryAlgorithms TriangleSetTopologyContainer TriangleSetTopologyModifier] -->
    <RequiredPlugin name="Sofa.Component.Visual"/> <!-- Needed to use components [VisualStyle] -->
    <RequiredPlugin name="Sofa.GL.Component.Rendering3D"/> <!-- Needed to use components [OglModel] -->

    <DefaultAnimationLoop/>
    <VisualStyle displayFlags="showBehaviorModels" />
    <CollisionPipeline name="default0" verbose="0" />
    <BruteForceBroadPhase/>
    <BVHNarrowPhase/>
    <DefaultContactManager name="default1" response="PenalityContactForceField" />
    <MinProximityIntersection name="Proximity" alarmDistance="0.8" contactDistance="0.5" />
    <Node name="SquareGravity">
        <EulerImplicitSolver name="cg_odesolver"  rayleighStiffness="0.1" rayleighMass="0.1" />
        <CGLinearSolver iterations="100" tolerance="1e-5" threshold="1e-5"/>
        <MeshGmshLoader name="meshLoader" filename="mesh/square3.msh" />
        <SubsetTopology template="Vec3" box="0.3 0 -0.1 0.6 1 0.1" drawROI="1" src="@meshLoader" rest_position="@meshLoader.position" name="Subset" localIndices="1" />
        <Node name="in">
            <MechanicalObject template="Vec3" name="mecaObj2" position="@../Subset.pointsInROI" />
            <TriangleSetTopologyContainer name="Container" position="@mecaObj2.position" triangles="@../Subset.trianglesInROI" />
            <TriangleSetTopologyModifier name="Modifier" />
            <TriangleSetGeometryAlgorithms template="Vec3" name="GeomAlgo" />
            <DiagonalMass name="default5" massDensity="1.15" />
            <TriangularFEMForceField template="Vec3" name="FEM" method="large" poissonRatio="0.3" youngModulus="60" />
            <TriangularBendingSprings template="Vec3" name="FEM-Bend" stiffness="300" damping="1" />
            <TriangleCollisionModel template="Vec3" name="default7" />

            <Node >
              <OglModel name="Visual" color="blue" />
              <IdentityMapping input="@.." output="@Visual" />
            </Node>        </Node>
        <Node name="Out">
            <MechanicalObject template="Vec3" name="mecaObj2" position="@../Subset.pointsOutROI" />
            <TriangleSetTopologyContainer name="Container" position="@mecaObj2.position" triangles="@../Subset.trianglesOutROI" />
            <TriangleSetTopologyModifier name="Modifier" />
            <TriangleSetGeometryAlgorithms template="Vec3" name="GeomAlgo" />
            <DiagonalMass name="default5" massDensity="1.15" />
            <TriangleCollisionModel template="Vec3" name="default7" />
            <TriangularFEMForceField template="Vec3" name="FEM" method="large" poissonRatio="0.3" youngModulus="60" />
            <TriangularBendingSprings template="Vec3" name="FEM-Bend" stiffness="300" damping="1" />
            <FixedConstraint template="Vec3" name="default6" indices="0 1" />

            <Node >
              <OglModel name="Visual" color="red" />
              <IdentityMapping input="@.." output="@Visual" />
            </Node>
        </Node>
    </Node>
</Node>
