<Node name="root" gravity="-9.81 0 0" dt="0.05">
    <RequiredPlugin name="Sofa.Component.Collision.Detection.Algorithm"/> <!-- Needed to use components [BVHNarrowPhase BruteForceBroadPhase CollisionPipeline] -->
    <RequiredPlugin name="Sofa.Component.Collision.Detection.Intersection"/> <!-- Needed to use components [MinProximityIntersection] -->
    <RequiredPlugin name="Sofa.Component.Collision.Geometry"/> <!-- Needed to use components [TriangleCollisionModel] -->
    <RequiredPlugin name="Sofa.Component.Collision.Response.Contact"/> <!-- Needed to use components [DefaultContactManager] -->
    <RequiredPlugin name="Sofa.Component.Constraint.Projective"/> <!-- Needed to use components [FixedConstraint] -->
    <RequiredPlugin name="Sofa.Component.Engine.Select"/> <!-- Needed to use components [BoxROI SubsetTopology] -->
    <RequiredPlugin name="Sofa.Component.IO.Mesh"/> <!-- Needed to use components [MeshGmshLoader] -->
    <RequiredPlugin name="Sofa.Component.LinearSolver.Iterative"/> <!-- Needed to use components [CGLinearSolver] -->
    <RequiredPlugin name="Sofa.Component.Mapping.Linear"/> <!-- Needed to use components [BarycentricMapping IdentityMapping] -->
    <RequiredPlugin name="Sofa.Component.Mass"/> <!-- Needed to use components [UniformMass] -->
    <RequiredPlugin name="Sofa.Component.ODESolver.Backward"/> <!-- Needed to use components [EulerImplicitSolver] -->
    <RequiredPlugin name="Sofa.Component.SolidMechanics.FEM.Elastic"/> <!-- Needed to use components [HexahedronFEMForceField TetrahedronFEMForceField] -->
    <RequiredPlugin name="Sofa.Component.SolidMechanics.Spring"/> <!-- Needed to use components [StiffSpringForceField] -->
    <RequiredPlugin name="Sofa.Component.StateContainer"/> <!-- Needed to use components [MechanicalObject] -->
    <RequiredPlugin name="Sofa.Component.Topology.Container.Dynamic"/> <!-- Needed to use components [TetrahedronSetGeometryAlgorithms TetrahedronSetTopologyContainer TetrahedronSetTopologyModifier TriangleSetGeometryAlgorithms TriangleSetTopologyContainer TriangleSetTopologyModifier] -->
    <RequiredPlugin name="Sofa.Component.Topology.Container.Grid"/> <!-- Needed to use components [SparseGridTopology] -->
    <RequiredPlugin name="Sofa.Component.Topology.Mapping"/> <!-- Needed to use components [Tetra2TriangleTopologicalMapping] -->
    <RequiredPlugin name="Sofa.Component.Visual"/> <!-- Needed to use components [VisualStyle] -->
    <RequiredPlugin name="Sofa.GL.Component.Rendering3D"/> <!-- Needed to use components [OglModel] -->

    <DefaultAnimationLoop/>
    <VisualStyle displayFlags="showBehaviorModels showForceFields" />
    <CollisionPipeline name="DefaultCollisionPipeline" verbose="0" draw="0" depth="6" />
    <BruteForceBroadPhase/>
    <BVHNarrowPhase/>
    <MinProximityIntersection name="Proximity" alarmDistance="3" contactDistance="2" />
    <DefaultContactManager name="Response" response="PenalityContactForceField" />
    <Node name="SquareGravity">
        <EulerImplicitSolver name="cg_odesolver"  rayleighStiffness="0.1" rayleighMass="0.1" />
        <CGLinearSolver iterations="100" tolerance="1e-5" threshold="1e-5"/>
        <MeshGmshLoader name="meshLoader" filename="mesh/truthcylinder1.msh" />
        <SubsetTopology template="Vec3" box="-5 -20 -5 5 -10 5" drawROI="0" src="@meshLoader" rest_position="@meshLoader.position" name="Subset" localIndices="1" />
        <Node name="in">
            <MechanicalObject template="Vec3" name="mecaObj1" position="@../Subset.pointsInROI" />
            <TetrahedronSetTopologyContainer name="Container" position="@mecaObj1.position" tetrahedra="@../Subset.tetrahedraInROI" />
            <TetrahedronSetTopologyModifier name="Modifier" />
            <TetrahedronSetGeometryAlgorithms template="Vec3" name="GeomAlgo" drawTetrahedra="0" />
            <UniformMass totalMass="15" />
            <TetrahedronFEMForceField name="FEM" youngModulus="300" poissonRatio="0.49" />
            <TriangleCollisionModel template="Vec3" name="default7" />
            <BoxConstraint box_roi="fixedROI" box="-5 -20 -5 5 -17.5 5" drawBoxes="1" />
            <Node>
                <TriangleSetTopologyContainer name="ContainerTri" />
                <TriangleSetTopologyModifier name="Modifier" />
                <TriangleSetGeometryAlgorithms template="Vec3" name="GeomAlgo" />
                <Tetra2TriangleTopologicalMapping name="Mapping" input="@../Container" output="@ContainerTri" />
                <OglModel name="Visual" color="red" dx="60" />
                <IdentityMapping input="@.." output="@Visual" />
            </Node>
        </Node>
        <Node name="Out">
            <MechanicalObject template="Vec3" name="mecaObj2" />
            <SparseGridTopology n="4 7 4" position="@../Subset.pointsOutROI" name="name" drawHexahedra="0" />
            <UniformMass totalMass="15" />
            <HexahedronFEMForceField template="Vec3" name="FEM" youngModulus="50" poissonRatio="0.49" />
            <Node name="tetra">
                <TetrahedronSetTopologyContainer name="Container" position="@../../Subset.pointsOutROI" tetrahedra="@../../Subset.tetrahedraOutROI" />
                <TetrahedronSetTopologyModifier name="Modifier" />
                <TetrahedronSetGeometryAlgorithms template="Vec3" name="GeomAlgo" drawTetrahedra="0" />
                <MechanicalObject name="mecaObj3" />
                <BarycentricMapping input="@.." output="@." />
                <Node>
                    <TriangleSetTopologyContainer name="ContainerTri" />
                    <TriangleSetTopologyModifier name="Modifier" />
                    <TriangleSetGeometryAlgorithms template="Vec3" name="GeomAlgo" />
                    <Tetra2TriangleTopologicalMapping name="Mapping" input="@../Container" output="@ContainerTri" />
                    <TriangleCollisionModel template="Vec3" name="default7" />
                    <OglModel name="Visual" color="blue" dx="60" />
                    <IdentityMapping input="@.." output="@Visual" />
                </Node>
            </Node>
        </Node>
        <StiffSpringForceField name="Spring" object1="@in/mecaObj1" object2="@Out/tetra/mecaObj3" tags="extraSpring" spring="0 0 10000 0 0&#x0A;&#x09;&#x09;&#x09;&#x09;&#x09;       1 1 10000 0 0&#x0A;&#x09;&#x09;&#x09;&#x09;&#x09;       2 2 10000 0 0&#x0A;&#x09;&#x09;&#x09;&#x09;&#x09;       3 3 10000 0 0&#x0A;&#x09;&#x09;&#x09;&#x09;&#x09;       4 4 10000 0 0&#x0A;&#x09;&#x09;&#x09;&#x09;&#x09;       5 5 10000 0 0&#x0A;&#x09;&#x09;&#x09;&#x09;&#x09;       6 6 10000 0 0&#x0A;&#x09;&#x09;&#x09;&#x09;&#x09;       7 7 10000 0 0&#x0A;&#x09;&#x09;&#x09;&#x09;&#x09;       8 8 10000 0 0&#x0A;&#x09;&#x09;&#x09;&#x09;&#x09;       9 9 10000 0 0&#x0A;&#x09;&#x09;&#x09;&#x09;&#x09;       10 10 10000 0 0&#x0A;&#x09;&#x09;&#x09;&#x09;&#x09;       11 11 10000 0 0&#x0A;&#x09;&#x09;&#x09;&#x09;&#x09;       12 12 10000 0 0&#x0A;&#x09;&#x09;&#x09;&#x09;&#x09;       13 13 10000 0 0&#x0A;&#x09;&#x09;&#x09;&#x09;&#x09;       14 14 10000 0 0&#x0A;&#x09;&#x09;&#x09;&#x09;&#x09;       15 15 10000 0 0&#x0A;&#x09;&#x09;&#x09;&#x09;&#x09;       16 16 10000 0 0&#x0A;&#x09;&#x09;&#x09;&#x09;&#x09;       17 17 10000 0 0&#x0A;&#x09;&#x09;&#x09;&#x09;&#x09;       18 18 10000 0 0&#x0A;&#x09;&#x09;&#x09;&#x09;&#x09;       19 19 10000 0 0&#x0A;&#x09;&#x09;&#x09;&#x09;&#x09;       20 20 10000 0 0&#x0A;&#x09;&#x09;&#x09;&#x09;&#x09;       21 21 10000 0 0&#x0A;&#x09;&#x09;&#x09;&#x09;&#x09;       22 22 10000 0 0" />
    </Node>
</Node>
