<?xml version="1.0" ?>
<Node name="Root" gravity="0 0 0" dt="0.02">
    <RequiredPlugin name="Sofa.Component.Collision.Detection.Algorithm"/> <!-- Needed to use components [BVHNarrowPhase BruteForceBroadPhase CollisionPipeline] -->
    <RequiredPlugin name="Sofa.Component.Collision.Detection.Intersection"/> <!-- Needed to use components [MinProximityIntersection] -->
    <RequiredPlugin name="Sofa.Component.Collision.Geometry"/> <!-- Needed to use components [TriangleCollisionModel] -->
    <RequiredPlugin name="Sofa.Component.Collision.Response.Contact"/> <!-- Needed to use components [DefaultContactManager] -->
    <RequiredPlugin name="Sofa.Component.Engine.Select"/> <!-- Needed to use components [SubsetTopology] -->
    <RequiredPlugin name="Sofa.Component.IO.Mesh"/> <!-- Needed to use components [MeshGmshLoader] -->
    <RequiredPlugin name="Sofa.Component.LinearSolver.Iterative"/> <!-- Needed to use components [CGLinearSolver] -->
    <RequiredPlugin name="Sofa.Component.Mapping.NonLinear"/> <!-- Needed to use components [RigidMapping] -->
    <RequiredPlugin name="Sofa.Component.Mass"/> <!-- Needed to use components [UniformMass] -->
    <RequiredPlugin name="Sofa.Component.ODESolver.Backward"/> <!-- Needed to use components [EulerImplicitSolver] -->
    <RequiredPlugin name="Sofa.Component.SolidMechanics.FEM.Elastic"/> <!-- Needed to use components [TetrahedronFEMForceField] -->
    <RequiredPlugin name="Sofa.Component.StateContainer"/> <!-- Needed to use components [MechanicalObject] -->
    <RequiredPlugin name="Sofa.Component.Topology.Container.Constant"/> <!-- Needed to use components [MeshTopology] -->
    <RequiredPlugin name="Sofa.Component.Topology.Container.Dynamic"/> <!-- Needed to use components [TetrahedronSetGeometryAlgorithms TetrahedronSetTopologyContainer TetrahedronSetTopologyModifier TriangleSetGeometryAlgorithms TriangleSetTopologyContainer TriangleSetTopologyModifier] -->
    <RequiredPlugin name="Sofa.Component.Topology.Mapping"/> <!-- Needed to use components [Tetra2TriangleTopologicalMapping] -->
    <RequiredPlugin name="Sofa.Component.Visual"/> <!-- Needed to use components [VisualStyle] -->
    <RequiredPlugin name="Sofa.GL.Component.Rendering3D"/> <!-- Needed to use components [OglModel] -->

    <DefaultAnimationLoop/>
    <VisualStyle displayFlags="showVisual showWireframe" />
    <CollisionPipeline name="DefaultCollisionPipeline" verbose="0" draw="0" depth="6" />
    <BruteForceBroadPhase/>
    <BVHNarrowPhase/>
    <MinProximityIntersection name="Proximity" alarmDistance="0.3" contactDistance="0.2" />
    <DefaultContactManager name="Response" response="PenalityContactForceField" />
    <Node name="Cylinder" gravity="0 -9.81 0">
        <EulerImplicitSolver name="cg_odesolver"  rayleighStiffness="0.1" rayleighMass="0.1" />
        <CGLinearSolver template="GraphScattered" name="default18" iterations="100" tolerance="1e-05" threshold="1e-05"/>
        <MechanicalObject template="Rigid3" name="rigid" position="0 0 0 0 0 0 1" velocity="0 0 0 0 0 0" force="0 0 0 0 0 0" externalForce="0 0 0 0 0 0" derivX="0 0 0 0 0 0" free_position="0 0 0 0 0 0 1" free_velocity="0 0 0 0 0 0" restScale="1" />
        <UniformMass name="default0" />
        <Node name="topology" gravity="0 -9.81 0">
            <MeshGmshLoader name="loader" filename="mesh/truthcylinder1.msh" />
            <MeshTopology src="@loader" name="meshTopology" />
            <SubsetTopology template="Vec3" name="Subset" box="-5 -20 -5 5 -10 5" rest_position="@meshTopology.position" edges="@meshTopology.edges" triangles="@meshTopology.triangles" tetrahedra="@meshTopology.tetrahedra" indices="0" localIndices="1" drawROI="0" />
            <OglModel template="Vec3" name="visual" position="@meshTopology.position" useNormals="0" computeTangents="1" vertices="@meshTopology.position" triangles="@meshTopology.triangles" material="Default Diffuse 1 0.74902 0.74902 0.74902 1 Ambient 1 0.2 0.2 0.2 1 Specular 0 1 1 1 1 Emissive 0 0 0 0 0 Shininess 0 45" />
            <RigidMapping template="Rigid3,Vec3" name="default15" mapForces="0" mapConstraints="0" mapMasses="0" input="@.." output="@visual" />
        </Node>
        <Node name="InROI" gravity="0 -9.81 0">
            <MechanicalObject template="Vec3" name="mobj" position="@../topology/Subset.pointsInROI" velocity="0 0 0" force="0 0 0" externalForce="0 0 0" derivX="0 0 0" free_position="0 0 0" free_velocity="0 0 0" restScale="1" />
            <TetrahedronSetTopologyContainer name="container" position="@../topology/Subset.pointsInROI" tetrahedra="@../topology/Subset.tetrahedraInROI" />
            <TetrahedronSetTopologyModifier name="default10" />
            <TetrahedronSetGeometryAlgorithms template="Vec3" name="default12" />
            <UniformMass name="mass" vertexMass="15" />
            <TetrahedronFEMForceField template="Vec3" name="FEM" poissonRatio="0.49" youngModulus="1000" gatherPt=" " gatherBsize=" " />
            <RigidMapping template="Rigid3,Vec3" name="rigidMapping" input="@.." output="@." />
            <Node name="Surf" gravity="0 -9.81 0">
                <VisualStyle displayFlags="hideWireframe" />
                <TriangleSetTopologyContainer name="container" />
                <TriangleSetGeometryAlgorithms template="Vec3" />
                <TriangleSetTopologyModifier />
                <Tetra2TriangleTopologicalMapping input="@../container" output="@container" />
                <TriangleCollisionModel template="Vec3" />
            </Node>
        </Node>
    </Node>
</Node>
