<Node name="root" gravity="0 0 -9.81" dt="0.05">
    <RequiredPlugin name="Sofa.Component.Collision.Detection.Algorithm"/> <!-- Needed to use components [BVHNarrowPhase BruteForceBroadPhase CollisionPipeline] -->
    <RequiredPlugin name="Sofa.Component.Collision.Detection.Intersection"/> <!-- Needed to use components [MinProximityIntersection] -->
    <RequiredPlugin name="Sofa.Component.Collision.Response.Contact"/> <!-- Needed to use components [DefaultContactManager] -->
    <RequiredPlugin name="Sofa.Component.Engine.Transform"/> <!-- Needed to use components [TransformPosition] -->
    <RequiredPlugin name="Sofa.Component.IO.Mesh"/> <!-- Needed to use components [MeshOBJLoader] -->
    <RequiredPlugin name="Sofa.Component.LinearSolver.Iterative"/> <!-- Needed to use components [CGLinearSolver] -->
    <RequiredPlugin name="Sofa.Component.Mapping.Linear"/> <!-- Needed to use components [BarycentricMapping] -->
    <RequiredPlugin name="Sofa.Component.Mass"/> <!-- Needed to use components [UniformMass] -->
    <RequiredPlugin name="Sofa.Component.MechanicalLoad"/> <!-- Needed to use components [PlaneForceField] -->
    <RequiredPlugin name="Sofa.Component.ODESolver.Backward"/> <!-- Needed to use components [EulerImplicitSolver] -->
    <RequiredPlugin name="Sofa.Component.SolidMechanics.FEM.Elastic"/> <!-- Needed to use components [HexahedronFEMForceField] -->
    <RequiredPlugin name="Sofa.Component.StateContainer"/> <!-- Needed to use components [MechanicalObject] -->
    <RequiredPlugin name="Sofa.Component.Topology.Container.Grid"/> <!-- Needed to use components [SparseGridTopology] -->
    <RequiredPlugin name="Sofa.Component.Visual"/> <!-- Needed to use components [VisualStyle] -->
    <RequiredPlugin name="Sofa.GL.Component.Rendering3D"/> <!-- Needed to use components [OglModel] -->

    <DefaultAnimationLoop/>
    <VisualStyle displayFlags="showVisual showBehaviorModels" />
    <CollisionPipeline name="DefaultCollisionPipeline" verbose="0" draw="0" depth="6" />
    <BruteForceBroadPhase/>
    <BVHNarrowPhase/>
    <MinProximityIntersection name="Proximity" alarmDistance="3" contactDistance="2" />
    <DefaultContactManager name="Response" response="PenalityContactForceField" />
    <Node name="Object" gravity="0 -9.81 0">
        <EulerImplicitSolver name="Implicit Euler Solver"  rayleighStiffness="0.1" rayleighMass="0.1" />
        <CGLinearSolver  name="Conjugate Gradient" tolerance="1e-05" threshold="1e-05" iterations="5"/>
        <SparseGridTopology name="grid" fileTopology="mesh/dragon.obj" n="7 6 5" />
        <TransformPosition name="transfo" method="fromFile" filename="transfo.tfm" input_position="@grid.position"/>
        <MechanicalObject  name="Particles" restScale="1" position="@transfo.output_position" />
        <UniformMass  name="Mass" />
        <PlaneForceField  name="Plane" normal="0 0 1" d="-10" />
        <HexahedronFEMForceField  name="FEM" youngModulus="200" poissonRatio="0.45"/>
        <Node name="VisualNode" gravity="0 -9.81 0">
            <MeshOBJLoader name="meshLoader_0" filename="mesh/dragon.obj" handleSeams="1" />
            <OglModel name="Objective" src="@meshLoader_0" />
            <BarycentricMapping  name="Visual Mapping" output="@Objective"  />
        </Node>
    </Node>
    <Node name="Floor">
        <MeshOBJLoader name="ObjLoader" filename="mesh/floor.obj" />
        <OglModel name="VisualModel" src="@./ObjLoader" translation="0 0 -9" rotation="90 0 0"/>
    </Node>
</Node>
