<!-- For more details see: https://wiki.sofa-framework.org/tdev/wiki/Notes/NewLoaderArchitecture -->
<Node>
    <RequiredPlugin name="Sofa.Component.IO.Mesh"/> <!-- Needed to use components [MeshSTLLoader] -->
    <RequiredPlugin name="Sofa.Component.Visual"/> <!-- Needed to use components [VisualStyle] -->
    <RequiredPlugin name="Sofa.GL.Component.Rendering3D"/> <!-- Needed to use components [OglModel] -->
    <VisualStyle displayFlags="showVisual" />
    <DefaultAnimationLoop/>

    <MeshSTLLoader name="STLLoader" filename="mesh/pliers_binary.stl" printLog="true" />
    <OglModel src="@STLLoader" name="VisualModel" color="red" />
</Node>
