<?xml version="1.0" ?>
<!-- Mechanical DeformableOnRigidFrameMapping Example -->
<Node name="root" dt="0.02">
    <RequiredPlugin name="Sofa.Component.Collision.Detection.Algorithm"/> <!-- Needed to use components [BVHNarrowPhase BruteForceBroadPhase CollisionPipeline] -->
    <RequiredPlugin name="Sofa.Component.Collision.Detection.Intersection"/> <!-- Needed to use components [NewProximityIntersection] -->
    <RequiredPlugin name="Sofa.Component.Collision.Geometry"/> <!-- Needed to use components [TriangleCollisionModel] -->
    <RequiredPlugin name="Sofa.Component.Collision.Response.Contact"/> <!-- Needed to use components [DefaultContactManager] -->
    <RequiredPlugin name="Sofa.Component.Constraint.Projective"/> <!-- Needed to use components [FixedConstraint] -->
    <RequiredPlugin name="Sofa.Component.Engine.Select"/> <!-- Needed to use components [BoxROI] -->
    <RequiredPlugin name="Sofa.Component.IO.Mesh"/> <!-- Needed to use components [MeshOBJLoader] -->
    <RequiredPlugin name="Sofa.Component.LinearSolver.Iterative"/> <!-- Needed to use components [CGLinearSolver] -->
    <RequiredPlugin name="Sofa.Component.Mapping.Linear"/> <!-- Needed to use components [BarycentricMapping DeformableOnRigidFrameMapping] -->
    <RequiredPlugin name="Sofa.Component.Mass"/> <!-- Needed to use components [UniformMass] -->
    <RequiredPlugin name="Sofa.Component.MechanicalLoad"/> <!-- Needed to use components [PlaneForceField] -->
    <RequiredPlugin name="Sofa.Component.ODESolver.Backward"/> <!-- Needed to use components [EulerImplicitSolver] -->
    <RequiredPlugin name="Sofa.Component.SolidMechanics.FEM.Elastic"/> <!-- Needed to use components [TetrahedronFEMForceField] -->
    <RequiredPlugin name="Sofa.Component.StateContainer"/> <!-- Needed to use components [MechanicalObject] -->
    <RequiredPlugin name="Sofa.Component.Topology.Container.Constant"/> <!-- Needed to use components [MeshTopology] -->
    <RequiredPlugin name="Sofa.Component.Topology.Container.Grid"/> <!-- Needed to use components [SparseGridTopology] -->
    <RequiredPlugin name="Sofa.Component.Visual"/> <!-- Needed to use components [VisualStyle] -->
    <RequiredPlugin name="Sofa.GL.Component.Rendering3D"/> <!-- Needed to use components [OglModel] -->
    <VisualStyle displayFlags="showBehavior showVisual" />
    <CollisionPipeline depth="6" verbose="0" draw="0" />
    <BruteForceBroadPhase/>
    <BVHNarrowPhase/>
    <NewProximityIntersection name="Proximity" alarmDistance="0.3" contactDistance="0.2" />
    <DefaultContactManager name="Response" response="PenalityContactForceField" />
    <DefaultAnimationLoop/>

    <Node name="ChainRigid">
        <Node name="TorusFixed">
            <MeshOBJLoader name="loader" filename="mesh/torus2_for_collision.obj" />
            <MeshTopology src="@loader" />
            <MechanicalObject src="@loader" />
            <TriangleCollisionModel simulated="0" moving="0" />
            <MeshOBJLoader name="meshLoader_0" filename="mesh/torus2.obj" handleSeams="1" />
            <OglModel name="Visual" src="@meshLoader_0" color="gray" />
        </Node>
        <!-- 		<Node name="TorusRigid"> -->
        <Node name="Torus">
            <EulerImplicitSolver  rayleighStiffness="0.1" rayleighMass="0.1" />
            <CGLinearSolver iterations="50" threshold="1e-15" tolerance="1e-15" verbose="0" />
            <MechanicalObject name="rigidframe" template="Rigid3" position="1 2 0 0 0 0.7 0.7" />
            <UniformMass filename="BehaviorModels/torus.rigid" />
            <!--<FixedConstraint /> -->
            <!-- 	</Node> -->
            <Node name="TorusDeformLocal">
                <SparseGridTopology filename="mesh/torus_for_collision.obj" n="7 2 4" />
                <MechanicalObject />
                <TetrahedronFEMForceField youngModulus="125" poissonRatio="0.45" />
                <BoxConstraint box="-1 -1 -1 1 1 1" />
                <Node name="DeformableMappedModel">
                    <SparseGridTopology filename="mesh/torus_for_collision.obj" n="7 2 4" />
                    <MechanicalObject name="deformedMO" />
                    <DeformableOnRigidFrameMapping input1="@.." input2="@../../rigidframe" output="@deformedMO" printLog="0" />
                    <Node name="TorusCollisLocal">
                        <MeshOBJLoader name="loader" filename="mesh/torus_for_collision.obj" />
                        <MeshTopology src="@loader" />
                        <MechanicalObject src="@loader" />
                        <TriangleCollisionModel group="2" />
                        <BarycentricMapping />
                        <PlaneForceField name="Floor" normal="0 1 0" d="-4" stiffness="100" damping="1" />
                    </Node>
                    <Node name="Visu">
                        <MeshOBJLoader name="meshLoader_1" filename="mesh/torus.obj" handleSeams="1" />
                        <OglModel name="Visual" src="@meshLoader_1" color="gray" />
                        <BarycentricMapping input="@.." output="@Visual" />
                    </Node>
                </Node>
            </Node>
        </Node>
    </Node>
    <!---->
</Node>
