<?xml version="1.0" ?>
<Node name="root" dt="0.02">
    <RequiredPlugin name="Sofa.Component.Collision.Detection.Algorithm"/> <!-- Needed to use components [BVHNarrowPhase BruteForceBroadPhase CollisionPipeline] -->
    <RequiredPlugin name="Sofa.Component.Collision.Detection.Intersection"/> <!-- Needed to use components [NewProximityIntersection] -->
    <RequiredPlugin name="Sofa.Component.Collision.Geometry"/> <!-- Needed to use components [TriangleCollisionModel] -->
    <RequiredPlugin name="Sofa.Component.Collision.Response.Contact"/> <!-- Needed to use components [DefaultContactManager] -->
    <RequiredPlugin name="Sofa.Component.IO.Mesh"/> <!-- Needed to use components [MeshOBJLoader] -->
    <RequiredPlugin name="Sofa.Component.LinearSolver.Iterative"/> <!-- Needed to use components [CGLinearSolver] -->
    <RequiredPlugin name="Sofa.Component.Mapping.NonLinear"/> <!-- Needed to use components [RigidMapping] -->
    <RequiredPlugin name="Sofa.Component.Mass"/> <!-- Needed to use components [UniformMass] -->
    <RequiredPlugin name="Sofa.Component.ODESolver.Backward"/> <!-- Needed to use components [EulerImplicitSolver] -->
    <RequiredPlugin name="Sofa.Component.StateContainer"/> <!-- Needed to use components [MechanicalObject] -->
    <RequiredPlugin name="Sofa.Component.Topology.Container.Constant"/> <!-- Needed to use components [MeshTopology] -->
    <RequiredPlugin name="Sofa.GL.Component.Rendering3D"/> <!-- Needed to use components [OglModel] -->

    <CollisionPipeline depth="6" verbose="0" draw="0" />
    <BruteForceBroadPhase/>
    <BVHNarrowPhase/>
    <NewProximityIntersection name="Proximity" alarmDistance="0.3" contactDistance="0.2" />
    <DefaultContactManager name="Response" response="PenalityContactForceField" />
    <DefaultAnimationLoop/>
    <Node name="ChainRigid">
        <Node name="TorusFixed">
            <MeshOBJLoader name="loader" filename="mesh/torus2_for_collision.obj" />
            <MeshTopology src="@loader" />
            <MechanicalObject src="@loader" />
            <TriangleCollisionModel contactStiffness="1000" simulated="0" moving="0" />
            <MeshOBJLoader name="meshLoader_3" filename="mesh/torus2.obj" handleSeams="1" />
            <OglModel name="Visual" src="@meshLoader_3" color="gray" texturename="textures/brushed_metal.bmp" />
        </Node>
        <Node name="TorusRigid1">
            <EulerImplicitSolver  rayleighStiffness="0.1" rayleighMass="0.1" />
            <CGLinearSolver iterations="25" threshold="0.000000000001" tolerance="0.000001" />
            <MechanicalObject template="Rigid3" dx="2.5" />
            <UniformMass filename="BehaviorModels/torus.rigid" />
            <Node name="Visu">
                <MeshOBJLoader name="meshLoader_2" filename="mesh/torus.obj" handleSeams="1" />
                <OglModel name="Visual" src="@meshLoader_2" color="gray" texturename="textures/brushed_metal.bmp" />
                <RigidMapping input="@.." output="@Visual" />
            </Node>
            <Node name="Surf2">
                <MeshOBJLoader name="loader" filename="mesh/torus_for_collision.obj" />
                <MeshTopology src="@loader" />
                <MechanicalObject src="@loader" />
                <TriangleCollisionModel />
                <RigidMapping />
            </Node>
        </Node>
        <Node name="TorusRigid2">
            <EulerImplicitSolver />
            <CGLinearSolver iterations="25" threshold="0.000000000001" tolerance="0.000001" />
            <MechanicalObject template="Rigid3" dx="5" />
            <UniformMass />
            <Node name="Visu">
                <MeshOBJLoader name="meshLoader_4" filename="mesh/torus2.obj" handleSeams="1" />
                <OglModel name="Visual" src="@meshLoader_4" color="gray" texturename="textures/brushed_metal.bmp" />
                <RigidMapping input="@.." output="@Visual" />
            </Node>
            <Node name="Surf2">
                <MeshOBJLoader name="loader" filename="mesh/torus2_for_collision.obj" />
                <MeshTopology src="@loader" />
                <MechanicalObject src="@loader" />
                <TriangleCollisionModel />
                <RigidMapping />
            </Node>
        </Node>
        <Node name="TorusRigid3">
            <EulerImplicitSolver />
            <CGLinearSolver iterations="25" threshold="0.000000000001" tolerance="0.000001" />
            <MechanicalObject template="Rigid3" dx="7.5" />
            <UniformMass />
            <Node name="Visu">
                <MeshOBJLoader name="meshLoader_0" filename="mesh/torus.obj" handleSeams="1" />
                <OglModel name="Visual" src="@meshLoader_0" color="gray" texturename="textures/brushed_metal.bmp" />
                <RigidMapping input="@.." output="@Visual" />
            </Node>
            <Node name="Surf2">
                <MeshOBJLoader name="loader" filename="mesh/torus_for_collision.obj" />
                <MeshTopology src="@loader" />
                <MechanicalObject src="@loader" />
                <TriangleCollisionModel />
                <RigidMapping />
            </Node>
        </Node>
        <Node name="TorusRigid4">
            <EulerImplicitSolver />
            <CGLinearSolver iterations="25" threshold="0.000000000001" tolerance="0.000001" />
            <MechanicalObject template="Rigid3" dx="10" />
            <UniformMass />
            <Node name="Visu">
                <MeshOBJLoader name="meshLoader_1" filename="mesh/torus2.obj" handleSeams="1" />
                <OglModel name="Visual" src="@meshLoader_1" color="gray" texturename="textures/brushed_metal.bmp" />
                <RigidMapping input="@.." output="@Visual" />
            </Node>
            <Node name="Surf2">
                <MeshOBJLoader name="loader" filename="mesh/torus2_for_collision.obj" />
                <MeshTopology src="@loader" />
                <MechanicalObject src="@loader" />
                <TriangleCollisionModel />
                <RigidMapping />
            </Node>
        </Node>
    </Node>
</Node>
