<?xml version="1.0"?>
<Node 	name="root" gravity="0 0 3" dt="0.04"  >
    <RequiredPlugin name="Sofa.Component.Collision.Detection.Algorithm"/> <!-- Needed to use components [BVHNarrowPhase BruteForceBroadPhase CollisionPipeline] -->
    <RequiredPlugin name="Sofa.Component.Collision.Detection.Intersection"/> <!-- Needed to use components [MinProximityIntersection] -->
    <RequiredPlugin name="Sofa.Component.Collision.Geometry"/> <!-- Needed to use components [TriangleCollisionModel] -->
    <RequiredPlugin name="Sofa.Component.Collision.Response.Contact"/> <!-- Needed to use components [DefaultContactManager] -->
    <RequiredPlugin name="Sofa.Component.IO.Mesh"/> <!-- Needed to use components [MeshGmshLoader] -->
    <RequiredPlugin name="Sofa.Component.LinearSolver.Iterative"/> <!-- Needed to use components [CGLinearSolver] -->
    <RequiredPlugin name="Sofa.Component.Mapping.Linear"/> <!-- Needed to use components [IdentityMapping] -->
    <RequiredPlugin name="Sofa.Component.Mass"/> <!-- Needed to use components [DiagonalMass] -->
    <RequiredPlugin name="Sofa.Component.MechanicalLoad"/> <!-- Needed to use components [EdgePressureForceField] -->
    <RequiredPlugin name="Sofa.Component.ODESolver.Backward"/> <!-- Needed to use components [EulerImplicitSolver] -->
    <RequiredPlugin name="Sofa.Component.SolidMechanics.FEM.Elastic"/> <!-- Needed to use components [TriangularFEMForceField] -->
    <RequiredPlugin name="Sofa.Component.SolidMechanics.Spring"/> <!-- Needed to use components [StiffSpringForceField TriangularBendingSprings] -->
    <RequiredPlugin name="Sofa.Component.StateContainer"/> <!-- Needed to use components [MechanicalObject] -->
    <RequiredPlugin name="Sofa.Component.Topology.Container.Dynamic"/> <!-- Needed to use components [EdgeSetGeometryAlgorithms EdgeSetTopologyContainer EdgeSetTopologyModifier TriangleSetGeometryAlgorithms TriangleSetTopologyContainer TriangleSetTopologyModifier] -->
    <RequiredPlugin name="Sofa.Component.Topology.Mapping"/> <!-- Needed to use components [Triangle2EdgeTopologicalMapping] -->
    <RequiredPlugin name="Sofa.GL.Component.Rendering3D"/> <!-- Needed to use components [OglModel] -->
	<CollisionPipeline name="defaultPipeline1"  verbose="0" />
	<BruteForceBroadPhase/>
    <BVHNarrowPhase/>
	<DefaultContactManager name="defaultContactManager1"  response="PenalityContactForceField" />
	<MinProximityIntersection name="Proximity"  alarmDistance="0.8"  contactDistance="0.5" />
	<DefaultAnimationLoop/>

	<Node 	name="SquareGravity"  >
		<EulerImplicitSolver name="Euler Implicit"  printLog="0"  rayleighStiffness="0.1"  rayleighMass="0.1"  vdamping="0"  />
		<CGLinearSolver template="GraphScattered" name="CG Solver"  printLog="0"  iterations="100"  tolerance="1e-06"  threshold="1e-10" />
		<MeshGmshLoader name="loader"  filename="mesh/square3.msh" createSubelements="true"/>
		<MechanicalObject template="Vec3" name="mObject1"  position="@loader.position"  velocity="0 0 0"  force="0 0 0"  externalForce="0 0 0"  derivX="0 0 0"  restScale="1"  translation="@loader.translation"  rotation="@loader.rotation"  scale3d="@loader.scale3d" />
		<TriangleSetTopologyContainer name="Container"  position="@loader.position"  edges="@loader.edges"  triangles="@loader.triangles" />
		<TriangleSetTopologyModifier name="Modifier" />
		<TriangleSetGeometryAlgorithms template="Vec3" name="GeomAlgo" />
		<DiagonalMass name="diagonalMass1"  massDensity="0.15" />

		<TriangularFEMForceField template="Vec3" name="FEM"  method="large"  poissonRatio="0.3"  youngModulus="60" />
		<TriangularBendingSprings template="Vec3" name="FEM-Bend"  stiffness="300"  damping="1" />
		<TriangleCollisionModel template="Vec3" name="tTriangleModel1" />

        <Node >
			<OglModel name="Visual"  material="Default Diffuse 1 1 0 0 1 Ambient 1 0.2 0 0 1 Specular 0 1 0 0 1 Emissive 0 1 0 0 1 Shininess 0 45 No texture linked to the material No bump texture linked to the material " />
			<IdentityMapping name="identityMap1"  mapForces="0"  mapConstraints="0"  mapMasses="0"  input="@.."  output="@Visual" />
        </Node>
		<Node 	name="Edge Mesh"  >
			<EdgeSetTopologyContainer name="Container" />
			<EdgeSetTopologyModifier name="Modifier" />
			<EdgeSetGeometryAlgorithms template="Vec3" name="GeomAlgo"  drawEdges="1" />
			<Triangle2EdgeTopologicalMapping name="Mapping"  input="@../Container"  output="@Container" />
			<EdgePressureForceField template="Vec3" name="edgePressureFF0"  edges="@Container.edges" pressure="0 0 -0.1" normal="0 0 1"  p_intensity="1" arrowSizeCoef="10"/>
		</Node>
		<StiffSpringForceField template="Vec3" name="FF" />
	</Node>
</Node>
