<Node name="root" gravity="-1.8 0 100" dt="0.0001">
    <RequiredPlugin name="Sofa.Component.Constraint.Projective"/> <!-- Needed to use components [FixedConstraint] -->
    <RequiredPlugin name="Sofa.Component.IO.Mesh"/> <!-- Needed to use components [MeshGmshLoader MeshOBJLoader] -->
    <RequiredPlugin name="Sofa.Component.LinearSolver.Iterative"/> <!-- Needed to use components [CGLinearSolver] -->
    <RequiredPlugin name="Sofa.Component.Mapping.Linear"/> <!-- Needed to use components [BarycentricMapping] -->
    <RequiredPlugin name="Sofa.Component.Mass"/> <!-- Needed to use components [MeshMatrixMass] -->
    <RequiredPlugin name="Sofa.Component.ODESolver.Backward"/> <!-- Needed to use components [EulerImplicitSolver] -->
    <RequiredPlugin name="Sofa.Component.SolidMechanics.FEM.Elastic"/> <!-- Needed to use components [TetrahedronFEMForceField] -->
    <RequiredPlugin name="Sofa.Component.StateContainer"/> <!-- Needed to use components [MechanicalObject] -->
    <RequiredPlugin name="Sofa.Component.Topology.Container.Dynamic"/> <!-- Needed to use components [TetrahedronSetGeometryAlgorithms TetrahedronSetTopologyContainer] -->
    <RequiredPlugin name="Sofa.GL.Component.Rendering3D"/> <!-- Needed to use components [OglModel] -->
    <DefaultAnimationLoop/>

    <Node name="DeformableObject">

        <EulerImplicitSolver name="odeImplicitSolver" />
        <CGLinearSolver iterations="1000" tolerance="1e-9" threshold="1e-9"/>

        <MeshGmshLoader name="loader" filename="mesh/truthcylinder1.msh" />
        <TetrahedronSetTopologyContainer src="@loader" name="topologyContainer"/>
        <TetrahedronSetGeometryAlgorithms name="geomAlgo"/>
        <MechanicalObject src="@loader" dx="60" />
        <MeshMatrixMass totalMass="15" topology="@topologyContainer"/>
        <FixedConstraint indices="0 1 2 3 4 5 6 7 8 9 10 &#x0A;&#x09;&#x09;&#x09;&#x09;&#x09;&#x09;&#x09;11 12 13 14 15 16 17 18 19 20 &#x0A;&#x09;&#x09;&#x09;&#x09;&#x09;&#x09;&#x09;21 22 23 24 25 26 27 28 29 30 31 32 33 34 35 36 37 38 39 40 &#x0A;&#x09;&#x09;&#x09;&#x09;&#x09;&#x09;&#x09;41 42 43 44 45 46 47 268 269 270 271 343 345" />
        <TetrahedronFEMForceField name="FEM" youngModulus="1000" poissonRatio="0.49" method="small" />

        <Node>
            <MeshOBJLoader name="meshLoader_0" filename="mesh/truthcylinder1.obj" handleSeams="1" />
            <OglModel name="Visual" src="@meshLoader_0" color="red" dx="60" />
            <BarycentricMapping input="@.." output="@Visual" />
        </Node>
    </Node>
</Node>
