<?xml version="1.0"?>
<Node name="root" dt="0.01" gravity="0 0 -9.81">
    <RequiredPlugin name="Sofa.Component.LinearSolver.Iterative"/> <!-- Needed to use components [CGLinearSolver] -->
    <RequiredPlugin name="Sofa.Component.Mapping.NonLinear"/> <!-- Needed to use components [RigidMapping] -->
    <RequiredPlugin name="Sofa.Component.Mass"/> <!-- Needed to use components [UniformMass] -->
    <RequiredPlugin name="Sofa.Component.ODESolver.Backward"/> <!-- Needed to use components [EulerImplicitSolver] -->
    <RequiredPlugin name="Sofa.Component.Playback"/> <!-- Needed to use components [WriteState] -->
    <RequiredPlugin name="Sofa.Component.StateContainer"/> <!-- Needed to use components [MechanicalObject] -->
    <RequiredPlugin name="Sofa.Component.Visual"/> <!-- Needed to use components [VisualStyle] -->
    <RequiredPlugin name="Sofa.GL.Component.Rendering3D"/> <!-- Needed to use components [OglModel] -->
    <RequiredPlugin name="Sofa.Component.IO.Mesh"/> <!-- Needed to use components [MeshOBJLoader] -->

    <VisualStyle displayFlags="showForceFields showBehaviorModels showVisual showInteractionForceFields" />
    <DefaultAnimationLoop/>
    <EulerImplicitSolver />
    <CGLinearSolver iterations="25" tolerance="1e-5" threshold="1e-5"/>

    <Node name="Particle" bbox="-1 -1 -1 1 1 1" >
        <!-- Particle falling under gravity -->
        <MechanicalObject name="ParticleMO" template="Rigid3" position="0 0 0 0 0 0 1" showObject="1" />
        <UniformMass totalMass="1.0" />

        <!-- WriteState: finds automatically the Mechanical within its node/context -->
        <!-- Export positions (X) every 0.01 (each time step) -->
        <WriteState name="StateWriter" filename="particleGravity.data" period="0.01" writeX="1" writeV="0" writeF="0" time="0"/>
        <MeshOBJLoader name="loader" filename="mesh/torus.obj"/>
        <Node name="Visu">
            <OglModel color="1.000 0.000 0.000" src="@../loader" name="Visual" />
            <RigidMapping input="@.." output="@Visual" />
        </Node>
    </Node>
</Node>
