<?xml version="1.0"?>

<!-- BeamFEMForceField example -->
<Node name="root" dt="0.01">
    <RequiredPlugin name="Sofa.Component.Collision.Detection.Algorithm"/> <!-- Needed to use components [BVHNarrowPhase BruteForceBroadPhase CollisionPipeline] -->
    <RequiredPlugin name="Sofa.Component.Collision.Detection.Intersection"/> <!-- Needed to use components [MinProximityIntersection] -->
    <RequiredPlugin name="Sofa.Component.Collision.Geometry"/> <!-- Needed to use components [LineCollisionModel PointCollisionModel SphereCollisionModel TriangleCollisionModel] -->
    <RequiredPlugin name="Sofa.Component.Collision.Response.Contact"/> <!-- Needed to use components [DefaultContactManager] -->
    <RequiredPlugin name="Sofa.Component.Constraint.Projective"/> <!-- Needed to use components [FixedConstraint] -->
    <RequiredPlugin name="Sofa.Component.IO.Mesh"/> <!-- Needed to use components [MeshOBJLoader] -->
    <RequiredPlugin name="Sofa.Component.LinearSolver.Direct"/> <!-- Needed to use components [BTDLinearSolver] -->
    <RequiredPlugin name="Sofa.Component.LinearSolver.Iterative"/> <!-- Needed to use components [CGLinearSolver] -->
    <RequiredPlugin name="Sofa.Component.Mapping.Linear"/> <!-- Needed to use components [BeamLinearMapping IdentityMapping] -->
    <RequiredPlugin name="Sofa.Component.Mass"/> <!-- Needed to use components [UniformMass] -->
    <RequiredPlugin name="Sofa.Component.ODESolver.Backward"/> <!-- Needed to use components [EulerImplicitSolver] -->
    <RequiredPlugin name="Sofa.Component.SolidMechanics.FEM.Elastic"/> <!-- Needed to use components [BeamFEMForceField] -->
    <RequiredPlugin name="Sofa.Component.StateContainer"/> <!-- Needed to use components [MechanicalObject] -->
    <RequiredPlugin name="Sofa.Component.Topology.Container.Constant"/> <!-- Needed to use components [CubeTopology MeshTopology] -->
    <RequiredPlugin name="Sofa.Component.Visual"/> <!-- Needed to use components [VisualStyle] -->

    <DefaultAnimationLoop/>
    <VisualStyle displayFlags="showBehaviorModels hideForceFields showCollisionModels hideVisual showInteractionForceFields" />
    <CollisionPipeline depth="6" verbose="0" draw="0" />
    <BruteForceBroadPhase/>
    <BVHNarrowPhase/>
    <MinProximityIntersection name="Proximity" alarmDistance="0.3" contactDistance="0.2" />
    <DefaultContactManager name="Response" response="PenalityContactForceField" />

    <Node name="beam-withPointCollision">
        <EulerImplicitSolver rayleighStiffness="0" printLog="false"  rayleighMass="0.1" />
        <BTDLinearSolver template="BTDMatrix6d" printLog="false" verbose="false" />
        <MechanicalObject template="Rigid3" name="DOFs" position="0 0 0 0 0 0 1  1 0 0 0 0 0 1  2 0 0 0 0 0 1  3 0 0 0 0 0 1  4 0 0 0 0 0 1  5 0 0 0 0 0 1  6 0 0 0 0 0 1  7 0 0 0 0 0 1" />
        <MeshTopology name="lines" lines="0 1 1 2 2 3 3 4 4 5 5 6 6 7" />

        <FixedConstraint name="FixedConstraint" indices="0" />
        <UniformMass vertexMass="1 1 0.01 0 0 0 0.1 0 0 0 0.1" printLog="false" />
        <BeamFEMForceField name="FEM" radius="0.1" youngModulus="20000000" poissonRatio="0.49"/>


        <Node name="Collision">
            <MechanicalObject />
            <IdentityMapping  />
            <PointCollisionModel name="FloorPoint" />
        </Node>
    </Node>

    <Node name="beam-withTriangulatedCubeCollision">
        <EulerImplicitSolver rayleighStiffness="0" printLog="false"  rayleighMass="0.1" />
        <BTDLinearSolver template="BTDMatrix6d" printLog="false" verbose="false" />
        <MechanicalObject template="Rigid3" name="DOFs" position="0 0 -1 0 0 0 1  1 0 -1 0 0 0 1  2 0 -1 0 0 0 1  3 0 -1 0 0 0 1  4 0 -1 0 0 0 1  5 0 -1 0 0 0 1  6 0  -1 0 0 0 1  7 0 -1 0 0 0 1" />
        <MeshTopology name="lines" lines="0 1 1 2 2 3 3 4 4 5 5 6 6 7" />
        <FixedConstraint name="FixedConstraint" indices="0" />
        <UniformMass vertexMass="1 1 0.01 0 0 0 0.1 0 0 0 0.1" printLog="false" />
        <BeamFEMForceField name="FEM" radius="0.1" youngModulus="20000000" poissonRatio="0.49"/>

        <Node name="Collision">
            <CubeTopology nx="15" ny="2" nz="2" min="0 -0.1 -0.1" max="7 0.1 0.1" />
            <MechanicalObject />
            <BeamLinearMapping isMechanical="true" />
            <TriangleCollisionModel />
            <LineCollisionModel />
            <PointCollisionModel  />
        </Node>
    </Node>


    <Node name="beam-withSphereCollision">
        <EulerImplicitSolver rayleighStiffness="0" printLog="false" rayleighMass="0.1"/>
        <CGLinearSolver threshold="0.000000001" tolerance="0.0000000001" iterations="25" printLog="false" />

        <MechanicalObject template="Rigid3" name="DOFs" position="0 0 1 0 0 0 1  1 0 1 0 0 0 1  2 0 1 0 0 0 1  3 0 1 0 0 0 1" />
        <MeshTopology name="lines" lines="0 1 1 2 2 3" />
        <FixedConstraint name="FixedConstraint" indices="0" />
        <UniformMass totalMass="4" />
        <BeamFEMForceField name="FEM" radius="0.05" youngModulus="20000000" poissonRatio="0.49"/>

        <Node name="Collision">
            <MechanicalObject />
            <SphereCollisionModel radius="0.4" />
            <IdentityMapping />
        </Node>
    </Node>


    <Node name="Floor">
        <MeshOBJLoader name="loader" filename="mesh/floor3.obj" scale3d="0.5 0.5 0.5"/>
        <MeshTopology src="@loader" />
        <MechanicalObject src="@loader"  dy="-1"/>
        <TriangleCollisionModel name="FloorTriangle" simulated="0" moving="0" contactStiffness="100" />
    </Node>
</Node>
