<Node name="root" dt="0.01">
    <RequiredPlugin name="Sofa.Component.Collision.Detection.Algorithm"/> <!-- Needed to use components [BVHNarrowPhase BruteForceBroadPhase CollisionPipeline] -->
    <RequiredPlugin name="Sofa.Component.Collision.Detection.Intersection"/> <!-- Needed to use components [NewProximityIntersection] -->
    <RequiredPlugin name="Sofa.Component.Collision.Geometry"/> <!-- Needed to use components [TriangleCollisionModel] -->
    <RequiredPlugin name="Sofa.Component.Collision.Response.Contact"/> <!-- Needed to use components [DefaultContactManager] -->
    <RequiredPlugin name="Sofa.Component.IO.Mesh"/> <!-- Needed to use components [MeshGmshLoader MeshOBJLoader] -->
    <RequiredPlugin name="Sofa.Component.LinearSolver.Iterative"/> <!-- Needed to use components [CGLinearSolver] -->
    <RequiredPlugin name="Sofa.Component.Mapping.Linear"/> <!-- Needed to use components [BarycentricMapping] -->
    <RequiredPlugin name="Sofa.Component.Mass"/> <!-- Needed to use components [UniformMass] -->
    <RequiredPlugin name="Sofa.Component.MechanicalLoad"/> <!-- Needed to use components [PlaneForceField] -->
    <RequiredPlugin name="Sofa.Component.ODESolver.Backward"/> <!-- Needed to use components [EulerImplicitSolver] -->
    <RequiredPlugin name="Sofa.Component.SolidMechanics.FEM.Elastic"/> <!-- Needed to use components [TetrahedronFEMForceField] -->
    <RequiredPlugin name="Sofa.Component.StateContainer"/> <!-- Needed to use components [MechanicalObject] -->
    <RequiredPlugin name="Sofa.Component.Topology.Container.Constant"/> <!-- Needed to use components [MeshTopology] -->
    <RequiredPlugin name="Sofa.Component.Visual"/> <!-- Needed to use components [VisualStyle] -->
    <RequiredPlugin name="Sofa.GL.Component.Rendering3D"/> <!-- Needed to use components [OglModel] -->

    <VisualStyle displayFlags="showForceFields" />
    <CollisionPipeline depth="6" verbose="0" draw="0" />
    <BruteForceBroadPhase/>
    <BVHNarrowPhase/>
    <NewProximityIntersection name="Proximity" alarmDistance="0.3" contactDistance="0.2" />
    <DefaultContactManager name="Response" response="PenalityContactForceField" />
    <DefaultAnimationLoop/>

    <EulerImplicitSolver name="cg_odesolver" printLog="false"  rayleighStiffness="0.1" rayleighMass="0.1" />
    <CGLinearSolver iterations="25" name="linear solver" tolerance="1.0e-9" threshold="1.0e-9" />

    <Node name="Plastic1">
        <MeshGmshLoader name="loader" filename="mesh/torus_low_res.msh" rotation="90 0 0" />
        <MeshTopology src="@loader" />
        <MechanicalObject src="@loader"  />
        <UniformMass totalMass="5" />
        <TetrahedronFEMForceField name="FEM" youngModulus="1000" poissonRatio="0.4" computeGlobalMatrix="false" method="large" plasticYieldThreshold="0.01" plasticMaxThreshold="0.025" plasticCreep="1"/>
        <PlaneForceField normal="0 1 0" d="-3" stiffness="100000" />
        <Node name="Visu">
            <MeshOBJLoader name="meshLoader_2" filename="mesh/torus.obj" rotation="90 0 0" handleSeams="1" />
            <OglModel name="Visual" src="@meshLoader_2" color="red"/>
            <BarycentricMapping input="@.." output="@Visual" />
        </Node>
        <Node name="Surf2">
            <MeshOBJLoader name="loader" filename="mesh/torus_for_collision.obj" rotation="90 0 0"/>
            <MeshTopology src="@loader" />
            <MechanicalObject src="@loader"  />
            <TriangleCollisionModel />
            <BarycentricMapping />
        </Node>
    </Node>


    <Node name="Plastic2">
        <MeshGmshLoader name="loader" filename="mesh/torus_low_res.msh" rotation="90 0 0" translation="-6 0 0"/>
        <MeshTopology src="@loader" />
        <MechanicalObject src="@loader"  />
        <UniformMass totalMass="5" />
        <TetrahedronFEMForceField name="FEM" youngModulus="1000" poissonRatio="0.4" computeGlobalMatrix="false" method="large" plasticYieldThreshold="0.005" plasticMaxThreshold="0.5" plasticCreep="1"/>
        <PlaneForceField normal="0 1 0" d="-3" stiffness="100000" />
        <Node name="Visu">
            <MeshOBJLoader name="meshLoader_0" filename="mesh/torus.obj" rotation="90 0 0" translation="-6 0 0" handleSeams="1" />
            <OglModel name="Visual" src="@meshLoader_0" color="blue"/>
            <BarycentricMapping input="@.." output="@Visual" />
        </Node>
        <Node name="Surf2">
            <MeshOBJLoader name="loader" filename="mesh/torus_for_collision.obj" rotation="90 0 0" translation="-6 0 0"/>
            <MeshTopology src="@loader" />
            <MechanicalObject src="@loader"  />
            <TriangleCollisionModel />
            <BarycentricMapping />
        </Node>
    </Node>


    <Node name="Plastic3">
        <MeshGmshLoader name="loader" filename="mesh/torus_low_res.msh" rotation="90 0 0" translation="-12 0 0"/>
        <MeshTopology src="@loader" />
        <MechanicalObject src="@loader"  />
        <UniformMass totalMass="5" />
        <TetrahedronFEMForceField name="FEM" youngModulus="1000" poissonRatio="0.4" computeGlobalMatrix="false" method="large" plasticYieldThreshold="0.005" plasticMaxThreshold="0.5" plasticCreep=".1"/>
        <PlaneForceField normal="0 1 0" d="-3" stiffness="100000" />
        <Node name="Visu">
            <MeshOBJLoader name="meshLoader_3" filename="mesh/torus.obj" rotation="90 0 0" translation="-12 0 0" handleSeams="1" />
            <OglModel name="Visual" src="@meshLoader_3" color="yellow"/>
            <BarycentricMapping input="@.." output="@Visual" />
        </Node>
        <Node name="Surf2">
            <MeshOBJLoader name="loader" filename="mesh/torus_for_collision.obj" rotation="90 0 0" translation="-12 0 0"/>
            <MeshTopology src="@loader" />
            <MechanicalObject src="@loader"  />
            <TriangleCollisionModel />
            <BarycentricMapping />
        </Node>
    </Node>

    <Node name="Elastic">
    <MeshGmshLoader name="loader" filename="mesh/torus_low_res.msh" rotation="90 0 0" translation="6 0 0" />
    <MeshTopology src="@loader" />
    <MechanicalObject src="@loader"  />
    <UniformMass totalMass="5" />
    <TetrahedronFEMForceField name="FEM" youngModulus="1000" poissonRatio="0.4" computeGlobalMatrix="false" method="large" />
    <PlaneForceField normal="0 1 0" d="-3" stiffness="100000" />
    <Node name="Visu">
    <MeshOBJLoader name="meshLoader_1" filename="mesh/torus.obj" rotation="90 0 0" translation="6 0 0" handleSeams="1" />
    <OglModel name="Visual" src="@meshLoader_1" color="green"/>
    <BarycentricMapping input="@.." output="@Visual" />
    </Node>
        <Node name="Surf2">
            <MeshOBJLoader name="loader" filename="mesh/torus_for_collision.obj" rotation="90 0 0" translation="6 0 0"/>
            <MeshTopology src="@loader" />
            <MechanicalObject src="@loader"  />
            <TriangleCollisionModel />
            <BarycentricMapping />
        </Node>
    </Node>
</Node>
