<?xml version="1.0"?>
<Node 	 name="root"  dt="0.005"  >
	<RequiredPlugin name="Sofa.Component.Constraint.Projective"/> <!-- Needed to use components [FixedConstraint] -->
	<RequiredPlugin name="Sofa.Component.IO.Mesh"/> <!-- Needed to use components [MeshGmshLoader] -->
	<RequiredPlugin name="Sofa.Component.LinearSolver.Iterative"/> <!-- Needed to use components [CGLinearSolver] -->
	<RequiredPlugin name="Sofa.Component.Mass"/> <!-- Needed to use components [UniformMass] -->
	<RequiredPlugin name="Sofa.Component.ODESolver.Backward"/> <!-- Needed to use components [EulerImplicitSolver] -->
	<RequiredPlugin name="Sofa.Component.SolidMechanics.Spring"/> <!-- Needed to use components [StiffSpringForceField] -->
	<RequiredPlugin name="Sofa.Component.StateContainer"/> <!-- Needed to use components [MechanicalObject] -->
	<RequiredPlugin name="Sofa.Component.Visual"/> <!-- Needed to use components [VisualStyle] -->

    <DefaultAnimationLoop/>
	<VisualStyle name="visualStyle1"  displayFlags="showBehaviorModels showForceFields showCollisionModels showMappings" />
	<Node 	 name="Poutre1"  >
		<EulerImplicitSolver name="cg_odesolver"  printLog="0"  rayleighStiffness="0.1" rayleighMass="0.1" />
		<CGLinearSolver template="GraphScattered" name="linear solver"  iterations="25"  tolerance="1e-09"  threshold="1e-09" />
		<Node 	 name="M1"  >
			<MeshGmshLoader name="loader"  filename="mesh/smCube27.msh" />
			<MechanicalObject template="Vec3" showObject="1" name="mObject1"  position="@loader.position"  velocity="0 0 0"  force="0 0 0"  externalForce="0 0 0"  derivX="0 0 0"  restScale="1" />
			<UniformMass name="uniformMass1"  vertexMass="0.1" />
			<FixedConstraint template="Vec3" name="fixedConstraint1"  indices="0 3 6 9 12 15 18 21 24" />
			<StiffSpringForceField template="Vec3" name="InternalSprings1"  spring="0 9 100 5 3.5
 1 10 500 5 3.5
 2 11 500 5 3.5
 3 12 500 5 3.5
 4 13 500 5 3.5
 5 14 500 5 3.5
 6 15 500 5 3.5
 7 16 500 5 3.5
 8 17 500 5 3.5
 9 18 500 5 3.5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"  />
		</Node>
		<Node 	 name="M5"  >
			<MeshGmshLoader name="loader"  filename="mesh/smCube27.msh" />
			<MechanicalObject template="Vec3" name="mObject5" showObject="1" position="@loader.position"  velocity="0 0 0"  force="0 0 0"  externalForce="0 0 0"  derivX="0 0 0"  restScale="1"  translation="0 0 42" />
			<UniformMass name="uniformMass5"  vertexMass="0.1" />
			<StiffSpringForceField template="Vec3" name="InternalSprings5"  spring="0 9 100 5 3.5
 1 10 500 5 3.5
 2 11 500 5 3.5
 3 12 500 5 3.5
 4 13 500 5 3.5
 5 14 500 5 3.5
 6 15 500 5 3.5
 7 16 500 5 3.5
 8 17 500 5 3.5
 9 18 500 5 3.5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"   />
		</Node>
		<Node 	 name="M4"  >
			<MeshGmshLoader name="loader"  filename="mesh/smCube27.msh" />
			<MechanicalObject template="Vec3" name="mObject4" showObject="1" position="@loader.position"  velocity="0 0 0"  force="0 0 0"  externalForce="0 0 0"  derivX="0 0 0"  restScale="1"  translation="0 0 31.5" />
			<UniformMass name="uniformMass4"  vertexMass="0.1" />
			<StiffSpringForceField template="Vec3" name="InternalSprings4"  spring="0 9 100 5 3.5
 1 10 500 5 3.5
 2 11 500 5 3.5
 3 12 500 5 3.5
 4 13 500 5 3.5
 5 14 500 5 3.5
 6 15 500 5 3.5
 7 16 500 5 3.5
 8 17 500 5 3.5
 9 18 500 5 3.5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"   />
		</Node>
		<Node 	 name="M3"  >
			<MeshGmshLoader name="loader"  filename="mesh/smCube27.msh" />
			<MechanicalObject template="Vec3" showObject="1" name="mObject3"  position="@loader.position"  velocity="0 0 0"  force="0 0 0"  externalForce="0 0 0"  derivX="0 0 0"  restScale="1"  translation="0 0 21" />
			<UniformMass name="uniformMass3"  vertexMass="0.1" />
			<StiffSpringForceField template="Vec3" name="InternalSprings3"  spring="0 9 100 5 3.5
 1 10 500 5 3.5
 2 11 500 5 3.5
 3 12 500 5 3.5
 4 13 500 5 3.5
 5 14 500 5 3.5
 6 15 500 5 3.5
 7 16 500 5 3.5
 8 17 500 5 3.5
 9 18 500 5 3.5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"  />
		</Node>
		<Node 	 name="M2"  >
			<MeshGmshLoader name="loader"  filename="mesh/smCube27.msh" />
			<MechanicalObject template="Vec3" showObject="1" name="mObject2"  position="@loader.position"  velocity="0 0 0"  force="0 0 0"  externalForce="0 0 0"  derivX="0 0 0"  restScale="1"  translation="0 0 10.5" />
			<UniformMass name="uniformMass2"  vertexMass="0.1" />
			<StiffSpringForceField template="Vec3" name="InternalSprings2"  spring="0 9 100 5 3.5
 1 10 500 5 3.5
 2 11 500 5 3.5
 3 12 500 5 3.5
 4 13 500 5 3.5
 5 14 500 5 3.5
 6 15 500 5 3.5
 7 16 500 5 3.5
 8 17 500 5 3.5
 9 18 500 5 3.5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"  />
		</Node>
		<StiffSpringForceField template="Vec3" name="ExternalSprings1"  spring="2 0 500 5 3.5
 5 3 500 5 3.5
 8 6 500 5 3.5
 11 9 500 5 3.5
 14 12 500 5 3.5
 17 15 500 5 3.5
 20 18 500 5 3.5
 23 21 500 5 3.5
 26 24 500 5 3.5
 14 0 500 5 6.06218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"  object1="@M1/mObject1"  object2="@M2/mObject2" />
		<StiffSpringForceField template="Vec3" name="ExternalSprings2"  spring="2 0 500 5 3.5
 5 3 500 5 3.5
 8 6 500 5 3.5
 11 9 500 5 3.5
 14 12 500 5 3.5
 17 15 500 5 3.5
 20 18 500 5 3.5
 23 21 500 5 3.5
 26 24 500 5 3.5
 14 0 500 5 6.06218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"  object1="@M2/mObject2"  object2="@M3/mObject3" />
		<StiffSpringForceField template="Vec3" name="ExternalSprings3"  spring="2 0 500 5 3.5
 5 3 500 5 3.5
 8 6 500 5 3.5
 11 9 500 5 3.5
 14 12 500 5 3.5
 17 15 500 5 3.5
 20 18 500 5 3.5
 23 21 500 5 3.5
 26 24 500 5 3.5
 14 0 500 5 6.06218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"  object1="@M3/mObject3"  object2="@M4/mObject4" />
		<StiffSpringForceField template="Vec3" name="ExternalSprings4"  spring="2 0 500 5 3.5
 5 3 500 5 3.5
 8 6 500 5 3.5
 11 9 500 5 3.5
 14 12 500 5 3.5
 17 15 500 5 3.5
 20 18 500 5 3.5
 23 21 500 5 3.5
 26 24 500 5 3.5
 14 0 500 5 6.06218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"  object1="@M4/mObject4"  object2="@M5/mObject5" />
	</Node>
</Node>
