<!-- Mechanical MassSpring Group Basic Example -->
<Node name="root" gravity="0 0 1" dt="0.05">
    <RequiredPlugin name="Sofa.Component.Collision.Detection.Algorithm"/> <!-- Needed to use components [BVHNarrowPhase BruteForceBroadPhase CollisionPipeline] -->
    <RequiredPlugin name="Sofa.Component.Collision.Detection.Intersection"/> <!-- Needed to use components [DiscreteIntersection] -->
    <RequiredPlugin name="Sofa.Component.Collision.Geometry"/> <!-- Needed to use components [TriangleCollisionModel] -->
    <RequiredPlugin name="Sofa.Component.Collision.Response.Contact"/> <!-- Needed to use components [DefaultContactManager] -->
    <RequiredPlugin name="Sofa.Component.Constraint.Projective"/> <!-- Needed to use components [FixedConstraint] -->
    <RequiredPlugin name="Sofa.Component.LinearSolver.Iterative"/> <!-- Needed to use components [CGLinearSolver] -->
    <RequiredPlugin name="Sofa.Component.Mapping.Linear"/> <!-- Needed to use components [IdentityMapping] -->
    <RequiredPlugin name="Sofa.Component.Mass"/> <!-- Needed to use components [UniformMass] -->
    <RequiredPlugin name="Sofa.Component.ODESolver.Backward"/> <!-- Needed to use components [EulerImplicitSolver] -->
    <RequiredPlugin name="Sofa.Component.SolidMechanics.FEM.Elastic"/> <!-- Needed to use components [TriangleFEMForceField] -->
    <RequiredPlugin name="Sofa.Component.SolidMechanics.Spring"/> <!-- Needed to use components [TriangleBendingSprings] -->
    <RequiredPlugin name="Sofa.Component.StateContainer"/> <!-- Needed to use components [MechanicalObject] -->
    <RequiredPlugin name="Sofa.Component.Topology.Container.Grid"/> <!-- Needed to use components [RegularGridTopology] -->
    <RequiredPlugin name="Sofa.Component.Visual"/> <!-- Needed to use components [VisualStyle] -->
    <RequiredPlugin name="Sofa.GL.Component.Rendering3D"/> <!-- Needed to use components [OglModel] -->
    <VisualStyle displayFlags="showBehaviorModels showForceFields showCollisionModels showMappings showVisual" />
    <CollisionPipeline verbose="0" name="CollisionPipeline" />
    <BruteForceBroadPhase/>
    <BVHNarrowPhase/>
    <DefaultContactManager response="PenalityContactForceField" name="collision response" />
    <DiscreteIntersection />
    <DefaultAnimationLoop/>

    <Node name="M1">
        <EulerImplicitSolver name="cg_odesolver" printLog="false"  rayleighStiffness="0.1" rayleighMass="0.1" />
        <CGLinearSolver iterations="25" name="linear solver" tolerance="1.0e-9" threshold="1.0e-9" />
        <MechanicalObject />
        <UniformMass vertexMass="0.1" />
        <RegularGridTopology nx="3" ny="3" nz="1" xmin="10" xmax="19" ymin="0" ymax="9" zmin="4" zmax="5" />
        <FixedConstraint indices="0 8" />
        <TriangleFEMForceField name="FEM1" youngModulus="5000" poissonRatio="0.3" method="large" />
        <TriangleBendingSprings name="FEM-Bend" stiffness="100" damping="0.1" />
        <TriangleCollisionModel />
        <Node name="Visu">
            <OglModel name="Visual" color="green" />
            <IdentityMapping input="@.." output="@Visual" />
        </Node>
    </Node>
    <Node name="M2">
        <EulerImplicitSolver name="cg_odesolver" printLog="false" />
        <CGLinearSolver iterations="25" name="linear solver" tolerance="1.0e-9" threshold="1.0e-9" />
        <MechanicalObject />
        <UniformMass vertexMass="0.1" />
        <RegularGridTopology nx="4" ny="4" nz="1" xmin="20" xmax="29" ymin="0" ymax="9" zmin="8" zmax="9" />
        <FixedConstraint indices="0 15" />
        <TriangleFEMForceField name="FEM2" youngModulus="5000" poissonRatio="0.3" method="large" />
        <TriangleBendingSprings name="FEM-Bend" stiffness="100" damping="0.1" />
        <TriangleCollisionModel />
        <Node name="Visu">
            <OglModel name="Visual" color="blue" />
            <IdentityMapping input="@.." output="@Visual" />
        </Node>
    </Node>
    <Node name="M3">
        <EulerImplicitSolver name="cg_odesolver" printLog="false" />
        <CGLinearSolver iterations="25" name="linear solver" tolerance="1.0e-9" threshold="1.0e-9" />
        <MechanicalObject />
        <UniformMass vertexMass="0.1" />
        <RegularGridTopology nx="10" ny="10" nz="1" xmin="30" xmax="39" ymin="0" ymax="9" zmin="12" zmax="13" />
        <FixedConstraint indices="0 9 99" />
        <TriangleFEMForceField name="FEM3" youngModulus="5000" poissonRatio="0.3" method="large" />
        <TriangleBendingSprings name="FEM-Bend" stiffness="100" damping="0.1" />
        <TriangleCollisionModel />
        <Node name="Visu">
            <OglModel name="Visual" color="yellow" />
            <IdentityMapping input="@.." output="@Visual" />
        </Node>
    </Node>
</Node>
