<?xml version="1.0" ?>
<!-- Automatic Tetrahedron adding example: Element added are define in: ./AddingTetrahedraProcess.txt -->
<Node name="root" gravity="0 0 -9" dt="0.01">
    <RequiredPlugin name="Sofa.Component.Constraint.Projective"/> <!-- Needed to use components [FixedConstraint] -->
    <RequiredPlugin name="Sofa.Component.IO.Mesh"/> <!-- Needed to use components [MeshGmshLoader] -->
    <RequiredPlugin name="Sofa.Component.LinearSolver.Iterative"/> <!-- Needed to use components [CGLinearSolver] -->
    <RequiredPlugin name="Sofa.Component.Mass"/> <!-- Needed to use components [UniformMass] -->
    <RequiredPlugin name="Sofa.Component.ODESolver.Backward"/> <!-- Needed to use components [EulerImplicitSolver] -->
    <RequiredPlugin name="Sofa.Component.SolidMechanics.FEM.Elastic"/> <!-- Needed to use components [TetrahedralCorotationalFEMForceField] -->
    <RequiredPlugin name="Sofa.Component.StateContainer"/> <!-- Needed to use components [MechanicalObject] -->
    <RequiredPlugin name="Sofa.Component.Topology.Container.Dynamic"/> <!-- Needed to use components [TetrahedronSetGeometryAlgorithms TetrahedronSetTopologyContainer TetrahedronSetTopologyModifier] -->
    <RequiredPlugin name="Sofa.Component.Topology.Utility"/> <!-- Needed to use components [TopologicalChangeProcessor] -->
    <RequiredPlugin name="Sofa.Component.Visual"/> <!-- Needed to use components [VisualStyle] -->

    <VisualStyle displayFlags="showVisual showBehaviorModels showForceFields showWireframe" />
    <DefaultAnimationLoop/>

    <Node name="TT">
        <EulerImplicitSolver name="cg_odesolver" rayleighStiffness="0.1" rayleighMass="0.1" />
        <CGLinearSolver iterations="25" name="linear solver" tolerance="1e-5" threshold="1e-5"/>
        <MeshGmshLoader name="loader" filename="mesh/cubeDof.msh" />
        <MechanicalObject src="@loader" name="Volume" />
        <TetrahedronSetTopologyContainer src="@loader" name="Tetra_topo" listening="1" />
        <TetrahedronSetTopologyModifier name="Modifier" />
        <TetrahedronSetGeometryAlgorithms template="Vec3" name="GeomAlgo" drawTetrahedra="1" />

        <UniformMass totalMass="1.0" />

        <FixedConstraint indices="0 1 2" />
        <TetrahedralCorotationalFEMForceField name="FEM" youngModulus="360" poissonRatio="0.3" method="large" />

        <TopologicalChangeProcessor listening="1" filename="AddingTetrahedraProcess.txt" />
    </Node>
</Node>
