<?xml version="1.0" ?>
<!-- Automatic Triangle adding example: Element added are define in: ./AddingTrianglesProcess.txt -->
<Node name="root" gravity="0 0 -9" dt="0.01">
    <RequiredPlugin name="Sofa.Component.Collision.Geometry"/> <!-- Needed to use components [TriangleCollisionModel] -->
    <RequiredPlugin name="Sofa.Component.Constraint.Projective"/> <!-- Needed to use components [FixedConstraint] -->
    <RequiredPlugin name="Sofa.Component.IO.Mesh"/> <!-- Needed to use components [MeshGmshLoader] -->
    <RequiredPlugin name="Sofa.Component.LinearSolver.Iterative"/> <!-- Needed to use components [CGLinearSolver] -->
    <RequiredPlugin name="Sofa.Component.Mapping.Linear"/> <!-- Needed to use components [IdentityMapping] -->
    <RequiredPlugin name="Sofa.Component.Mass"/> <!-- Needed to use components [UniformMass] -->
    <RequiredPlugin name="Sofa.Component.ODESolver.Backward"/> <!-- Needed to use components [EulerImplicitSolver] -->
    <RequiredPlugin name="Sofa.Component.SolidMechanics.FEM.Elastic"/> <!-- Needed to use components [TriangularFEMForceField] -->
    <RequiredPlugin name="Sofa.Component.StateContainer"/> <!-- Needed to use components [MechanicalObject] -->
    <RequiredPlugin name="Sofa.Component.Topology.Container.Dynamic"/> <!-- Needed to use components [TriangleSetGeometryAlgorithms TriangleSetTopologyContainer TriangleSetTopologyModifier] -->
    <RequiredPlugin name="Sofa.Component.Topology.Utility"/> <!-- Needed to use components [TopologicalChangeProcessor] -->
    <RequiredPlugin name="Sofa.Component.Visual"/> <!-- Needed to use components [VisualStyle] -->
    <RequiredPlugin name="Sofa.GL.Component.Rendering3D"/> <!-- Needed to use components [OglModel] -->

    <VisualStyle displayFlags="showVisual showBehaviorModels showForceFields" />
    <DefaultAnimationLoop/>

    <Node name="SquareGravity">
        <EulerImplicitSolver name="cg_odesolver" rayleighStiffness="0.1" rayleighMass="0.1" />
        <CGLinearSolver iterations="25" name="linear solver" tolerance="1e-5" threshold="1e-5"/>
        <MeshGmshLoader name="loader" filename="mesh/cubeDof.msh" />
        <MechanicalObject name="dofs" src="@loader" template="Vec3" />
        <TriangleSetTopologyContainer src="@loader" name="Triangle_topo" listening="1" />
        <TriangleSetTopologyModifier name="Modifier" />
        <TriangleSetGeometryAlgorithms template="Vec3" name="GeomAlgo" />
        <UniformMass totalMass="0.1" />
        <FixedConstraint template="Vec3" name="default6" indices="0 2 18 20" />
        <TriangularFEMForceField template="Vec3" name="FEM"  method="large"  poissonRatio="0.3"  youngModulus="60" />
        <TriangleCollisionModel name="CollisionModel" />

        <Node >
          <OglModel name="Visual" color="red" />
          <IdentityMapping input="@.." output="@Visual" />
        </Node>

        <TopologicalChangeProcessor listening="1" filename="AddingTrianglesProcess.txt" />
    </Node>

    <Node name="Tare">
        <MeshGmshLoader name="loader" filename="mesh/nine_quads.msh"/>
        <OglModel name="visu" src="@loader" />
    </Node>
</Node>
