<!-- Automatic Hexahedron removing with Hexa2Quad mapping example: Element removed are define in: ./RemovingHexa2QuadProcess.txt -->
<Node name="root" dt="0.01" showBoundingTree="0" gravity="0 -9.81 0">
    <RequiredPlugin name="Sofa.Component.Collision.Detection.Algorithm"/> <!-- Needed to use components [BVHNarrowPhase BruteForceBroadPhase CollisionPipeline] -->
    <RequiredPlugin name="Sofa.Component.Collision.Detection.Intersection"/> <!-- Needed to use components [MinProximityIntersection] -->
    <RequiredPlugin name="Sofa.Component.Collision.Geometry"/> <!-- Needed to use components [TriangleCollisionModel] -->
    <RequiredPlugin name="Sofa.Component.Collision.Response.Contact"/> <!-- Needed to use components [DefaultContactManager] -->
    <RequiredPlugin name="Sofa.Component.Constraint.Projective"/> <!-- Needed to use components [FixedConstraint] -->
    <RequiredPlugin name="Sofa.Component.IO.Mesh"/> <!-- Needed to use components [MeshGmshLoader] -->
    <RequiredPlugin name="Sofa.Component.LinearSolver.Iterative"/> <!-- Needed to use components [CGLinearSolver] -->
    <RequiredPlugin name="Sofa.Component.Mass"/> <!-- Needed to use components [DiagonalMass] -->
    <RequiredPlugin name="Sofa.Component.ODESolver.Backward"/> <!-- Needed to use components [EulerImplicitSolver] -->
    <RequiredPlugin name="Sofa.Component.SolidMechanics.FEM.Elastic"/> <!-- Needed to use components [HexahedralFEMForceField] -->
    <RequiredPlugin name="Sofa.Component.SolidMechanics.Spring"/> <!-- Needed to use components [QuadularBendingSprings] -->
    <RequiredPlugin name="Sofa.Component.StateContainer"/> <!-- Needed to use components [MechanicalObject] -->
    <RequiredPlugin name="Sofa.Component.Topology.Container.Dynamic"/> <!-- Needed to use components [HexahedronSetGeometryAlgorithms HexahedronSetTopologyContainer HexahedronSetTopologyModifier QuadSetGeometryAlgorithms QuadSetTopologyContainer QuadSetTopologyModifier] -->
    <RequiredPlugin name="Sofa.Component.Topology.Mapping"/> <!-- Needed to use components [Hexa2QuadTopologicalMapping] -->
    <RequiredPlugin name="Sofa.Component.Topology.Utility"/> <!-- Needed to use components [TopologicalChangeProcessor] -->
    <RequiredPlugin name="Sofa.Component.Visual"/> <!-- Needed to use components [VisualStyle] -->

    <VisualStyle displayFlags="showBehaviorModels" />
    <CollisionPipeline verbose="0" />
    <BruteForceBroadPhase/>
    <BVHNarrowPhase/>
    <DefaultContactManager response="PenalityContactForceField" />
    <MinProximityIntersection name="Proximity" alarmDistance="0.8" contactDistance="0.5" />
    <DefaultAnimationLoop/>
    <Node name="H">
        <EulerImplicitSolver name="cg_odesolver" printLog="false"  rayleighStiffness="0.1" rayleighMass="0.1" />
        <CGLinearSolver iterations="25" name="linear solver" tolerance="1.0e-9" threshold="1.0e-9" />
        <MeshGmshLoader name="loader" filename="mesh/nine_hexa.msh" />
        <MechanicalObject src="@loader" name="Hexa" />
        <HexahedronSetTopologyContainer name="Hexa_topo" src="@loader" />
        <HexahedronSetTopologyModifier name="Modifier" />
        <HexahedronSetGeometryAlgorithms name="GeomAlgo" template="Vec3" />
        <TopologicalChangeProcessor listening="1" filename="RemovingHexa2QuadProcess.txt" />
        <HexahedralFEMForceField name="FEM" youngModulus="100" poissonRatio="0.3" method="large" />
        <DiagonalMass massDensity="0.5" />
        		<FixedConstraint indices="12 15 28 31" />
<!--         <BoxConstraint box="0 3 0 0 3 1 3 3 0 3 3 1" /> -->
        <Node name="Q">
            <QuadSetTopologyContainer name="Quad_topo" src="@../loader" tags=" " />
            <QuadSetTopologyModifier name="Modifier" />
            <QuadSetGeometryAlgorithms name="GeomAlgo" template="Vec3" drawQuads="1" />
            <Hexa2QuadTopologicalMapping input="@../Hexa_topo" output="@Quad_topo" />
            <QuadularBendingSprings name="FEM-Bend" stiffness="3000" damping="1.0" />
            <TriangleCollisionModel />
            <!--			<Node name="Visu">
				<OglModel name="Visual" color="blue" quads="@../Container.quads" />
				<IdentityMapping input="@../../Hexa" output="@Visual" />
			</Node>-->
        </Node>
    </Node>
</Node>
