<?xml version="1.0" ?>
<!-- Automatic Triangle removing with Triangle2Edge mapping example: Element removed are define in: ./RemovingTrianglesProcess.txt -->
<Node name="root" gravity="0 0 -9" dt="0.01">
    <RequiredPlugin name="Sofa.Component.Collision.Detection.Algorithm"/> <!-- Needed to use components [BVHNarrowPhase BruteForceBroadPhase CollisionPipeline] -->
    <RequiredPlugin name="Sofa.Component.Collision.Detection.Intersection"/> <!-- Needed to use components [MinProximityIntersection] -->
    <RequiredPlugin name="Sofa.Component.Collision.Response.Contact"/> <!-- Needed to use components [DefaultContactManager] -->
    <RequiredPlugin name="Sofa.Component.IO.Mesh"/> <!-- Needed to use components [MeshGmshLoader] -->
    <RequiredPlugin name="Sofa.Component.LinearSolver.Iterative"/> <!-- Needed to use components [CGLinearSolver] -->
    <RequiredPlugin name="Sofa.Component.Mapping.Linear"/> <!-- Needed to use components [IdentityMapping] -->
    <RequiredPlugin name="Sofa.Component.Mass"/> <!-- Needed to use components [DiagonalMass] -->
    <RequiredPlugin name="Sofa.Component.MechanicalLoad"/> <!-- Needed to use components [EdgePressureForceField] -->
    <RequiredPlugin name="Sofa.Component.ODESolver.Backward"/> <!-- Needed to use components [EulerImplicitSolver] -->
    <RequiredPlugin name="Sofa.Component.SolidMechanics.FEM.Elastic"/> <!-- Needed to use components [TriangularFEMForceField] -->
    <RequiredPlugin name="Sofa.Component.SolidMechanics.Spring"/> <!-- Needed to use components [TriangularBendingSprings] -->
    <RequiredPlugin name="Sofa.Component.StateContainer"/> <!-- Needed to use components [MechanicalObject] -->
    <RequiredPlugin name="Sofa.Component.Topology.Container.Dynamic"/> <!-- Needed to use components [EdgeSetGeometryAlgorithms EdgeSetTopologyContainer EdgeSetTopologyModifier TriangleSetGeometryAlgorithms TriangleSetTopologyContainer TriangleSetTopologyModifier] -->
    <RequiredPlugin name="Sofa.Component.Topology.Mapping"/> <!-- Needed to use components [Triangle2EdgeTopologicalMapping] -->
    <RequiredPlugin name="Sofa.Component.Topology.Utility"/> <!-- Needed to use components [TopologicalChangeProcessor] -->
    <RequiredPlugin name="Sofa.Component.Visual"/> <!-- Needed to use components [VisualStyle] -->
    <RequiredPlugin name="Sofa.GL.Component.Rendering3D"/> <!-- Needed to use components [OglModel] -->

    <DefaultAnimationLoop/>
    <VisualStyle displayFlags="showVisual showBehaviorModels" />
    <CollisionPipeline verbose="0" />
    <BruteForceBroadPhase/>
    <BVHNarrowPhase/>
    <DefaultContactManager response="PenalityContactForceField" />
    <MinProximityIntersection name="Proximity" alarmDistance="0.8" contactDistance="0.5" />
    <Node name="SquareGravity">
        <EulerImplicitSolver name="cg_odesolver" rayleighStiffness="0.1" rayleighMass="0.1" />
        <CGLinearSolver iterations="25" name="linear solver" tolerance="1e-5" threshold="1e-10"/>
        <MeshGmshLoader name="loader" filename="mesh/square3.msh" createSubelements="true" />
        <MechanicalObject name="dofs" src="@loader" template="Vec3" />
        <TriangleSetTopologyContainer src="@loader" name="Triangle_topo" />
        <TriangleSetTopologyModifier name="Triangle_mod" />
        <TriangleSetGeometryAlgorithms template="Vec3" name="GeomAlgo" />
        <DiagonalMass template="Vec3,Vec3" name="mass" massDensity="1.0" />
        <TriangularFEMForceField template="Vec3" name="FEM" method="large" poissonRatio="0.3" youngModulus="60" />
        <TriangularBendingSprings template="Vec3" name="FEM-Bend" stiffness="300" damping="1" />

        <Node name="Edge Mesh"  >
			<EdgeSetTopologyContainer name="Edge_topo" />
			<EdgeSetTopologyModifier name="Edge_mod" />
			<EdgeSetGeometryAlgorithms template="Vec3" name="GeomAlgo"  drawEdges="1" />
			<Triangle2EdgeTopologicalMapping name="Mapping"  input="@../Triangle_topo"  output="@Edge_topo" />
			<EdgePressureForceField template="Vec3" name="edgePressureFF0"  edges="@Edge_topo.edges" pressure="0 0 1" normal="0 0 1"  p_intensity="1" arrowSizeCoef="10" showForces="1" mstate="@../dofs"/>
		</Node>

        <Node name="Visu">
            <OglModel template="Vec3" name="Visual" material="Default Diffuse 1 1 0 0 1 Ambient 1 0.2 0 0 1 Specular 0 1 0 0 1 Emissive 0 1 0 0 1 Shininess 0 45" />
            <IdentityMapping template="Vec3,Vec3" name="default8" input="@.." output="@Visual" />
        </Node>

        <TopologicalChangeProcessor listening="1" filename="RemovingTrianglesProcess.txt" />
    </Node>
</Node>
