<?xml version="1.0"?>
<Node name="root" gravity="0 0 -9" dt="0.02">
    <RequiredPlugin name="Sofa.Component.Collision.Detection.Algorithm"/> <!-- Needed to use components [BVHNarrowPhase BruteForceBroadPhase CollisionPipeline] -->
    <RequiredPlugin name="Sofa.Component.Collision.Detection.Intersection"/> <!-- Needed to use components [MinProximityIntersection] -->
    <RequiredPlugin name="Sofa.Component.Collision.Geometry"/> <!-- Needed to use components [LineCollisionModel PointCollisionModel TriangleCollisionModel] -->
    <RequiredPlugin name="Sofa.Component.Collision.Response.Contact"/> <!-- Needed to use components [DefaultContactManager] -->
    <RequiredPlugin name="Sofa.Component.Constraint.Projective"/> <!-- Needed to use components [FixedConstraint] -->
    <RequiredPlugin name="Sofa.Component.Engine.Select"/> <!-- Needed to use components [BoxROI] -->
    <RequiredPlugin name="Sofa.Component.IO.Mesh"/> <!-- Needed to use components [MeshOBJLoader] -->
    <RequiredPlugin name="Sofa.Component.LinearSolver.Iterative"/> <!-- Needed to use components [CGLinearSolver] -->
    <RequiredPlugin name="Sofa.Component.Mapping.Linear"/> <!-- Needed to use components [BarycentricMapping] -->
    <RequiredPlugin name="Sofa.Component.ODESolver.Backward"/> <!-- Needed to use components [EulerImplicitSolver] -->
    <RequiredPlugin name="Sofa.Component.SolidMechanics.FEM.Elastic"/> <!-- Needed to use components [HexahedronFEMForceFieldAndMass] -->
    <RequiredPlugin name="Sofa.Component.StateContainer"/> <!-- Needed to use components [MechanicalObject] -->
    <RequiredPlugin name="Sofa.Component.Topology.Container.Constant"/> <!-- Needed to use components [MeshTopology] -->
    <RequiredPlugin name="Sofa.Component.Topology.Container.Grid"/> <!-- Needed to use components [SparseGridRamificationTopology] -->
    <RequiredPlugin name="Sofa.Component.Visual"/> <!-- Needed to use components [VisualStyle] -->
    <RequiredPlugin name="Sofa.GL.Component.Rendering3D"/> <!-- Needed to use components [OglModel] -->

    <VisualStyle displayFlags="showVisual showBehaviorModels showForceFields" />
    <DefaultAnimationLoop/>
    <CollisionPipeline depth="6" verbose="0" draw="0" />
    <BruteForceBroadPhase/>
    <BVHNarrowPhase/>
    <MinProximityIntersection name="Proximity" alarmDistance="0.5" contactDistance="0.3" />
    <DefaultContactManager name="Response" response="PenalityContactForceField" />
    <Node name="UniformC Rough">
        <SparseGridRamificationTopology n="5 2 2" fileTopology="mesh/c.obj" nbVirtualFinerLevels="3" finestConnectivity="0" />
        <EulerImplicitSolver rayleighStiffness="0.1" rayleighMass="0.1" />
        <CGLinearSolver iterations="10" tolerance="1e-5" threshold="1e-5"/>
        <MechanicalObject />
        <HexahedronFEMForceFieldAndMass youngModulus="100000" poissonRatio="0.3" method="large" density="3" updateStiffnessMatrix="false" printLog="0" />
        <BoxConstraint box="-16 -10 -3 -14 10 3" />
        <Node name="Visu">
            <MeshOBJLoader name="meshLoader_1" filename="mesh/c.obj" handleSeams="1" />
            <OglModel name="Visual" src="@meshLoader_1" color="blue" />
            <BarycentricMapping input="@.." output="@Visual" />
        </Node>
        <Node name="Surf">
            <MeshOBJLoader name="loader" filename="mesh/c.obj" />
            <MeshTopology src="@loader" />
            <MechanicalObject src="@loader" />
            <TriangleCollisionModel />
            <PointCollisionModel />
            <LineCollisionModel />
            <BarycentricMapping />
        </Node>
    </Node>
    <Node name="UniformC">
        <SparseGridRamificationTopology n="5 2 2" fileTopology="mesh/c.obj" nbVirtualFinerLevels="3" finestConnectivity="0" />
        <EulerImplicitSolver rayleighStiffness="0.1" rayleighMass="0.1" />
        <CGLinearSolver iterations="10" tolerance="1e-5" threshold="1e-5"/>
        <MechanicalObject dx="40" />
        <HexahedronFEMForceFieldAndMass youngModulus="100000" poissonRatio="0.3" method="large" density="3" updateStiffnessMatrix="false" printLog="0" />
        <BoxConstraint box="24 -10 -3 26 10 3" />
        <Node name="Visu">
            <MeshOBJLoader name="meshLoader_0" filename="mesh/c.obj" handleSeams="1" />
            <OglModel name="Visual" src="@meshLoader_0" color="red" />
            <BarycentricMapping input="@.." output="@Visual" />
        </Node>
        <Node name="Surf">
            <MeshOBJLoader name="loader" filename="mesh/c.obj" />
            <MeshTopology src="@loader" />
            <MechanicalObject src="@loader" />
            <TriangleCollisionModel />
            <PointCollisionModel />
            <LineCollisionModel />
            <BarycentricMapping />
        </Node>
    </Node>
    <Node name="UniformC and finestConnectivity">
        <SparseGridRamificationTopology n="5 3 3" fileTopology="mesh/c.obj" nbVirtualFinerLevels="0" finestConnectivity="1" />
        <EulerImplicitSolver rayleighStiffness="0.1" rayleighMass="0.1" />
        <CGLinearSolver iterations="10" tolerance="1e-5" threshold="1e-5"/>
        <MechanicalObject dx="80" />
        <HexahedronFEMForceFieldAndMass youngModulus="100000" poissonRatio="0.3" method="large" density="3" updateStiffnessMatrix="false" printLog="0" />
        <BoxConstraint box="64 -10 -3 66 10 3" />
        <Node name="Visu">
            <MeshOBJLoader name="meshLoader_2" filename="mesh/c.obj" handleSeams="1" />
            <OglModel name="Visual" src="@meshLoader_2" color="yellow" />
            <BarycentricMapping input="@.." output="@Visual" />
        </Node>
        <Node name="Surf">
            <MeshOBJLoader name="loader" filename="mesh/c.obj" />
            <MeshTopology src="@loader" />
            <MechanicalObject src="@loader" />
            <TriangleCollisionModel />
            <PointCollisionModel />
            <LineCollisionModel />
            <BarycentricMapping />
        </Node>
    </Node>
</Node>
