<?xml version="1.0" ?>
<Node name="root" dt="0.01" showBoundingTree="0" gravity="0 -9 0">
    <Node name="RequiredPlugins">
        <RequiredPlugin name="Sofa.Component.Collision.Detection.Algorithm"/> <!-- Needed to use components [BVHNarrowPhase, BruteForceBroadPhase, CollisionPipeline] -->
        <RequiredPlugin name="Sofa.Component.Collision.Detection.Intersection"/> <!-- Needed to use components [MinProximityIntersection] -->
        <RequiredPlugin name="Sofa.Component.Collision.Response.Contact"/> <!-- Needed to use components [DefaultContactManager] -->
        <RequiredPlugin name="Sofa.Component.Constraint.Projective"/> <!-- Needed to use components [FixedConstraint] -->
        <RequiredPlugin name="Sofa.Component.LinearSolver.Iterative"/> <!-- Needed to use components [CGLinearSolver] -->
        <RequiredPlugin name="Sofa.Component.Mapping.Linear"/> <!-- Needed to use components [IdentityMapping, TubularMapping] -->
        <RequiredPlugin name="Sofa.Component.Mass"/> <!-- Needed to use components [UniformMass] -->
        <RequiredPlugin name="Sofa.Component.ODESolver.Backward"/> <!-- Needed to use components [EulerImplicitSolver] -->
        <RequiredPlugin name="Sofa.Component.SolidMechanics.FEM.Elastic"/> <!-- Needed to use components [BeamFEMForceField] -->
        <RequiredPlugin name="Sofa.Component.StateContainer"/> <!-- Needed to use components [MechanicalObject] -->
        <RequiredPlugin name="Sofa.Component.Topology.Container.Dynamic"/> <!-- Needed to use components [QuadSetGeometryAlgorithms, QuadSetTopologyContainer, QuadSetTopologyModifier] -->
        <RequiredPlugin name="Sofa.Component.Topology.Container.Grid"/> <!-- Needed to use components [RegularGridTopology] -->
        <RequiredPlugin name="Sofa.Component.Topology.Mapping"/> <!-- Needed to use components [Edge2QuadTopologicalMapping] -->
        <RequiredPlugin name="Sofa.GL.Component.Rendering3D"/> <!-- Needed to use components [OglModel] -->
    </Node>

    <DefaultAnimationLoop />
    <CollisionPipeline />
    <BruteForceBroadPhase/>
    <BVHNarrowPhase/>
    <DefaultContactManager response="PenalityContactForceField" />
    <MinProximityIntersection name="Proximity" alarmDistance="0.5" contactDistance="0.02"/>

   	<Node name="Beam">
        <EulerImplicitSolver  rayleighStiffness="0.1" rayleighMass="0.1" />
        <CGLinearSolver iterations="125" tolerance="1e-16" threshold="1e-16" />

        <RegularGridTopology name="MeshLines" nx="100" ny="1" nz="1" xmax="100" xmin="0" ymin="0" ymax="0" zmax="0" zmin="0"/>
		<MechanicalObject template="Rigid3" name="BeamDof" />
		<FixedConstraint name="fix" indices="0" />
        <UniformMass totalMass="0.1" />
        <BeamFEMForceField name="BeamFEM" radius="1.0" youngModulus="1000" poissonRatio="0.45" />


        <Node name="VisuBeam" activated="true">
			<MechanicalObject template="Vec3" name="SurfDof" />
			<QuadSetTopologyContainer  name="Container" />
			<QuadSetTopologyModifier   name="Modifier" />
            <QuadSetGeometryAlgorithms name="GeomAlgo"  template="Vec3" drawQuads="1"/>
			<Edge2QuadTopologicalMapping nbPointsOnEachCircle="10" radius="2" input="@../MeshLines" output="@Container" flipNormals="true"/>
            <TubularMapping nbPointsOnEachCircle="10" radius="2" input="@../BeamDof" output="@SurfDof" />

			<Node name="VisuOgl" activated="true">
				<OglModel name="Visual" color="0.7 0.7 0.7" />
				<IdentityMapping input="@../SurfDof" output="@Visual"/>
			</Node>
		</Node>
	</Node>
</Node>
