<!-- Mechanical MassSpring Group Basic Example -->
<Node name="root" dt="0.05" showBoundingTree="0" gravity="0 -9 1">
    <RequiredPlugin name="Sofa.Component.Collision.Detection.Algorithm"/> <!-- Needed to use components [BVHNarrowPhase BruteForceBroadPhase CollisionPipeline] -->
    <RequiredPlugin name="Sofa.Component.Collision.Detection.Intersection"/> <!-- Needed to use components [MinProximityIntersection] -->
    <RequiredPlugin name="Sofa.Component.Collision.Geometry"/> <!-- Needed to use components [TriangleCollisionModel] -->
    <RequiredPlugin name="Sofa.Component.Collision.Response.Contact"/> <!-- Needed to use components [DefaultContactManager] -->
    <RequiredPlugin name="Sofa.Component.Constraint.Projective"/> <!-- Needed to use components [FixedConstraint] -->
    <RequiredPlugin name="Sofa.Component.IO.Mesh"/> <!-- Needed to use components [MeshGmshLoader] -->
    <RequiredPlugin name="Sofa.Component.LinearSolver.Iterative"/> <!-- Needed to use components [CGLinearSolver] -->
    <RequiredPlugin name="Sofa.Component.Mapping.Linear"/> <!-- Needed to use components [IdentityMapping] -->
    <RequiredPlugin name="Sofa.Component.Mass"/> <!-- Needed to use components [DiagonalMass] -->
    <RequiredPlugin name="Sofa.Component.ODESolver.Backward"/> <!-- Needed to use components [EulerImplicitSolver] -->
    <RequiredPlugin name="Sofa.Component.SolidMechanics.FEM.Elastic"/> <!-- Needed to use components [TriangularFEMForceField] -->
    <RequiredPlugin name="Sofa.Component.SolidMechanics.Spring"/> <!-- Needed to use components [StiffSpringForceField TriangularBendingSprings] -->
    <RequiredPlugin name="Sofa.Component.StateContainer"/> <!-- Needed to use components [MechanicalObject] -->
    <RequiredPlugin name="Sofa.Component.Topology.Container.Dynamic"/> <!-- Needed to use components [EdgeSetGeometryAlgorithms EdgeSetTopologyContainer EdgeSetTopologyModifier TriangleSetGeometryAlgorithms TriangleSetTopologyContainer TriangleSetTopologyModifier] -->
    <RequiredPlugin name="Sofa.Component.Topology.Mapping"/> <!-- Needed to use components [Triangle2EdgeTopologicalMapping] -->
    <RequiredPlugin name="Sofa.Component.Visual"/> <!-- Needed to use components [VisualStyle] -->
    <RequiredPlugin name="Sofa.GL.Component.Rendering3D"/> <!-- Needed to use components [OglModel] -->
    <VisualStyle displayFlags="showBehaviorModels showVisual" />
    <CollisionPipeline verbose="0" />
    <BruteForceBroadPhase/>
    <BVHNarrowPhase/>
    <DefaultContactManager response="PenalityContactForceField" />
    <MinProximityIntersection name="Proximity" alarmDistance="0.8" contactDistance="0.5" />
    <DefaultAnimationLoop/>

    <Node name="SquareGravity">
        <CGImplicit iterations="40" tolerance="1e-6" threshold="1e-10" />
        <MeshGmshLoader name="loader" filename="mesh/square3.msh" createSubelements="true" />
        <MechanicalObject src="@loader" scale="10" />
        <include href="Objects/TriangleSetTopology.xml" src="@loader" />
        <DiagonalMass massDensity="0.15" />
        <FixedConstraint indices="0 1" />
        <StiffSpringForceField name="FF" />
        <TriangularFEMForceField name="FEM" youngModulus="60" poissonRatio="0.3" method="large" />
        <TriangularBendingSprings name="FEM-Bend" stiffness="300" damping="1.0" />
        <TriangleCollisionModel />

        <Node >
          <OglModel name="Visual" color="red" />
          <IdentityMapping input="@.." output="@Visual" />
        </Node>

        <Node name="Edge Mesh">
            <EdgeSetTopologyContainer name="Container" />
            <EdgeSetTopologyModifier name="Modifier" />
            <EdgeSetGeometryAlgorithms template="Vec3" name="GeomAlgo" drawEdges="1" />
            <Triangle2EdgeTopologicalMapping name="Mapping" input="@../Container" output="@Container" />
        </Node>
    </Node>
</Node>
