<!-- Use of DataDisplay to show distances from rest shape  -->
<Node name="root" gravity="0 0 -1" dt="0.05">
    <RequiredPlugin name="Sofa.Component.Collision.Detection.Algorithm"/> <!-- Needed to use components [BVHNarrowPhase BruteForceBroadPhase CollisionPipeline] -->
    <RequiredPlugin name="Sofa.Component.Collision.Detection.Intersection"/> <!-- Needed to use components [DiscreteIntersection] -->
    <RequiredPlugin name="Sofa.Component.Collision.Geometry"/> <!-- Needed to use components [TriangleCollisionModel] -->
    <RequiredPlugin name="Sofa.Component.Collision.Response.Contact"/> <!-- Needed to use components [DefaultContactManager] -->
    <RequiredPlugin name="Sofa.Component.Constraint.Projective"/> <!-- Needed to use components [FixedConstraint] -->
    <RequiredPlugin name="Sofa.Component.LinearSolver.Iterative"/> <!-- Needed to use components [CGLinearSolver] -->
    <RequiredPlugin name="Sofa.Component.Mapping.Linear"/> <!-- Needed to use components [IdentityMapping] -->
    <RequiredPlugin name="Sofa.Component.Mass"/> <!-- Needed to use components [UniformMass] -->
    <RequiredPlugin name="Sofa.Component.ODESolver.Backward"/> <!-- Needed to use components [EulerImplicitSolver] -->
    <RequiredPlugin name="Sofa.Component.SolidMechanics.FEM.Elastic"/> <!-- Needed to use components [TriangleFEMForceField] -->
    <RequiredPlugin name="Sofa.Component.SolidMechanics.Spring"/> <!-- Needed to use components [TriangleBendingSprings] -->
    <RequiredPlugin name="Sofa.Component.StateContainer"/> <!-- Needed to use components [MechanicalObject] -->
    <RequiredPlugin name="Sofa.Component.Topology.Container.Grid"/> <!-- Needed to use components [RegularGridTopology] -->
    <RequiredPlugin name="Sofa.Component.Visual"/> <!-- Needed to use components [VisualStyle] -->
    <RequiredPlugin name="Sofa.GL.Component.Rendering2D"/> <!-- Needed to use components [OglColorMap] -->
    <RequiredPlugin name="Sofa.GL.Component.Rendering3D"/> <!-- Needed to use components [DataDisplay] -->
    <RequiredPlugin name="SofaValidation"/> <!-- Needed to use components [EvalPointsDistance] -->

    <VisualStyle displayFlags="showVisual hideBehavior hideCollision hideMapping" />
    <CollisionPipeline verbose="0" name="CollisionPipeline" />
    <BruteForceBroadPhase/>
    <BVHNarrowPhase/>
    <DefaultContactManager response="PenalityContactForceField" name="collision response" />
    <DiscreteIntersection />
    <DefaultAnimationLoop/>

    <Node name="Mesh">
        <RegularGridTopology name="Grid" nx="10" ny="10" nz="1" xmin="0" xmax="9" ymin="0" ymax="9" zmin="0" zmax="1" />
        <MechanicalObject name="MO" />
    </Node>

    <Node name="Simulation">
        <EulerImplicitSolver name="cg_odesolver" printLog="false"  rayleighStiffness="0.1" rayleighMass="0.1" />
        <CGLinearSolver iterations="25" name="linear solver" tolerance="1.0e-9" threshold="1.0e-9" />
        <RegularGridTopology src="@/Mesh/Grid" />
        <MechanicalObject />
        <UniformMass vertexMass="0.1" />
        <FixedConstraint indices="0 9 99" />
        <TriangleFEMForceField name="FEM3" youngModulus="5000" poissonRatio="0.3" method="large" />
        <TriangleBendingSprings name="FEM-Bend" stiffness="100" damping="0.1" />
        <TriangleCollisionModel />

        <EvalPointsDistance name="dist" object1="@/Mesh/MO" object2="@." listening="true" period="0.05" draw="false" />


        <Node name="Data">
            <DataDisplay pointData="@../dist.distance" />
            <OglColorMap colorScheme="Blue to Red" />
            <IdentityMapping input="@.." output="@."/>
        </Node>

    </Node>
</Node>
