<?xml version="1.0"?>
<Node name="root" dt="0.02">
    <RequiredPlugin name="Sofa.Component.Visual"/> <!-- Needed to use components [VisualStyle] -->
    <RequiredPlugin name="Sofa.GL.Component.Rendering3D"/> <!-- Needed to use components [OglCylinderModel] -->
    <DefaultAnimationLoop/>
    <VisualStyle displayFlags="showVisual" />
    <OglCylinderModel  position="0 0 0   10 0 0 "  edges="0 1" />

</Node>
