<Node name="root" dt="0.01">
    <RequiredPlugin name="Sofa.Component.IO.Mesh"/> <!-- Needed to use components [MeshOBJLoader] -->
    <RequiredPlugin name="Sofa.GL.Component.Rendering3D"/> <!-- Needed to use components [OglModel OglSceneFrame] -->
    <DefaultAnimationLoop/>

    <MeshOBJLoader name="meshLoader_0" filename="mesh/liver-smooth.obj" handleSeams="1" />
    <OglModel name="VisualModel" src="@meshLoader_0" color="red" />
    <!-- <OglSceneFrame style="0"/> -->
    <OglSceneFrame style="1"/>
    <!-- <OglSceneFrame style="2"/> -->
</Node>
