<Node dt="0.01" name="root">
    <RequiredPlugin name="Sofa.Component.Collision.Detection.Algorithm"/> <!-- Needed to use components [BVHNarrowPhase BruteForceBroadPhase CollisionPipeline] -->
    <RequiredPlugin name="Sofa.Component.Collision.Detection.Intersection"/> <!-- Needed to use components [MinProximityIntersection] -->
    <RequiredPlugin name="Sofa.Component.Collision.Geometry"/> <!-- Needed to use components [LineCollisionModel PointCollisionModel TriangleCollisionModel] -->
    <RequiredPlugin name="Sofa.Component.Collision.Response.Contact"/> <!-- Needed to use components [DefaultContactManager] -->
    <RequiredPlugin name="Sofa.Component.IO.Mesh"/> <!-- Needed to use components [MeshGmshLoader MeshOBJLoader] -->
    <RequiredPlugin name="Sofa.Component.LinearSolver.Iterative"/> <!-- Needed to use components [CGLinearSolver] -->
    <RequiredPlugin name="Sofa.Component.Mapping.Linear"/> <!-- Needed to use components [BarycentricMapping] -->
    <RequiredPlugin name="Sofa.Component.Mapping.NonLinear"/> <!-- Needed to use components [RigidMapping] -->
    <RequiredPlugin name="Sofa.Component.Mass"/> <!-- Needed to use components [UniformMass] -->
    <RequiredPlugin name="Sofa.Component.ODESolver.Backward"/> <!-- Needed to use components [EulerImplicitSolver] -->
    <RequiredPlugin name="Sofa.Component.SolidMechanics.FEM.Elastic"/> <!-- Needed to use components [TetrahedronFEMForceField] -->
    <RequiredPlugin name="Sofa.Component.SolidMechanics.Spring"/> <!-- Needed to use components [MeshSpringForceField RegularGridSpringForceField] -->
    <RequiredPlugin name="Sofa.Component.StateContainer"/> <!-- Needed to use components [MechanicalObject] -->
    <RequiredPlugin name="Sofa.Component.Topology.Container.Constant"/> <!-- Needed to use components [MeshTopology] -->
    <RequiredPlugin name="Sofa.Component.Topology.Container.Grid"/> <!-- Needed to use components [RegularGridTopology] -->
    <RequiredPlugin name="Sofa.GL.Component.Rendering3D"/> <!-- Needed to use components [OglModel] -->

    <CollisionPipeline depth="6" draw="0" verbose="0" />
    <DefaultAnimationLoop/>
    <BruteForceBroadPhase/>
    <BVHNarrowPhase/>
    <MinProximityIntersection alarmDistance="0.3" contactDistance="0.2" name="Proximity" />
    <DefaultContactManager name="Response" response="PenalityContactForceField" />

    <MeshOBJLoader name="loader_torus" filename="mesh/torus.obj" />
    <MeshOBJLoader name="loader_torus2" filename="mesh/torus2.obj" />
    <MeshOBJLoader name="loader_torus_for_collision" filename="mesh/torus_for_collision.obj" />
    <MeshOBJLoader name="loader_torus2_for_collision" filename="mesh/torus2_for_collision.obj" />
    <MeshGmshLoader name="loader_torus_low_res" filename="mesh/torus_low_res.msh" />
    <MeshGmshLoader name="loader_torus2_low_res" filename="mesh/torus2_low_res.msh" />

    <Node name="TorusFixed">
        <MeshTopology src="@../loader_torus2_for_collision" />
        <MechanicalObject src="@../loader_torus2_for_collision" />
        <TriangleCollisionModel moving="0" simulated="0" />
        <LineCollisionModel moving="0" simulated="0" />
        <PointCollisionModel moving="0" simulated="0" />
        <OglModel color="0.500 0.500 0.500" src="@../loader_torus2" name="Visual" />
    </Node>
    <Node name="TorusFEM">
        <EulerImplicitSolver  rayleighStiffness="0.1" rayleighMass="0.1"/>
        <CGLinearSolver iterations="100" threshold="1e-08" tolerance="1e-05" />
        <MeshTopology src="@../loader_torus_low_res" />
        <MechanicalObject dx="7.6871" dy="0.0000" dz="0.9632" rx="10.0000" ry="-15.0000" rz="0.0000" src="@../loader_torus_low_res" />
        <UniformMass totalMass="5" />
        <TetrahedronFEMForceField computeGlobalMatrix="false" method="polar" name="FEM" poissonRatio="0.3" youngModulus="5000" />
        <Node name="Visu">
            <OglModel color="1.000 0.000 0.000" dx="7.6871" dy="0.0000" dz="0.9632" src="@../../loader_torus" name="Visual" rx="10.0000" ry="-15.0000" rz="0.0000" />
            <BarycentricMapping input="@.." output="@Visual" />
        </Node>
        <Node name="Surf2">
            <MeshTopology src="@../../loader_torus_for_collision" />
            <MechanicalObject dx="7.6871" dy="0.0000" dz="0.9632" rx="10.0000" ry="-15.0000" rz="0.0000" src="@../../loader_torus_for_collision" />
            <TriangleCollisionModel />
            <LineCollisionModel />
            <PointCollisionModel />
            <BarycentricMapping />
        </Node>
    </Node>
    <Node name="TorusSpring">
        <EulerImplicitSolver rayleighStiffness="0.1" rayleighMass="0.1" />
        <CGLinearSolver iterations="100" threshold="1e-08" tolerance="1e-05"/>
        <MeshTopology src="@../loader_torus2_low_res" />
        <MechanicalObject dx="10.0309" dy="0.0000" dz="2.1145" rx="15.0000" ry="-25.0000" rz="0.0000" src="@../loader_torus2_low_res" />
        <UniformMass totalMass="5" />
        <MeshSpringForceField name="Springs" tetrasDamping="4" tetrasStiffness="1000" />
        <Node name="Visu">
            <OglModel color="0.000 1.000 0.000" dx="10.0309" dy="0.0000" dz="2.1145" src="@../../loader_torus2" name="Visual" rx="15.0000" ry="-25.0000" rz="0.0000" />
            <BarycentricMapping input="@.." output="@Visual" />
        </Node>
        <Node name="Surf2">
            <MeshTopology src="@../../loader_torus2_for_collision" />
            <MechanicalObject dx="10.0309" dy="0.0000" dz="2.1145" rx="15.0000" ry="-25.0000" rz="0.0000" src="@../../loader_torus2_for_collision" />
            <TriangleCollisionModel />
            <LineCollisionModel />
            <PointCollisionModel />
            <BarycentricMapping />
        </Node>
    </Node>
    <Node name="TorusFFD">
        <EulerImplicitSolver rayleighStiffness="0.1" rayleighMass="0.1"/>
        <CGLinearSolver iterations="100" threshold="1e-08" tolerance="1e-05"/>
        <MechanicalObject dx="12.3521" dy="0.0000" dz="3.2783" rx="20.0000" ry="-30.0000" rz="0.0000" />
        <UniformMass totalMass="5" />
        <RegularGridTopology nx="6" ny="2" nz="5" xmax="2.5" xmin="-2.5" ymax="0.5" ymin="-0.5" zmax="2" zmin="-2" />
        <RegularGridSpringForceField damping="2" name="Springs" stiffness="200" />
        <Node name="Visu">
            <OglModel color="1.000 1.000 0.000" src="@../../loader_torus" name="Visual" />
            <BarycentricMapping input="@.." output="@Visual" />
        </Node>
        <Node name="Surf2">
            <MeshTopology src="@../../loader_torus_for_collision" />
            <MechanicalObject src="@../../loader_torus_for_collision" />
            <TriangleCollisionModel />
            <LineCollisionModel />
            <PointCollisionModel />
            <BarycentricMapping />
        </Node>
    </Node>
    <Node name="TorusRigid">
        <EulerImplicitSolver rayleighStiffness="0.01" rayleighMass="0.01"/>
        <CGLinearSolver iterations="100" threshold="1e-08" tolerance="1e-05"/>
        <MechanicalObject dx="14.4679" dy="0.0000" dz="4.7604" rx="25.0000" ry="-35.0000" rz="0.0000" template="Rigid3" />
        <UniformMass totalMass="10"/>
        <Node name="Visu">
            <OglModel color="0.500 0.500 0.500" src="@../../loader_torus2" name="Visual" />
            <RigidMapping input="@.." output="@Visual" />
        </Node>
        <Node name="Surf2">
            <MeshTopology src="@../../loader_torus2_for_collision" />
            <MechanicalObject src="@../../loader_torus2_for_collision" />
            <TriangleCollisionModel />
            <LineCollisionModel />
            <PointCollisionModel />
            <RigidMapping />
        </Node>
    </Node>
    <Node name="CFEM_Torus_1">
        <EulerImplicitSolver rayleighStiffness="0.1" rayleighMass="0.1"/>
        <CGLinearSolver iterations="100" threshold="1e-08" tolerance="1e-05"/>
        <MeshTopology src="@../loader_torus_low_res" />
        <MechanicalObject dx="20.7850" dy="0.1285" dz="15.4381" rx="-36.1968" ry="38.9599" rz="6.3146" src="@../loader_torus_low_res" />
        <UniformMass totalMass="5" />
        <TetrahedronFEMForceField computeGlobalMatrix="false" method="polar" name="FEM" poissonRatio="0.3" youngModulus="5000" />
        <Node name="Visu">
            <OglModel color="1.000 0.000 0.000" dx="20.7850" dy="0.1285" dz="15.4381" src="@../../loader_torus" name="Visual" rx="-36.1968" ry="38.9599" rz="6.3146" />
            <BarycentricMapping input="@.." output="@Visual" />
        </Node>
        <Node name="Surf2">
            <MeshTopology src="@../../loader_torus_for_collision" />
            <MechanicalObject dx="20.7850" dy="0.1285" dz="15.4381" rx="-36.1968" ry="38.9599" rz="6.3146" src="@../../loader_torus_for_collision" />
            <TriangleCollisionModel />
            <LineCollisionModel />
            <PointCollisionModel />
            <BarycentricMapping />
        </Node>
    </Node>
    <Node name="CFEM_Torus_2">
        <EulerImplicitSolver rayleighStiffness="0.1" rayleighMass="0.1"/>
        <CGLinearSolver iterations="100" threshold="1e-08" tolerance="1e-05"/>
        <MeshTopology src="@../loader_torus2_low_res" />
        <MechanicalObject dx="22.1025" dy="-0.1037" dz="13.4780" rx="-26.3682" ry="62.5274" rz="-0.8890" src="@../loader_torus2_low_res" />
        <UniformMass totalMass="5" />
        <TetrahedronFEMForceField computeGlobalMatrix="false" method="polar" name="FEM" poissonRatio="0.3" youngModulus="5000" />
        <Node name="Visu">
            <OglModel color="1.000 0.000 0.000" dx="22.1025" dy="-0.1037" dz="13.4780" src="@../../loader_torus2" name="Visual" rx="-26.3682" ry="62.5274" rz="-0.8890" />
            <BarycentricMapping input="@.." output="@Visual" />
        </Node>
        <Node name="Surf2">
            <MeshTopology src="@../../loader_torus2_for_collision" />
            <MechanicalObject dx="22.1025" dy="-0.1037" dz="13.4780" rx="-26.3682" ry="62.5274" rz="-0.8890" src="@../../loader_torus2_for_collision" />
            <TriangleCollisionModel />
            <LineCollisionModel />
            <PointCollisionModel />
            <BarycentricMapping />
        </Node>
    </Node>
    <Node name="CFEM_Torus_3">
        <EulerImplicitSolver rayleighStiffness="0.1" rayleighMass="0.1"/>
        <CGLinearSolver iterations="100" threshold="1e-08" tolerance="1e-05"/>
        <MeshTopology src="@../loader_torus_low_res" />
        <MechanicalObject dx="2.5428" dy="0.0000" dz="0.0195" rx="-0.0000" ry="-5.0000" rz="0.0000" src="@../loader_torus_low_res" />
        <UniformMass totalMass="5" />
        <TetrahedronFEMForceField computeGlobalMatrix="false" method="polar" name="FEM" poissonRatio="0.3" youngModulus="5000" />
        <Node name="Visu">
            <OglModel color="1.000 0.000 0.000" dx="2.5428" dy="0.0000" dz="0.0195" src="@../../loader_torus" name="Visual" rx="-0.0000" ry="-5.0000" rz="0.0000" />
            <BarycentricMapping input="@.." output="@Visual" />
        </Node>
        <Node name="Surf2">
            <MeshTopology src="@../../loader_torus_for_collision" />
            <MechanicalObject dx="2.5428" dy="0.0000" dz="0.0195" rx="-0.0000" ry="-5.0000" rz="0.0000" src="@../../loader_torus_for_collision" />
            <TriangleCollisionModel />
            <LineCollisionModel />
            <PointCollisionModel />
            <BarycentricMapping />
        </Node>
    </Node>
    <Node name="CFEM_Torus_4">
        <EulerImplicitSolver rayleighStiffness="0.1" rayleighMass="0.1"/>
        <CGLinearSolver iterations="100" threshold="1e-08" tolerance="1e-05"/>
        <MeshTopology src="@../loader_torus2_low_res" />
        <MechanicalObject dx="5.1472" dy="0.0000" dz="0.3725" rx="5.0000" ry="-10.0000" rz="0.0000" src="@../loader_torus2_low_res" />
        <UniformMass totalMass="5" />
        <TetrahedronFEMForceField computeGlobalMatrix="false" method="polar" name="FEM" poissonRatio="0.3" youngModulus="5000" />
        <Node name="Visu">
            <OglModel color="1.000 0.000 0.000" dx="5.1472" dy="0.0000" dz="0.3725" src="@../../loader_torus2" name="Visual" rx="5.0000" ry="-10.0000" rz="0.0000" />
            <BarycentricMapping input="@.." output="@Visual" />
        </Node>
        <Node name="Surf2">
            <MeshTopology src="@../../loader_torus2_for_collision" />
            <MechanicalObject dx="5.1472" dy="0.0000" dz="0.3725" rx="5.0000" ry="-10.0000" rz="0.0000" src="@../../loader_torus2_for_collision" />
            <TriangleCollisionModel />
            <LineCollisionModel />
            <PointCollisionModel />
            <BarycentricMapping />
        </Node>
    </Node>

    <Node name="CSpring_Torus_1">
        <EulerImplicitSolver rayleighStiffness="0.1" rayleighMass="0.1"/>
        <CGLinearSolver iterations="100" threshold="1e-08" tolerance="1e-05"/>
        <MeshTopology src="@../loader_torus_low_res" />
        <MechanicalObject dx="16.6441" dy="0.0000" dz="6.3875" rx="30.0000" ry="-40.0000" rz="0.0000" src="@../loader_torus_low_res" />
        <UniformMass totalMass="5" />
        <MeshSpringForceField name="Springs" tetrasDamping="4" tetrasStiffness="1000" />
        <Node name="Visu">
            <OglModel color="0.000 1.000 0.000" dx="16.6441" dy="0.0000" dz="6.3875" src="@../../loader_torus" name="Visual" rx="30.0000" ry="-40.0000" rz="0.0000" />
            <BarycentricMapping input="@.." output="@Visual" />
        </Node>
        <Node name="Surf2">
            <MeshTopology src="@../../loader_torus_for_collision" />
            <MechanicalObject dx="16.6441" dy="0.0000" dz="6.3875" rx="30.0000" ry="-40.0000" rz="0.0000" src="@../../loader_torus_for_collision" />
            <TriangleCollisionModel />
            <LineCollisionModel />
            <PointCollisionModel />
            <BarycentricMapping />
        </Node>
    </Node>
    <Node name="CSpring_Torus_2">
        <EulerImplicitSolver rayleighStiffness="0.1" rayleighMass="0.1"/>
        <CGLinearSolver iterations="100" threshold="1e-08" tolerance="1e-05"/>
        <MeshTopology src="@../loader_torus2_low_res" />
        <MechanicalObject dx="18.5592" dy="0.0000" dz="7.9944" rx="48.8686" ry="-40.0000" rz="0.0000" src="@../loader_torus2_low_res" />
        <UniformMass totalMass="5" />
        <MeshSpringForceField name="Springs" tetrasDamping="4" tetrasStiffness="1000" />
        <Node name="Visu">
            <OglModel color="0.000 1.000 0.000" dx="18.5592" dy="0.0000" dz="7.9944" src="@../../loader_torus2" name="Visual" rx="48.8686" ry="-40.0000" rz="0.0000" />
            <BarycentricMapping input="@.." output="@Visual" />
        </Node>
        <Node name="Surf2">
            <MeshTopology src="@../../loader_torus2_for_collision" />
            <MechanicalObject dx="18.5592" dy="0.0000" dz="7.9944" rx="48.8686" ry="-40.0000" rz="0.0000" src="@../../loader_torus2_for_collision" />
            <TriangleCollisionModel />
            <LineCollisionModel />
            <PointCollisionModel />
            <BarycentricMapping />
        </Node>
    </Node>
    <Node name="CSpring_Torus_3">
        <EulerImplicitSolver rayleighStiffness="0.1" rayleighMass="0.1"/>
        <CGLinearSolver iterations="100" threshold="1e-08" tolerance="1e-05"/>
        <MeshTopology src="@../loader_torus_low_res" />
        <MechanicalObject src="@../loader_torus_low_res" dx="20.4743" dy="0.0000" dz="9.6014" rx="56.6532" ry="-40.0000" rz="-0.0000" />
        <UniformMass totalMass="5" />
        <MeshSpringForceField name="Springs" tetrasDamping="4" tetrasStiffness="1000" />
        <Node name="Visu">
            <OglModel color="0.000 1.000 0.000" dx="20.4743" dy="0.0000" dz="9.6014" src="@../../loader_torus" name="Visual" rx="56.6532" ry="-40.0000" rz="-0.0000" />
            <BarycentricMapping input="@.." output="@Visual" />
        </Node>
        <Node name="Surf2">
            <MeshTopology src="@../../loader_torus_for_collision" />
            <MechanicalObject dx="20.4743" dy="0.0000" dz="9.6014" rx="56.6532" ry="-40.0000" rz="-0.0000" src="@../../loader_torus_for_collision" />
            <TriangleCollisionModel />
            <LineCollisionModel />
            <PointCollisionModel />
            <BarycentricMapping />
        </Node>
    </Node>
    <Node name="CSpring_Torus_4">
        <EulerImplicitSolver rayleighStiffness="0.1" rayleighMass="0.1"/>
        <CGLinearSolver iterations="100" threshold="1e-08" tolerance="1e-05"/>
        <MeshTopology src="@../loader_torus2_low_res" />
        <MechanicalObject src="@../loader_torus2_low_res" dx="22.4849" dy="-0.1005" dz="11.2034" rx="85.4976" ry="-41.5228" rz="4.1695" />
        <UniformMass totalMass="5" />
        <MeshSpringForceField name="Springs" tetrasDamping="4" tetrasStiffness="1000" />
        <Node name="Visu">
            <OglModel color="0.000 1.000 0.000" dx="22.4849" dy="-0.1005" dz="11.2034" src="@../../loader_torus2" name="Visual" rx="85.4976" ry="-41.5228" rz="4.1695" />
            <BarycentricMapping input="@.." output="@Visual" />
        </Node>
        <Node name="Surf2">
            <MeshTopology src="@../../loader_torus2_for_collision" />
            <MechanicalObject dx="22.4849" dy="-0.1005" dz="11.2034" rx="85.4976" ry="-41.5228" rz="4.1695" src="@../../loader_torus2_for_collision" />
            <TriangleCollisionModel />
            <LineCollisionModel />
            <PointCollisionModel />
            <BarycentricMapping />
        </Node>
    </Node>
    <Node name="CFFD_Torus_1">
        <EulerImplicitSolver rayleighStiffness="0.1" rayleighMass="0.1"/>
        <CGLinearSolver iterations="100" threshold="1e-08" tolerance="1e-05"/>
        <MechanicalObject dx="12.2149" dy="0.0000" dz="21.0581" rx="-20.0000" ry="25.0000" rz="0.0000" />
        <UniformMass totalMass="5" />
        <RegularGridTopology nx="6" ny="2" nz="5" xmax="2.5" xmin="-2.5" ymax="0.5" ymin="-0.5" zmax="2" zmin="-2" />
        <RegularGridSpringForceField damping="2" name="Springs" stiffness="200" />
        <Node name="Visu">
            <OglModel color="1.000 1.000 0.000" src="@../../loader_torus" name="Visual" />
            <BarycentricMapping input="@.." output="@Visual" />
        </Node>
        <Node name="Surf2">
            <MeshTopology src="@../../loader_torus_for_collision" />
            <MechanicalObject src="@../../loader_torus_for_collision" />
            <TriangleCollisionModel />
            <LineCollisionModel />
            <PointCollisionModel />
            <BarycentricMapping />
        </Node>
    </Node>
    <Node name="CFFD_Torus_2">
        <EulerImplicitSolver rayleighStiffness="0.1" rayleighMass="0.1"/>
        <CGLinearSolver iterations="100" threshold="1e-08" tolerance="1e-05"/>
        <MechanicalObject dx="14.5348" dy="0.0000" dz="19.7939" rx="-25.0000" ry="30.0000" rz="0.0000" />
        <UniformMass totalMass="5" />
        <RegularGridTopology nx="6" ny="5" nz="2" xmax="2.5" xmin="-2.5" ymax="2" ymin="-2" zmax="0.5" zmin="-0.5" />
        <RegularGridSpringForceField damping="2" name="Springs" stiffness="200" />
        <Node name="Visu">
            <OglModel color="1.000 1.000 0.000" src="@../../loader_torus2" name="Visual" />
            <BarycentricMapping input="@.." output="@Visual" />
        </Node>
        <Node name="Surf2">
            <MeshTopology src="@../../loader_torus2_for_collision" />
            <MechanicalObject src="@../../loader_torus2_for_collision" />
            <TriangleCollisionModel />
            <LineCollisionModel />
            <PointCollisionModel />
            <BarycentricMapping />
        </Node>
    </Node>
    <Node name="CFFD_Torus_3">
        <EulerImplicitSolver rayleighStiffness="0.1" rayleighMass="0.1"/>
        <CGLinearSolver iterations="100" threshold="1e-08" tolerance="1e-05"/>
        <MechanicalObject dx="16.7666" dy="0.0000" dz="18.3835" rx="-30.0000" ry="35.0000" rz="0.0000" />
        <UniformMass totalMass="5" />
        <RegularGridTopology nx="6" ny="2" nz="5" xmax="2.5" xmin="-2.5" ymax="0.5" ymin="-0.5" zmax="2" zmin="-2" />
        <RegularGridSpringForceField damping="2" name="Springs" stiffness="200" />
        <Node name="Visu">
            <OglModel color="1.000 1.000 0.000" src="@../../loader_torus" name="Visual" />
            <BarycentricMapping input="@.." output="@Visual" />
        </Node>
        <Node name="Surf2">
            <MeshTopology src="@../../loader_torus_for_collision" />
            <MechanicalObject src="@../../loader_torus_for_collision" />
            <TriangleCollisionModel />
            <LineCollisionModel />
            <PointCollisionModel />
            <BarycentricMapping />
        </Node>
    </Node>
    <Node name="CFFD_Torus_4">
        <EulerImplicitSolver rayleighStiffness="0.1" rayleighMass="0.1"/>
        <CGLinearSolver iterations="100" threshold="1e-08" tolerance="1e-05"/>
        <MechanicalObject dx="18.8145" dy="0.0000" dz="16.9496" rx="-35.0000" ry="35.0000" rz="0.0000" />
        <UniformMass totalMass="5" />
        <RegularGridTopology nx="6" ny="5" nz="2" xmax="2.5" xmin="-2.5" ymax="2" ymin="-2" zmax="0.5" zmin="-0.5" />
        <RegularGridSpringForceField damping="2" name="Springs" stiffness="200" />
        <Node name="Visu">
            <OglModel color="1.000 1.000 0.000" src="@../../loader_torus2" name="Visual" />
            <BarycentricMapping input="@.." output="@Visual" />
        </Node>
        <Node name="Surf2">
            <MeshTopology src="@../../loader_torus2_for_collision" />
            <MechanicalObject src="@../../loader_torus2_for_collision" />
            <TriangleCollisionModel />
            <LineCollisionModel />
            <PointCollisionModel />
            <BarycentricMapping />
        </Node>
    </Node>
    <Node name="CRigid_TorusFixed">
        <MeshTopology src="@../loader_torus2_for_collision" />
        <MechanicalObject dx="0.0000" dy="0.0000" dz="24.0000" rx="0.0000" ry="0.0000" rz="0.0000" src="@../loader_torus2_for_collision" />
        <TriangleCollisionModel moving="0" simulated="0" />
        <LineCollisionModel moving="0" simulated="0" />
        <PointCollisionModel moving="0" simulated="0" />
        <OglModel color="0.500 0.500 0.500" dx="0.0000" dy="0.0000" dz="24.0000" src="@../loader_torus2" name="Visual" rx="0.0000" ry="0.0000" rz="0.0000" />
    </Node>
    <Node name="CRigid_Torus_1">
        <EulerImplicitSolver rayleighStiffness="0.01" rayleighMass="0.01"/>
        <CGLinearSolver iterations="100" threshold="1e-08" tolerance="1e-05"/>
        <MechanicalObject dx="2.5428" dy="0.0000" dz="23.9805" rx="-0.0000" ry="5.0000" rz="-0.0000" template="Rigid3" />
        <UniformMass totalMass="10" />
        <Node name="Visu">
            <OglModel color="0.500 0.500 0.500" src="@../../loader_torus" name="Visual" />
            <RigidMapping input="@.." output="@Visual" />
        </Node>
        <Node name="Surf2">
            <MeshTopology src="@../../loader_torus_for_collision" />
            <MechanicalObject src="@../../loader_torus_for_collision" />
            <TriangleCollisionModel />
            <LineCollisionModel />
            <PointCollisionModel />
            <RigidMapping />
        </Node>
    </Node>
    <Node name="CRigid_Torus_2">
        <EulerImplicitSolver rayleighStiffness="0.01" rayleighMass="0.01"/>
        <CGLinearSolver iterations="100" threshold="1e-08" tolerance="1e-05"/>
        <MechanicalObject dx="5.1472" dy="0.0000" dz="23.6275" rx="-5.0000" ry="10.0000" rz="0.0000" template="Rigid3" />
        <UniformMass totalMass="10" />
        <Node name="Visu">
            <OglModel color="0.500 0.500 0.500" src="@../../loader_torus2" name="Visual" />
            <RigidMapping input="@.." output="@Visual" />
        </Node>
        <Node name="Surf2">
            <MeshTopology src="@../../loader_torus2_for_collision" />
            <MechanicalObject src="@../../loader_torus2_for_collision" />
            <TriangleCollisionModel />
            <LineCollisionModel />
            <PointCollisionModel />
            <RigidMapping />
        </Node>
    </Node>
    <Node name="CRigid_Torus_3">
        <EulerImplicitSolver rayleighStiffness="0.01" rayleighMass="0.01"/>
        <CGLinearSolver iterations="100" threshold="1e-08" tolerance="1e-05"/>
        <MechanicalObject dx="7.5617" dy="0.0000" dz="23.1296" rx="-10.0000" ry="15.0000" rz="0.0000" template="Rigid3" />
        <UniformMass totalMass="10" />
        <Node name="Visu">
            <OglModel color="0.500 0.500 0.500" src="@../../loader_torus" name="Visual" />
            <RigidMapping input="@.." output="@Visual" />
        </Node>
        <Node name="Surf2">
            <MeshTopology src="@../../loader_torus_for_collision" />
            <MechanicalObject src="@../../loader_torus_for_collision" />
            <TriangleCollisionModel />
            <LineCollisionModel />
            <PointCollisionModel />
            <RigidMapping />
        </Node>
    </Node>
    <Node name="CRigid_Torus_4">
        <EulerImplicitSolver rayleighStiffness="0.01" rayleighMass="0.01"/>
        <CGLinearSolver iterations="100" threshold="1e-08" tolerance="1e-05"/>
        <MechanicalObject dx="9.9491" dy="0.0000" dz="22.1146" rx="-15.0000" ry="25.0000" rz="0.0000" template="Rigid3" />
        <UniformMass totalMass="10" />
        <Node name="Visu">
            <OglModel color="0.500 0.500 0.500" src="@../../loader_torus2" name="Visual" />
            <RigidMapping input="@.." output="@Visual" />
        </Node>
        <Node name="Surf2">
            <MeshTopology src="@../../loader_torus2_for_collision" />
            <MechanicalObject src="@../../loader_torus2_for_collision" />
            <TriangleCollisionModel />
            <LineCollisionModel />
            <PointCollisionModel />
            <RigidMapping />
        </Node>
    </Node>
</Node>
