<Node name="CollisionNode">
  <MeshOBJLoader name="loader" filename="file"/>
  <MeshTopology src="@loader"/>
  <MechanicalObject src="@loader" translation="0 0 0" rotation="0 0 0" scale3d="0 0 0"/>
  <TriangleCollisionModel contactStiffness="200"/>
  <LineCollisionModel     contactStiffness="@[-1].contactStiffness"/>
  <PointCollisionModel    contactStiffness="@[-1].contactStiffness" />
  <BarycentricMapping />
</Node>
