<Node name="Springs">
	<EulerImplicitSolver rayleighStiffness="0.01"  rayleighMass="0.1" />
	<CGLinearSolver iterations="25" threshold="0.00000001" />
	<SparseGridTopology n="6 6 6" filename="file"/>
	<MechanicalObject translation="0 0 0" rotation="0 0 0" scale3d="1.0 1.0 1.0"/>
	<UniformMass totalMass="1" />
	<MeshSpringForceField name="Springs" stiffness="400" damping="4"/>
    <VisualNode color="green"/>
    <CollisionNode/>
</Node>
