<Node name="MeshTetraFEM">
	<EulerImplicitSolver rayleighStiffness="0.01"  rayleighMass="0.1" />
	<CGLinearSolver iterations="25" threshold="0.00000001" />
	<MeshOBJLoader name="loader" filename="file"/>
	<MeshTopology src="@loader"/>
	<MechanicalObject src="@loader" translation="0 0 0" rotation="0 0 0" scale3d="1.0 1.0 1.0"/>
	<UniformMass totalMass="5" />
	<TetrahedronFEMForceField name="FEM" youngModulus="1000" poissonRatio="0.3"  method="polar"/>
    <VisualNodeTransformation/>
    <CollisionNodeTransformation/>
</Node>
