<Node name="RigidBody">
	<EulerImplicitSolver rayleighStiffness="0.01"  rayleighMass="0.1" />
	<CGLinearSolver iterations="25" threshold="0.00000001"  />
	<MechanicalObject template="Rigid3" translation="0 0 0" rotation="0 0 0" scale3d="1 1 1"/>
	<UniformMass />
	<Node name="VisualNode" tags="Visual">
		<OglModel name="Visual" filename="file" color="gray" scale3d="1 1 1" />
		<RigidMapping input="@.." output="@Visual" />
	</Node>
	<Node name="CollisionNode">
      <MeshOBJLoader name="loader" filename="file"/>
      <MeshTopology src="@loader"/>
      <MechanicalObject src="@loader" scale3d="1 1 1"/>
      <TriangleCollisionModel contactStiffness="200"/>
      <LineCollisionModel     contactStiffness="@[-1].contactStiffness"/>
      <PointCollisionModel    contactStiffness="@[-1].contactStiffness" />
	  <RigidMapping/>
	</Node>
</Node>
