<Node name="TorusFEM">
	<EulerImplicitSolver rayleighStiffness="0.01"  rayleighMass="0.1" />
	<CGLinearSolver iterations="25" threshold="0.00000001" tolerance="1e-05" />
	<MeshGmshLoader name="meshLoader" filename="mesh/torus_low_res.msh"/>
	<MeshTopology src="@meshLoader" />
	<MechanicalObject dx="0" dy="0" dz="0" rx="0" ry="0" rz="0" scale="1.0" />
	<UniformMass totalMass="5" />
	<TetrahedronFEMForceField name="FEM" youngModulus="1000" poissonRatio="0.3" computeGlobalMatrix="false" method="polar"/>
	<Node name="Visu">
		<MeshOBJLoader name="meshVisualLoader" filename="mesh/torus.obj"/>
		<OglModel name="Visual" src="@meshVisualLoader" color="red" dx="0" dy="0" dz="0" rx="0" ry="0" rz="0" scale="1.0"/>
		<BarycentricMapping input="@.." output="@Visual" />
	</Node>
	<Node name="Surf2">
		<MeshOBJLoader name="meshCollisionLoader" filename="mesh/torus_for_collision.obj"/>
		<MeshTopology src="@meshCollisionLoader"/>
		<MechanicalObject dx="0" dy="0" dz="0" rx="0" ry="0" rz="0" scale="1.0"/>
		<TriangleCollisionModel />
		<BarycentricMapping />
	</Node>
</Node>
