<Node name="TorusFFD">
	<EulerImplicitSolver rayleighStiffness="0.01"  rayleighMass="0.1" />
	<CGLinearSolver iterations="25" threshold="0.00000001" tolerance="1e-05"/>
	<RegularGridTopology
			nx="6" ny="2" nz="5"
			xmin="-2.5" xmax="2.5"
			ymin="-0.5" ymax="0.5"
			zmin="-2" zmax="2"
		/>
	<MechanicalObject dx="0" dy="0" dz="0" rx="0" ry="0" rz="0" scale="1.0" />
	<UniformMass totalMass="5" />
	<RegularGridSpringForceField name="Springs" stiffness="200" damping="2" />
	<Node name="Visu">
		<MeshOBJLoader name="meshVisualLoader" filename="mesh/torus.obj"/>
		<OglModel name="Visual" src="@meshVisualLoader" color="yellow"  scale="1.0"/>
		<BarycentricMapping input="@.." output="@Visual" />
	</Node>
	<Node name="Surf2">
        <MeshOBJLoader name="meshCollisionLoader" filename="mesh/torus_for_collision.obj"/>
		<MeshTopology src="@meshCollisionLoader"/>
		<MechanicalObject scale="1.0"/>
		<TriangleCollisionModel />
		<BarycentricMapping />
	</Node>
</Node>
