<Node name="TorusRigid">
	<EulerImplicitSolver rayleighStiffness="0.01"  rayleighMass="0.1" />
	<CGLinearSolver iterations="25" threshold="0.00000001"  tolerance="1e-05"/>
	<MechanicalObject template="Rigid3"  dx="0" dy="0" dz="0" rx="0" ry="0" rz="0" scale="1.0"  />
	<UniformMass />
	<Node name="Visu">
		<MeshOBJLoader name="meshVisualLoader" filename="mesh/torus.obj"/>
		<OglModel name="Visual" src="@meshVisualLoader" color="gray" scale="1.0"/>
		<RigidMapping input="@.." output="@Visual" />
	</Node>
	<Node name="Surf2">
		<MeshOBJLoader name="meshCollisionLoader" filename="mesh/torus_for_collision.obj"/>
		<MeshTopology src="@meshCollisionLoader" />
		<MechanicalObject scale="1.0" />
		<TriangleCollisionModel />
		<RigidMapping />
	</Node>
</Node>
