<?xml version="1.0"?>

<Node 	 name="root"  gravity="0 -10 0"  dt="0.01"  time="0"  animate="0"  >
    <RequiredPlugin name="Sofa.Component.Constraint.Projective"/> <!-- Needed to use components [FixedConstraint] -->
    <RequiredPlugin name="Sofa.Component.LinearSolver.Iterative"/> <!-- Needed to use components [CGLinearSolver] -->
    <RequiredPlugin name="Sofa.Component.Mapping.Linear"/> <!-- Needed to use components [BarycentricMapping] -->
    <RequiredPlugin name="Sofa.Component.Mass"/> <!-- Needed to use components [UniformMass] -->
    <RequiredPlugin name="Sofa.Component.ODESolver.Backward"/> <!-- Needed to use components [EulerImplicitSolver] -->
    <RequiredPlugin name="Sofa.Component.SolidMechanics.FEM.Elastic"/> <!-- Needed to use components [TetrahedronFEMForceField] -->
    <RequiredPlugin name="Sofa.Component.StateContainer"/> <!-- Needed to use components [MechanicalObject] -->
    <RequiredPlugin name="Sofa.Component.Topology.Container.Constant"/> <!-- Needed to use components [MeshTopology] -->
    <RequiredPlugin name="Sofa.Component.Visual"/> <!-- Needed to use components [InteractiveCamera VisualStyle] -->
    <RequiredPlugin name="Sofa.GL.Component.Rendering3D"/> <!-- Needed to use components [OglModel] -->
        <EulerImplicitSolver name="solver"  printLog="0"  rayleighStiffness="0.1" rayleighMass="0.1" />
        <CGLinearSolver iterations="25" tolerance="1e-5" threshold="1e-5"/>
	<MechanicalObject template="Vec3d" name="DOF"  position="0 10 0 10 0 0 -5 0 8.66 -5 0 -8.66"  velocity="0 0 0 0 0 0 0 0 0 0 0 0"  force="0 0 0 0 0 0 0 0 0 0 0 0"  externalForce="0 0 0 0 0 0 0 0 0 0 0 0"  derivX="0 0 0 0 0 0 0 0 0 0 0 0"  free_position="0 10 0 10 0 0 -5 0 8.66 -5 0 -8.66"  free_velocity="0 0 0 0 0 0 0 0 0 0 0 0"  rest_position="0 10 0 10 0 0 -5 0 8.66 -5 0 -8.66"  reset_position="0 10 0 10 0 0 -5 0 8.66 -5 0 -8.66"  restScale="1"  showObject="1"  showObjectScale="10" />
	<UniformMass template="Vec3d" name="mass"  mass="2"  totalMass="8" />
	<MeshTopology name="mesh topology"  edges="0 1  0 2  0 3  1 2  1 3  2 3 "  triangles="1 3 2  0 2 3  0 3 1  0 1 2 "  tetrahedra="0 1 2 3 " />
	<FixedConstraint template="Vec3d" name="constraints"  indices="0 0" />
	<TetrahedronFEMForceField template="Vec3d" name="FEM"  initialPoints="0 10 0 10 0 0 -5 0 8.66 -5 0 -8.66" poissonRatio="0.45" method="polar"  youngModulus="6"  updateStiffnessMatrix="1"  gatherPt=" "  gatherBsize=" " />
        <VisualStyle displayFlags="showVisual showBehaviorModels showForceFields showInteractionForceFields hideCollision hideMapping showWireframe hideNormals" />
	<DefaultAnimationLoop name="defaultAnimationLoop" />
	<DefaultVisualManagerLoop name="defaultVisualManagerLoop" />
	<InteractiveCamera name="baseCamera"  position="2.5 5 37.4995"  orientation="-0 -0 0 1"  lookAt="2.5 5 0"  distance="37.4995"  minBBox="-5 0 -8.66"  maxBBox="10 10 8.66"  widthViewport="190"  heightViewport="552" />

	<Node 	 name="skin"  gravity="0 -10 0"  dt="0.01"  time="0"  animate="0"  >
                <VisualStyle displayFlags="showVisual showBehaviorModels showForceFields hideInteractionForceFields  hideCollision " />
 		<OglModel name="visual"  position="0.544038 2.44566 1.81206 0.232044 2.5528 1.41211 0.838099 2.75972 1.34867 0.896928 2.57859 1.73867 1.69707 3.03013 1.26566 0.368837 2.77476 0.988877 0.974149 3.13696 0.843548 0.801509 3.40228 0.0080934 1.08306 3.49883 0.224277 1.09288 3.68653 -0.311522 0.974671 3.86934 -0.467624 1.4324 3.79497 -0.558491 1.56494 3.62759 0.335069 1.54197 3.43367 0.694233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"  normal="0.293214 -0.564919 0.771293 0.18285 -0.808364 -0.559565 0.217174 -0.805803 -0.550924 0.497287 -0.604726 0.622103 0.482586 -0.844887 -0.230819 0.252633 -0.891595 -0.375814 0.346953 -0.805345 -0.480668 0.49106 -0.783216 -0.381358 0.456481 -0.818233 -0.349455 0.260618 -0.90668 -0.331676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"  texcoords="0 0 0 0 0 0 0 0 0 0 0 0 0 0 0 0 0 0 0 0 0 0 0 0 0 0 0 0 0 0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"  triangles="0 2193 1374  2 2190 2191  2 2188 2190  2 1373 1380  5 2184 2185  6 1381 1384  7 2180 2181  8 1385 1388  9 1387 1390  10 2174 2175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"  translation="0 0 0"  rotation="0 0 0"  scale3d="1 1 1"  scaleTex="1 1"  translationTex="0 0"  material="mat1 Diffuse 1 1 0 0 1 Ambient 1 0.2 0 0 1 Specular 1 1 0 0 1 Emissive 0 1 0 0 1 Shininess 0 45 "  materials="mat1 Diffuse 1 1 0 0 1 Ambient 1 0.2 0 0 1 Specular 1 1 1 1 1 Emissive 0 0 0 0 0 Shininess 0 45 "  groups="Mesh1 mat1 0 0 4384 0 0"  primitiveType="DEFAULT"  blendEquation="GL_FUNC_ADD"  sfactor="GL_SRC_ALPHA"  dfactor="GL_ONE_MINUS_SRC_ALPHA" />
<!-- -->		<BarycentricMapping template="Vec3d,Vec3d" name="mapping"  mapForces="0"  mapConstraints="0"  mapMasses="0"  input="@/DOF"  output="@visual" />
        </Node>

</Node>
