<?xml version="1.0" ?>
<!-- See http://wiki.sofa-framework.org/wiki/TutorialMappingDragonRigid -->
<Node name="root" dt="0.01" gravity="0 0 -9.81">
    <RequiredPlugin name="Sofa.Component.IO.Mesh"/> <!-- Needed to use components [MeshOBJLoader] -->
    <RequiredPlugin name="Sofa.Component.LinearSolver.Iterative"/> <!-- Needed to use components [CGLinearSolver] -->
    <RequiredPlugin name="Sofa.Component.Mapping.NonLinear"/> <!-- Needed to use components [RigidMapping] -->
    <RequiredPlugin name="Sofa.Component.Mass"/> <!-- Needed to use components [UniformMass] -->
    <RequiredPlugin name="Sofa.Component.MechanicalLoad"/> <!-- Needed to use components [PlaneForceField] -->
    <RequiredPlugin name="Sofa.Component.ODESolver.Backward"/> <!-- Needed to use components [EulerImplicitSolver] -->
    <RequiredPlugin name="Sofa.Component.StateContainer"/> <!-- Needed to use components [MechanicalObject] -->
    <RequiredPlugin name="Sofa.Component.Visual"/> <!-- Needed to use components [VisualStyle] -->
    <RequiredPlugin name="Sofa.GL.Component.Rendering3D"/> <!-- Needed to use components [OglModel] -->
    <VisualStyle displayFlags="showVisual showBehavior" />
    <DefaultAnimationLoop/>

    <EulerImplicitSolver name="EulerImplicit"  rayleighStiffness="0.1" rayleighMass="0.1" />
    <CGLinearSolver name="CG Solver" iterations="25" tolerance="1e-5" threshold="1e-5"/>
    <MechanicalObject name="RigidDOF" template="Rigid3" dz="1" rotation="90 0 -90" />
    <UniformMass name="Mass" filename="BehaviorModels/dragon.rigid" />
    <Node name="DragonVisual">
        <MeshOBJLoader name="meshLoader_0" filename="mesh/dragon.obj" scale="0.1" handleSeams="1" />
        <OglModel name="DragonVisualParticles" src="@meshLoader_0" />
        <RigidMapping name="RigidMapping1" input="@../RigidDOF" output="@DragonVisualParticles" />
    </Node>
    <Node name="Dragon">
        <MeshOBJLoader name="loader" filename="mesh/dragon.obj" />
        <MechanicalObject src="@loader" name="DragonParticles" scale="0.1" />
        <PlaneForceField name="Floor" normal="0 0.2 1" stiffness="100" damping="1" showPlane= "1"/>
        <PlaneForceField name="Wall" normal="0 -1 0" d="-4" stiffness="100" damping="1" showPlane= "1"/>
        <RigidMapping name="RigidMapping2" input="@../RigidDOF" output="@DragonParticles" />
    </Node>
</Node>
