<Node name="root" dt="0.005">
    <RequiredPlugin name="Sofa.Component.Collision.Detection.Algorithm"/> <!-- Needed to use components [BVHNarrowPhase BruteForceBroadPhase CollisionPipeline] -->
    <RequiredPlugin name="Sofa.Component.Collision.Detection.Intersection"/> <!-- Needed to use components [DiscreteIntersection] -->
    <RequiredPlugin name="Sofa.Component.Collision.Geometry"/> <!-- Needed to use components [SphereCollisionModel] -->
    <RequiredPlugin name="Sofa.Component.Collision.Response.Contact"/> <!-- Needed to use components [DefaultContactManager] -->
    <RequiredPlugin name="Sofa.Component.IO.Mesh"/> <!-- Needed to use components [SphereLoader] -->
    <RequiredPlugin name="Sofa.Component.LinearSolver.Iterative"/> <!-- Needed to use components [CGLinearSolver] -->
    <RequiredPlugin name="Sofa.Component.Mapping.Linear"/> <!-- Needed to use components [BarycentricMapping] -->
    <RequiredPlugin name="Sofa.Component.Mass"/> <!-- Needed to use components [UniformMass] -->
    <RequiredPlugin name="Sofa.Component.ODESolver.Backward"/> <!-- Needed to use components [EulerImplicitSolver] -->
    <RequiredPlugin name="Sofa.Component.SolidMechanics.Spring"/> <!-- Needed to use components [RegularGridSpringForceField] -->
    <RequiredPlugin name="Sofa.Component.StateContainer"/> <!-- Needed to use components [MechanicalObject] -->
    <RequiredPlugin name="Sofa.Component.Topology.Container.Grid"/> <!-- Needed to use components [RegularGridTopology] -->
    <RequiredPlugin name="Sofa.Component.Visual"/> <!-- Needed to use components [VisualStyle] -->
    <RequiredPlugin name="Sofa.GL.Component.Rendering3D"/> <!-- Needed to use components [OglModel] -->
    <VisualStyle displayFlags="showForceFields" />
    <CollisionPipeline verbose="0" />
    <BruteForceBroadPhase/>
    <BVHNarrowPhase/>
    <DefaultContactManager name="Response" response="PenalityContactForceField" />
    <DiscreteIntersection />
    <Node name="M1">
        <EulerImplicitSolver  rayleighStiffness="0.1" rayleighMass="0.1" />
        <CGLinearSolver iterations="20" tolerance="1e-5" threshold="1e-5"/>
        <MechanicalObject dx="0" dy="-10.5" dz="0" />
        <UniformMass vertexMass="0.37" />
        <RegularGridTopology nx="3" ny="3" nz="3" xmin="-3.5" xmax="3.5" ymin="-3.5" ymax="3.5" zmin="-3.5" zmax="3.5" />
        <RegularGridSpringForceField name="Springs" stiffness="800" damping="8" />
        <Node name="Visu">
            <OglModel name="Visual" filename="mesh/smCube27.obj" color="yellow" />
            <BarycentricMapping input="@.." output="@Visual" />
        </Node>
        <Node name="Surf">
            <SphereLoader filename="mesh/smCube27b.sph" />
            <MechanicalObject position="@[-1].position" />
            <SphereCollisionModel listRadius="@[-2].listRadius" />
            <BarycentricMapping />
        </Node>
    </Node>
    <Node name="M2">
        <EulerImplicitSolver />
        <CGLinearSolver iterations="20" tolerance="1e-5" threshold="1e-5"/>
        <MechanicalObject dx="0" dy="0" dz="0" />
        <UniformMass vertexMass="0.37" />
        <RegularGridTopology nx="4" ny="4" nz="4" xmin="-3.5" xmax="3.5" ymin="-3.5" ymax="3.5" zmin="-3.5" zmax="3.5" />
        <RegularGridSpringForceField name="Springs" stiffness="560" damping="5.6" />
        <Node name="Visu">
            <OglModel name="Visual" filename="mesh/smCube27.obj" color="#ff8000" dx="0" dy="0" dz="0" />
            <BarycentricMapping input="@.." output="@Visual" />
        </Node>
        <Node name="Surf">
            <SphereLoader filename="mesh/smCube27b.sph" />
            <MechanicalObject position="@[-1].position" />
            <SphereCollisionModel listRadius="@[-2].listRadius" />
            <BarycentricMapping />
        </Node>
    </Node>
    <Node name="M3">
        <EulerImplicitSolver />
        <CGLinearSolver iterations="20" tolerance="1e-5" threshold="1e-5"/>
        <MechanicalObject dx="0" dy="10.5" dz="-4" />
        <UniformMass vertexMass="0.37" />
        <RegularGridTopology nx="5" ny="5" nz="5" xmin="-3.5" xmax="3.5" ymin="-3.5" ymax="3.5" zmin="-3.5" zmax="3.5" />
        <RegularGridSpringForceField name="Springs" stiffness="400" damping="4" />
        <Node name="Visu">
            <OglModel name="Visual" filename="mesh/smCube27.obj" color="red" />
            <BarycentricMapping input="@.." output="@Visual" />
        </Node>
        <Node name="Surf">
            <SphereLoader filename="mesh/smCube27b.sph" />
            <MechanicalObject position="@[-1].position"/>
            <SphereCollisionModel listRadius="@[-2].listRadius" />
            <BarycentricMapping />
        </Node>
    </Node>
    <Node name="M4">
        <EulerImplicitSolver />
        <CGLinearSolver iterations="20" tolerance="1e-5" threshold="1e-5"/>
        <MechanicalObject dx="0" dy="21" dz="0" />
        <UniformMass vertexMass="0.37" />
        <RegularGridTopology nx="6" ny="6" nz="6" xmin="-3.5" xmax="3.5" ymin="-3.5" ymax="3.5" zmin="-3.5" zmax="3.5" />
        <RegularGridSpringForceField name="Springs" stiffness="280" damping="2.8" />
        <Node name="Visu">
            <OglModel name="Visual" filename="mesh/smCube27.obj" color="#801080"/>
            <BarycentricMapping input="@.." output="@Visual" />
        </Node>
        <Node name="Surf">
            <SphereLoader filename="mesh/smCube27b.sph" />
            <MechanicalObject position="@[-1].position"/>
            <SphereCollisionModel listRadius="@[-2].listRadius" />
            <BarycentricMapping />
        </Node>
    </Node>
    <!--
	<Node name="M5">
		<EulerImplicitSolver />
		<CGLinearSolver iterations="20" tolerance="1e-5" threshold="1e-5"/>
		<MechanicalObject dx="-4" dy="31.5" dz="-4"/>
		<UniformMass mass="0.37"/>
		<RegularGridTopology
			nx="7" ny="7" nz="7"
			xmin="-3.5" xmax="3.5"
			ymin="-3.5" ymax="3.5"
			zmin="-3.5" zmax="3.5"
			/>
		<RegularGridSpringForceField name="Springs" stiffness="200" damping="2" />
		<Node name="Visu">
			<OglModel name="Visual" filename="mesh/smCube27.obj" color="cyan" />
			<BarycentricMapping input="@.." output="@Visual" />
		</Node>
		<Node name="Surf">
			<SphereLoader filename="mesh/smCube27b.sph" />
			<MechanicalObject position="@[-1].position" />
			<SphereCollisionModel listRadius="@[-2].position" />
			<BarycentricMapping />
		</Node>
	</Node>
	-->
    <SphereLoader filename="mesh/floor.sph" />
    <MechanicalObject position="@[-1].position" dy="-20" />
    <SphereCollisionModel name="Floor" listRadius="@[-2].listRadius" simulated="0" moving="0" />
    <Node>
        <OglModel name="FloorV" filename="mesh/floor.obj" texturename="textures/floor.bmp" dy="-20" />
    </Node>
</Node>
