<!--
 + Added the visual model for the instrument in a separate node of the graph
-->
<Node name="root" dt="0.01">
    <RequiredPlugin name="Sofa.Component.IO.Mesh"/> <!-- Needed to use components [MeshOBJLoader] -->
    <RequiredPlugin name="Sofa.Component.Setting"/> <!-- Needed to use components [BackgroundSetting] -->
    <RequiredPlugin name="Sofa.GL.Component.Rendering3D"/> <!-- Needed to use components [OglModel] -->

    <BackgroundSetting color="0.901960784 0.925490196 0.964705882" />
    <DefaultAnimationLoop/>

    <Node name="Head">
        <MeshOBJLoader name="meshLoader_3" filename="data/mesh/head.obj" handleSeams="1" />
        <OglModel name="HeadVisualModel" src="@meshLoader_3" texturename="Tutorials/StepByStep/Dentistry_Haptics/data/pics/head_baseTexBaked.png" />
        <Node name="Tongue">
            <MeshOBJLoader name="meshLoader_1" filename="data/mesh/tongue.obj" handleSeams="1" />
            <OglModel name="TongueVisualModel" src="@meshLoader_1" texturename="Tutorials/StepByStep/Dentistry_Haptics/data/pics/tongue_color.png" />
        </Node>
        <Node name="Teeth">
            <MeshOBJLoader name="meshLoader_2" filename="data/mesh/teeth.obj" handleSeams="1" />
            <OglModel name="TeethVisualModel" src="@meshLoader_2" texturename="Tutorials/StepByStep/Dentistry_Haptics/data/pics/teeth_color.png" />
        </Node>
    </Node>
    <Node name="Instrument">
        <MeshOBJLoader name="meshLoader_0" filename="data/mesh/dental_instrument.obj" handleSeams="1" />
        <OglModel name="InstrumentVisualModel" src="@meshLoader_0" color="0.8 0.8 0.8 1.0" dz="-10" />
    </Node>
</Node>
