<Node name="root" dt="0.01">
    <RequiredPlugin name="Sofa.Component.IO.Mesh"/> <!-- Needed to use components [MeshOBJLoader] -->
    <RequiredPlugin name="Sofa.Component.LinearSolver.Iterative"/> <!-- Needed to use components [CGLinearSolver] -->
    <RequiredPlugin name="Sofa.Component.Mapping.NonLinear"/> <!-- Needed to use components [RigidMapping] -->
    <RequiredPlugin name="Sofa.Component.Mass"/> <!-- Needed to use components [UniformMass] -->
    <RequiredPlugin name="Sofa.Component.ODESolver.Backward"/> <!-- Needed to use components [EulerImplicitSolver] -->
    <RequiredPlugin name="Sofa.Component.Setting"/> <!-- Needed to use components [BackgroundSetting] -->
    <RequiredPlugin name="Sofa.Component.StateContainer"/> <!-- Needed to use components [MechanicalObject] -->
    <RequiredPlugin name="Sofa.GL.Component.Rendering3D"/> <!-- Needed to use components [OglModel] -->
    <RequiredPlugin name="SofaGraphComponent"/> <!-- Needed to use components [Gravity] -->

    <BackgroundSetting color="0.901960784 0.925490196 0.964705882" />
    <Gravity name="G" gravity="0.0 -9.81 0" />
    <DefaultAnimationLoop/>

    <Node name="Head">
        <MeshOBJLoader name="meshLoader_2" filename="data/mesh/head.obj" handleSeams="1" />
        <OglModel name="HeadVisualModel" src="@meshLoader_2" texturename="Tutorials/StepByStep/Dentistry_Haptics/data/pics/head_baseTexBaked.png" />
        <Node name="Tongue">
            <MeshOBJLoader name="meshLoader_3" filename="data/mesh/tongue.obj" handleSeams="1" />
            <OglModel name="TongueVisualModel" src="@meshLoader_3" texturename="Tutorials/StepByStep/Dentistry_Haptics/data/pics/tongue_color.png" />
        </Node>
        <Node name="Teeth">
            <MeshOBJLoader name="meshLoader_0" filename="data/mesh/teeth.obj" handleSeams="1" />
            <OglModel name="TeethVisualModel" src="@meshLoader_0" texturename="Tutorials/StepByStep/Dentistry_Haptics/data/pics/teeth_color.png" />
        </Node>
    </Node>
    <Node name="Instrument">
        <EulerImplicitSolver name="ODE solver" rayleighStiffness="0.01" rayleighMass="1.0" />
        <CGLinearSolver name="linear solver" iterations="25" tolerance="1e-10" threshold="10e-10" />
        <MechanicalObject name="instrumentState" template="Rigid3" />
        <UniformMass name="mass" filename="BehaviorModels/dental_instrument.rigid" />
        <Node name="VisualModel">
            <MeshOBJLoader name="meshLoader_1" filename="data/mesh/dental_instrument.obj" handleSeams="1" />
            <OglModel name="InstrumentVisualModel" src="@meshLoader_1" color="0.8 0.8 0.8 1.0" dz="-10" />
            <RigidMapping name="MM-&gt;VM mapping" input="@instrumentState" output="@InstrumentVisualModel" />
        </Node>
    </Node>
</Node>
