<Node name="root" dt="0.01">
    <RequiredPlugin name="Sofa.Component.IO.Mesh"/> <!-- Needed to use components [MeshOBJLoader] -->
    <RequiredPlugin name="Sofa.Component.Setting"/> <!-- Needed to use components [BackgroundSetting] -->
    <RequiredPlugin name="Sofa.Component.Visual"/> <!-- Needed to use components [LineAxis VisualGrid] -->
    <RequiredPlugin name="Sofa.GL.Component.Rendering3D"/> <!-- Needed to use components [OglModel OglSceneFrame] -->
    <DefaultAnimationLoop/>

	<BackgroundSetting color="0 0.16862745098 0.21176470588"/>
    <MeshOBJLoader name="meshLoader_0" filename="mesh/liver-smooth.obj" handleSeams="1" />
    <OglModel name="VisualModel" src="@meshLoader_0" color="red"/>
    <VisualGrid size="10" name="grid"/>
    <LineAxis size="@grid.size"/>
    <OglSceneFrame/>
</Node>
