<?xml version="1.0"?>
<Node name="root" gravity="0 0 -9.81" dt="0.01">

    <RequiredPlugin name="Sofa.Component.Constraint.Projective"/> <!-- Needed to use components [FixedConstraint] -->
    <RequiredPlugin name="Sofa.Component.Mass"/> <!-- Needed to use components [UniformMass] -->
    <RequiredPlugin name="Sofa.Component.ODESolver.Forward"/> <!-- Needed to use components [EulerExplicitSolver] -->
    <RequiredPlugin name="Sofa.Component.StateContainer"/> <!-- Needed to use components [MechanicalObject] -->
    <RequiredPlugin name="Sofa.Component.Visual"/> <!-- Needed to use components [VisualGrid VisualStyle] -->
    <RequiredPlugin name="Sofa.GL.Component.Rendering3D"/> <!-- Needed to use components [OglSceneFrame] -->

    <VisualGrid/>
    <OglSceneFrame/>

    <DefaultAnimationLoop/>
    <VisualStyle displayFlags="showBehavior" />
    <EulerExplicitSolver name="Explicit Euler Solver" />
    <Node name="FirstObject">
        <MechanicalObject template="Vec3" name="Particles" position="0 0 0 1 0 0" showObject="1" showObjectScale="10"/>
        <UniformMass template="Vec3" name="Mass" />
        <FixedConstraint template="Vec3" name="Fix Particles" indices="0" />
    </Node>
</Node>
