<Node name="root" gravity="0 -9.81 0" dt="0.01">
    <RequiredPlugin name="Sofa.Component.Collision.Detection.Algorithm"/> <!-- Needed to use components [BVHNarrowPhase, BruteForceBroadPhase, CollisionPipeline] -->
    <RequiredPlugin name="Sofa.Component.Collision.Detection.Intersection"/> <!-- Needed to use components [MinProximityIntersection] -->
    <RequiredPlugin name="Sofa.Component.Collision.Response.Contact"/> <!-- Needed to use components [DefaultContactManager] -->
    <RequiredPlugin name="Sofa.Component.Constraint.Projective"/> <!-- Needed to use components [FixedConstraint, FixedPlaneConstraint] -->
    <RequiredPlugin name="Sofa.Component.IO.Mesh"/> <!-- Needed to use components [MeshGmshLoader] -->
    <RequiredPlugin name="Sofa.Component.LinearSolver.Iterative"/> <!-- Needed to use components [CGLinearSolver] -->
    <RequiredPlugin name="Sofa.Component.Mass"/> <!-- Needed to use components [DiagonalMass] -->
    <RequiredPlugin name="Sofa.Component.ODESolver.Backward"/> <!-- Needed to use components [EulerImplicitSolver] -->
    <RequiredPlugin name="Sofa.Component.SolidMechanics.FEM.Elastic"/> <!-- Needed to use components [TetrahedralCorotationalFEMForceField] -->
    <RequiredPlugin name="Sofa.Component.StateContainer"/> <!-- Needed to use components [MechanicalObject] -->
    <RequiredPlugin name="Sofa.Component.Topology.Container.Dynamic"/> <!-- Needed to use components [TetrahedronSetGeometryAlgorithms, TetrahedronSetTopologyContainer, TetrahedronSetTopologyModifier] -->
    <RequiredPlugin name="Sofa.Component.Visual"/> <!-- Needed to use components [VisualStyle] -->

    <DefaultAnimationLoop/>
    <VisualStyle displayFlags="showBehavior" />
    <CollisionPipeline name="DefaultCollisionPipeline" verbose="0" draw="0" depth="6" />
    <BruteForceBroadPhase/>
    <BVHNarrowPhase/>
    <MinProximityIntersection name="Proximity" alarmDistance="3" contactDistance="2" />
    <DefaultContactManager name="Response" response="PenalityContactForceField" />
    <Node name="Tetrahedrons Mesh">
        <MeshGmshLoader name="loader" filename="mesh/cylinder.msh" />
        <MechanicalObject template="Vec3" name="Volume" src="@loader" />
        <EulerImplicitSolver name="cg_odesolver" printLog="0"  rayleighStiffness="0.1" rayleighMass="0.1" />
        <CGLinearSolver template="GraphScattered" name="linear solver" iterations="25" tolerance="1e-09" threshold="1e-09" />
        <TetrahedronSetTopologyContainer name="Container" filename="mesh/cylinder.msh" tetrahedra="@loader.tetrahedra" />
        <TetrahedronSetTopologyModifier name="Modifier" />
        <TetrahedronSetGeometryAlgorithms template="Vec3" name="GeomAlgo" drawTetrahedra="1" drawColorTetrahedra="1.0 1.0 0.3 1.0" />
        <TetrahedralCorotationalFEMForceField template="Vec3" name="FEM" method="large" poissonRatio="0.3" youngModulus="360" assembling="0" />
        <DiagonalMass template="Vec3,Vec3" name="default11" massDensity="2" />
        <FixedPlaneConstraint template="Vec3" name="default12" direction="0 0 1" dmin="-0.1" dmax="0.1" />
        <FixedConstraint template="Vec3" name="default13" indices="0" />
    </Node>
</Node>
