<Node name="root" gravity="0 -9.81 0" dt="0.01">
    <RequiredPlugin name="Sofa.Component.Collision.Detection.Algorithm"/> <!-- Needed to use components [BVHNarrowPhase BruteForceBroadPhase CollisionPipeline] -->
    <RequiredPlugin name="Sofa.Component.Collision.Detection.Intersection"/> <!-- Needed to use components [MinProximityIntersection] -->
    <RequiredPlugin name="Sofa.Component.Collision.Geometry"/> <!-- Needed to use components [TriangleCollisionModel] -->
    <RequiredPlugin name="Sofa.Component.Collision.Response.Contact"/> <!-- Needed to use components [DefaultContactManager] -->
    <RequiredPlugin name="Sofa.Component.Constraint.Projective"/> <!-- Needed to use components [FixedConstraint] -->
    <RequiredPlugin name="Sofa.Component.LinearSolver.Iterative"/> <!-- Needed to use components [CGLinearSolver] -->
    <RequiredPlugin name="Sofa.Component.Mapping.Linear"/> <!-- Needed to use components [IdentityMapping] -->
    <RequiredPlugin name="Sofa.Component.Mass"/> <!-- Needed to use components [DiagonalMass] -->
    <RequiredPlugin name="Sofa.Component.ODESolver.Backward"/> <!-- Needed to use components [EulerImplicitSolver] -->
    <RequiredPlugin name="Sofa.Component.SolidMechanics.FEM.Elastic"/> <!-- Needed to use components [HexahedronFEMForceField] -->
    <RequiredPlugin name="Sofa.Component.SolidMechanics.Spring"/> <!-- Needed to use components [TriangularBendingSprings] -->
    <RequiredPlugin name="Sofa.Component.StateContainer"/> <!-- Needed to use components [MechanicalObject] -->
    <RequiredPlugin name="Sofa.Component.Topology.Container.Dynamic"/> <!-- Needed to use components [HexahedronSetGeometryAlgorithms QuadSetGeometryAlgorithms QuadSetTopologyContainer QuadSetTopologyModifier TriangleSetGeometryAlgorithms TriangleSetTopologyContainer TriangleSetTopologyModifier] -->
    <RequiredPlugin name="Sofa.Component.Topology.Container.Grid"/> <!-- Needed to use components [RegularGridTopology] -->
    <RequiredPlugin name="Sofa.Component.Topology.Mapping"/> <!-- Needed to use components [Hexa2QuadTopologicalMapping Quad2TriangleTopologicalMapping] -->
    <RequiredPlugin name="Sofa.Component.Visual"/> <!-- Needed to use components [VisualStyle] -->
    <RequiredPlugin name="Sofa.GL.Component.Rendering3D"/> <!-- Needed to use components [OglModel] -->

    <DefaultAnimationLoop/>
    <VisualStyle displayFlags="showBehavior" />
    <CollisionPipeline name="DefaultCollisionPipeline" verbose="0" draw="0" depth="6" />
    <BruteForceBroadPhase/>
    <BVHNarrowPhase/>
    <MinProximityIntersection name="Proximity" alarmDistance="3" contactDistance="2" />
    <DefaultContactManager name="Response" response="PenalityContactForceField" />
    <Node name="Hexahedra Mesh">
        <EulerImplicitSolver name="cg_odesolver" printLog="0"  rayleighStiffness="0.1" rayleighMass="0.1" />
        <CGLinearSolver template="GraphScattered" name="linear solver" iterations="40" tolerance="1e-09" threshold="1e-09" />
        <MechanicalObject template="Vec3" name="Hexa" />
        <RegularGridTopology name="grid" n="6 6 6" min="-10 -10 -10" max="10 10 10" p0="-10 -10 -10" />
        <HexahedronSetGeometryAlgorithms />
        <HexahedronFEMForceField template="Vec3" name="FEM" poissonRatio="0.3" youngModulus="100" />
        <DiagonalMass template="Vec3,Vec3" name="Mass" vertexMass="1" />
        <FixedConstraint template="Vec3" name="Fixed Dofs" indices="30 35 210 215" drawSize="0" />
        <Node name="Quad Mesh">
            <QuadSetTopologyContainer name="Container" />
            <QuadSetTopologyModifier name="Modifier" />
            <QuadSetGeometryAlgorithms template="Vec3" name="GeomAlgo" />
            <Hexa2QuadTopologicalMapping name="default6" input="@../grid" output="@Container" />
            <Node name="Triangles Mesh" gravity="0 -9.81 0">
                <TriangleSetTopologyContainer name="Container" />
                <TriangleSetTopologyModifier name="Modifier" />
                <TriangleSetGeometryAlgorithms template="Vec3" name="GeomAlgo" />
                <Quad2TriangleTopologicalMapping name="default8" input="@../Container" output="@Container" />
                <TriangularBendingSprings template="Vec3" name="FEM-Bend" stiffness="200" damping="1" />
                <TriangleCollisionModel name="default9" />
                <Node name="Visu">
                    <OglModel name="Visual" material="Default Diffuse 1 1 0 0 1 Ambient 1 0.2 0 0 1 Specular 0 1 0 0 1 Emissive 0 1 0 0 1 Shininess 0 45" />
                    <IdentityMapping template="Vec3,Vec3" name="default12" input="@.." output="@Visual" />
                </Node>
            </Node>
        </Node>
    </Node>
</Node>
