<Node name="root">
    <RequiredPlugin name="Sofa.GL.Component.Rendering3D"/> <!-- Needed to use components [OglModel] -->
    <RequiredPlugin name="Sofa.Component.IO.Mesh"/> <!-- Needed to use components [MeshOBJLoader] -->
    <DefaultAnimationLoop/>
    <MeshOBJLoader name="loader" filename="mesh/dragon.obj"/>
    <OglModel name="dragon" src="@loader" />
</Node>
