<Node name="root">
    <RequiredPlugin name="Sofa.GL.Component.Rendering3D"/> <!-- Needed to use components [OglModel] -->
    <RequiredPlugin name="Sofa.GL.Component.Shader"/> <!-- Needed to use components [OglFloat4Variable OglFloatVariable OglIntVariable OglShader OglShaderDefineMacro OglTexture] -->
    <RequiredPlugin name="Sofa.Component.IO.Mesh"/> <!-- Needed to use components [MeshOBJLoader] -->


    <DefaultAnimationLoop/>
	<Node name="oglModels">
    <OglShader fragFilename="shaders/generalRenderingShader.frag" vertFilename="shaders/generalRenderingShader.vert" />
    <OglShaderDefineMacro id="PERLIN_NOISE_COLOR" />
    <OglShaderDefineMacro name="PERLIN_NOISE_BUMP" />
    <OglShaderDefineMacro name="PHONG" />
    <OglFloatVariable name="perlinColorFrequency" value="0.5" />
    <OglIntVariable name="perlinColorOctave" value="3" />
    <OglFloatVariable name="perlinColorPersistance" value="0.5" />
    <OglFloat4Variable name="perlinColorFactor" value="0.2 0.9 0.0 0" />
    <OglFloatVariable name="perlinBumpFrequency" value="6" />
    <OglIntVariable name="perlinBumpOctave" value="1" />
    <OglFloatVariable name="perlinBumpPersistance" value="0.9" />
    <OglFloatVariable name="perlinBumpFactor" value="0.2" />
    <OglTexture id="perlinPermutationsTexture" proceduralTextureNbBits="8" proceduralTextureWidth="1" proceduralTextureHeight="256" repeat="true" linearInterpolation="false" proceduralTextureData="151 160 137 91 90 15 &#x0A;&#x09;&#x09;&#x09;&#x09;&#x09;&#x09;&#x09;&#x09;&#x09;&#x09;&#x09;&#x09;&#x09;   131 13 201 95 96 53 194 233 7 225 140 36 103 30 69 142 8 99 37 240 21 10 23 &#x0A;&#x09;&#x09;&#x09;&#x09;&#x09;&#x09;&#x09;&#x09;&#x09;&#x09;&#x09;&#x09;&#x09;   190  6 148 247 120 234 75 0 26 197 62 94 252 219 203 117 35 11 32 57 177 33 &#x0A;&#x09;&#x09;&#x09;&#x09;&#x09;&#x09;&#x09;&#x09;&#x09;&#x09;&#x09;&#x09;&#x09;   88 237 149 56 87 174 20 125 136 171 168  68 175 74 165 71 134 139 48 27 166 &#x0A;&#x09;&#x09;&#x09;&#x09;&#x09;&#x09;&#x09;&#x09;&#x09;&#x09;&#x09;&#x09;&#x09;   77 146 158 231 83 111 229 122 60 211 133 230 220 105 92 41 55 46 245 40 244 &#x0A;&#x09;&#x09;&#x09;&#x09;&#x09;&#x09;&#x09;&#x09;&#x09;&#x09;&#x09;&#x09;&#x09;   102 143 54  65 25 63 161  1 216 80 73 209 76 132 187 208  89 18 169 200 196 &#x0A;&#x09;&#x09;&#x09;&#x09;&#x09;&#x09;&#x09;&#x09;&#x09;&#x09;&#x09;&#x09;&#x09;   135 130 116 188 159 86 164 100 109 198 173 186  3 64 52 217 226 250 124 123 &#x0A;&#x09;&#x09;&#x09;&#x09;&#x09;&#x09;&#x09;&#x09;&#x09;&#x09;&#x09;&#x09;&#x09;   5 202 38 147 118 126 255 82 85 212 207 206 59 227 47 16 58 17 182 189 28 42 &#x0A;&#x09;&#x09;&#x09;&#x09;&#x09;&#x09;&#x09;&#x09;&#x09;&#x09;&#x09;&#x09;&#x09;   223 183 170 213 119 248 152  2 44 154 163  70 221 153 101 155 167  43 172 9 &#x0A;&#x09;&#x09;&#x09;&#x09;&#x09;&#x09;&#x09;&#x09;&#x09;&#x09;&#x09;&#x09;&#x09;   129 22 39 253  19 98 108 110 79 113 224 232 178 185  112 104 218 246 97 228 &#x0A;&#x09;&#x09;&#x09;&#x09;&#x09;&#x09;&#x09;&#x09;&#x09;&#x09;&#x09;&#x09;&#x09;   251 34 242 193 238 210 144 12 191 179 162 241  81 51 145 235 249 14 239 107 &#x0A;&#x09;&#x09;&#x09;&#x09;&#x09;&#x09;&#x09;&#x09;&#x09;&#x09;&#x09;&#x09;&#x09;   49 192 214  31 181 199 106 157 184  84 204 176 115 121 50 45 127  4 150 254 &#x0A;&#x09;&#x09;&#x09;&#x09;&#x09;&#x09;&#x09;&#x09;&#x09;&#x09;&#x09;&#x09;&#x09;   138 236 205 93 222 114 67 29 24 72 243 141 128 195 78 66 215 61 156 180" />
    <MeshOBJLoader name="loader_dragon" filename="mesh/dragon.obj" handleSeams="1" />
    <OglModel name="dragon" src="@loader_dragon"/>
</Node>
</Node>
